# Problema 1)
# a )
x := -3, -2.99 .. 3
f(x) := sin(x)
F(x) == a + bx + cx^2 == af1(x) + bf2(x) + cf3(x)
f1(x) := 1  # B={f1,f2,f3}
limi := -1
f2(x) := x
lims := 1
f3(x) := x^2
n := 3 - 1 = 2
w(x) := 1
A := [
    integral(f1(x)*f1(x)*w(x), x = limi .. lims), integral(f1(x)*f2(x)*w(x), x = limi .. lims), integral(f1(x)*f3(x)*w(x), x = limi .. lims);
    integral(f1(x)*f2(x)*w(x), x = limi .. lims), integral(f2(x)*f2(x)*w(x), x = limi .. lims), integral(f3(x)*f2(x)*w(x), x = limi .. lims);
    integral(f1(x)*f3(x)*w(x), x = limi .. lims), integral(f3(x)*f2(x)*w(x), x = limi .. lims), integral(f3(x)*f3(x)*w(x), x = limi .. lims)
] = [2, 0, 0.666667; 0, 0.666667, 0; 0.666667, 0, 0.4]
B := [
    integral(f(x)*f1(x)*w(x), x = limi .. lims);
    integral(f(x)*f2(x)*w(x), x = limi .. lims);
    integral(f(x)*f3(x)*w(x), x = limi .. lims)
] = [0; 0.602337; 0]
X := A^-1*B = [0; 0.903506; 0]
E := |sqrt(integral(f(x)^2, x = limi .. lims) - sum(B[i]*X[i], i = 0 .. n))| = 0.0337023
Fa(x) := X[0]*f1(x) + X[1]*f2(x) + X[2]*f3(x) → 0.903506036819*x
# d )
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# b )
XV := [0, 0.5, 1]
YV := [0, 0.479, 0.841]
n := 3 - 1
A := [
    sum(f1(transpose(XV)[i])*f1(transpose(XV)[i])*w(x), i = 0 .. n), sum(f2(transpose(XV)[i])*f1(transpose(XV)[i])*w(x), i = 0 .. n), sum(f3(transpose(XV)[i])*f1(transpose(XV)[i])*w(x), i = 0 .. n);
    sum(f1(transpose(XV)[i])*f2(transpose(XV)[i])*w(x), i = 0 .. n), sum(f2(transpose(XV)[i])*f2(transpose(XV)[i])*w(x), i = 0 .. n), sum(f3(transpose(XV)[i])*f2(transpose(XV)[i])*w(x), i = 0 .. n);
    sum(f1(transpose(XV)[i])*f3(transpose(XV)[i])*w(x), i = 0 .. n), sum(f2(transpose(XV)[i])*f3(transpose(XV)[i])*w(x), i = 0 .. n), sum(f3(transpose(XV)[i])*f3(transpose(XV)[i])*w(x), i = 0 .. n)
] = [3, 1.5, 1.25; 1.5, 1.25, 1.125; 1.25, 1.125, 1.0625]
B := [
    sum(transpose(YV)[i]*f1(transpose(XV)[i])*w(x), i = 0 .. n);
    sum(transpose(YV)[i]*f2(transpose(XV)[i])*w(x), i = 0 .. n);
    sum(transpose(YV)[i]*f3(transpose(XV)[i])*w(x), i = 0 .. n)
] = [1.32; 1.0805; 0.96075]
X := A^-1*B = [0; 1.075; -0.234]
E := |sqrt(sum(transpose(YV)[i]*transpose(YV)[i]*w(x), i = 0 .. n) - sum(B[i]*X[i], i = 0 .. n - 1))| = 0.474147
Fb(x) := f1(x)*X[0] + f2(x)*X[1] + f3(x)*X[2] → 1.075*x + (-0.234*x^2)
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# Problema 1)
# a )
x := -3, -2.99 .. 3
f(x) := sin(x)
F(x) == a + bx + cx^2 + dx^3 == af1(x) + bf2(x) + cf3(x) + df4(x)
f1(x) := 1  # B={f1,f2,f3}
limi := -1
f2(x) := x
lims := 1
f3(x) := x^2
n := 4 - 1 = 3
w(x) := 1
f4(x) := x^3
A := [
    integral(f1(x)*f1(x)*w(x), x = limi .. lims), integral(f1(x)*f2(x)*w(x), x = limi .. lims), integral(f1(x)*f3(x)*w(x), x = limi .. lims), integral(f1(x)*f4(x)*w(x), x = limi .. lims);
    integral(f1(x)*f2(x)*w(x), x = limi .. lims), integral(f2(x)*f2(x)*w(x), x = limi .. lims), integral(f2(x)*f3(x)*w(x), x = limi .. lims), integral(f4(x)*f2(x)*w(x), x = limi .. lims);
    integral(f1(x)*f3(x)*w(x), x = limi .. lims), integral(f3(x)*f2(x)*w(x), x = limi .. lims), integral(f3(x)*f3(x)*w(x), x = limi .. lims), integral(f4(x)*f3(x)*w(x), x = limi .. lims);
    integral(f1(x)*f4(x)*w(x), x = limi .. lims), integral(f4(x)*f2(x)*w(x), x = limi .. lims), integral(f4(x)*f3(x)*w(x), x = limi .. lims), integral(f4(x)*f4(x)*w(x), x = limi .. lims)
]
B := [
    integral(f(x)*f1(x)*w(x), x = limi .. lims);
    integral(f(x)*f2(x)*w(x), x = limi .. lims);
    integral(f(x)*f3(x)*w(x), x = limi .. lims);
    integral(f(x)*f4(x)*w(x), x = limi .. lims)
] = [0; 0.602337; 0; 0.354197]
X := A^-1*B = [0; 0.998075; 0; -0.157615]
E := |sqrt(integral(f(x)^2, x = limi .. lims) - sum(B[i]*X[i], i = 0 .. n))| = 0.000434158
Fa(x) := X[0]*f1(x) + X[1]*f2(x) + X[2]*f3(x) + X[3]*f4(x) → 0.998075138549*x + (-0.157615169549*x^3)
# d )
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# b )
XV := [0, 0.5, 1]
YV := [0, 0.479, 0.841]
n := 3 - 1 = 2
A := [
    sum(f1(transpose(XV)[i])*f1(transpose(XV)[i])*w(x), i = 0 .. n), sum(f2(transpose(XV)[i])*f1(transpose(XV)[i])*w(x), i = 0 .. n), sum(f3(transpose(XV)[i])*f1(transpose(XV)[i])*w(x), i = 0 .. n), sum(f1(transpose(XV)[i])*f4(transpose(XV)[i])*w(x), i = 0 .. n);
    sum(f2(transpose(XV)[i])*f1(transpose(XV)[i])*w(x), i = 0 .. n), sum(f2(transpose(XV)[i])*f2(transpose(XV)[i])*w(x), i = 0 .. n), sum(f3(transpose(XV)[i])*f2(transpose(XV)[i])*w(x), i = 0 .. n), sum(f2(transpose(XV)[i])*f4(transpose(XV)[i])*w(x), i = 0 .. n);
    sum(f1(transpose(XV)[i])*f3(transpose(XV)[i])*w(x), i = 0 .. n), sum(f2(transpose(XV)[i])*f3(transpose(XV)[i])*w(x), i = 0 .. n), sum(f3(transpose(XV)[i])*f3(transpose(XV)[i])*w(x), i = 0 .. n), sum(f3(transpose(XV)[i])*f4(transpose(XV)[i])*w(x), i = 0 .. n);
    sum(f1(transpose(XV)[i])*f4(transpose(XV)[i])*w(x), i = 0 .. n), sum(f2(transpose(XV)[i])*f4(transpose(XV)[i])*w(x), i = 0 .. n), sum(f3(transpose(XV)[i])*f4(transpose(XV)[i])*w(x), i = 0 .. n), sum(f3(transpose(XV)[i])*f3(transpose(XV)[i])*w(x), i = 0 .. n)
] = [
    3, 1.5, 1.25, 1.125;
    1.5, 1.25, 1.125, 1.0625;
    1.25, 1.125, 1.0625, 1.03125;
    1.125, 1.0625, 1.03125, 1.0625
]
B := [
    sum(transpose(YV)[i]*f1(transpose(XV)[i])*w(x), i = 0 .. n);
    sum(transpose(YV)[i]*f2(transpose(XV)[i])*w(x), i = 0 .. n);
    sum(transpose(YV)[i]*f3(transpose(XV)[i])*w(x), i = 0 .. n);
    sum(transpose(YV)[i]*f4(transpose(XV)[i])*w(x), i = 0 .. n)
] = [1.32; 1.0805; 0.96075; 0.900875]
X := A^-1*B = [0; 1.075; -0.234; 0]
E := |sqrt(sum(transpose(YV)[i]*transpose(YV)[i]*w(x), i = 0 .. n) - sum(B[i]*X[i], i = 0 .. n - 1))| = 0.474147
Fb(x) := f1(x)*X[0] + f2(x)*X[1] + f3(x)*X[2] + f4(x)*X[3] → 1.075*x + (-0.234*x^2) + 3.5527136788e-15*x^3 + 8.32913984697e-17
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