# Problema 1)
# a )
x := -3, -2.99 .. 3
f(x) := sin(x)
F(x) == a + bx + cx^2 == af1(x) + bf2(x) + cf3(x)
f1(x) := 1  # B={f1,f2,f3}
f2(x) := x
f3(x) := x^2
w(x) := 1
A := [
    integral(f1(x)*f1(x)*w(x), x = -1 .. 1), integral(f1(x)*f2(x)*w(x), x = -1 .. 1), integral(f1(x)*f3(x)*w(x), x = -1 .. 1);
    integral(f1(x)*f2(x)*w(x), x = -1 .. 1), integral(f2(x)*f2(x)*w(x), x = -1 .. 1), integral(f3(x)*f2(x)*w(x), x = -1 .. 1);
    integral(f1(x)*f3(x)*w(x), x = -1 .. 1), integral(f3(x)*f2(x)*w(x), x = -1 .. 1), integral(f3(x)*f3(x)*w(x), x = -1 .. 1)
] = [2, 0, 0.666667; 0, 0.666667, 0; 0.666667, 0, 0.4]
B := [
    integral(f(x)*f1(x)*w(x), x = -1 .. 1);
    integral(f(x)*f2(x)*w(x), x = -1 .. 1);
    integral(f(x)*f3(x)*w(x), x = -1 .. 1)
] = [0; 0.602337; 0]
X := A^-1*B = [0; 0.903506; 0]
E := |sqrt(integral(f(x)^2, x = -1 .. 1) - sum(B[i]*X[i], i = 0 .. 2))| = 0.0337023
Fa(x) := X[1]*f2(x) → 0.903506036819*x
# b )
F(x) == ax + bx^3 + cx^5 == af1(x) + bf2(x) + cf3(x)
f1(x) := x  # B={f1,f2,f3}
f2(x) := x^3
f3(x) := x^5
w(x) := 1
A := [
    integral(f1(x)*f1(x)*w(x), x = -1 .. 1), integral(f1(x)*f2(x)*w(x), x = -1 .. 1), integral(f1(x)*f3(x)*w(x), x = -1 .. 1);
    integral(f1(x)*f2(x)*w(x), x = -1 .. 1), integral(f2(x)*f2(x)*w(x), x = -1 .. 1), integral(f3(x)*f2(x)*w(x), x = -1 .. 1);
    integral(f1(x)*f3(x)*w(x), x = -1 .. 1), integral(f3(x)*f2(x)*w(x), x = -1 .. 1), integral(f3(x)*f3(x)*w(x), x = -1 .. 1)
] = [0.666667, 0.4, 0.285714; 0.4, 0.285714, 0.222222; 0.285714, 0.222222, 0.181818]
B := [
    integral(f(x)*f1(x)*w(x), x = -1 .. 1);
    integral(f(x)*f2(x)*w(x), x = -1 .. 1);
    integral(f(x)*f3(x)*w(x), x = -1 .. 1)
] = [0.602337; 0.354197; 0.250162]
X := A^-1*B = [0.999984; -0.166524; 0.00801811]
E := |sqrt(integral(f(x)^2, x = -1 .. 1) - sum(B[i]*X[i], i = 0 .. 2))| = 2.62097e-6
Fb(x) := f1(x)*X[0] + f2(x)*X[1] + f3(x)*X[2] → 0.0080181103647*x^5 + 0.999984212445*x + (-0.166524181066*x^3)
# d )
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# Problema 2 )
f(x) := x*e^(-x)
# Intervalo = [0, 1]
x := -3, -2.99 .. 3
F(x) == a + bx == af1(x) + bf2(x)
f1(x) := 1  # B={f1,f2}
f2(x) := x
A := [
    integral(f1(x)*f1(x)*e^x, x = 0 .. 1), integral(f1(x)*f2(x)*e^x, x = 0 .. 1);
    integral(f2(x)*f1(x)*e^x, x = 0 .. 1), integral(f2(x)*f2(x)*e^x, x = 0 .. 1)
] = [1.71828, 1; 1, 0.718282]
B := [integral(f(x)*f1(x)*e^x, x = 0 .. 1); integral(f(x)*f2(x)*e^x, x = 0 .. 1)] = [0.5; 0.333333]
X := A^-1*B = [0.11019; 0.310663]
E := |sqrt(integral(f(x)*f(x)*e^x, x = 0 .. 1) - sum(B[i]*X[i], i = 0 .. 1))| = 0.0441995
Fa(x) := f1(x)*X[0] + f2(x)*X[1] → 0.310663160744*x + 0.110189630199
PARABOLA
F(x) == a + bx + cx^2 == af1(x) + bf2(x) + cf3(x)
f1(x) := 1  # B={f1,f2,f3}
f2(x) := x
f3(x) := x^2
A := [
    integral(f1(x)*f1(x)*e^x, x = 0 .. 1), integral(f1(x)*f2(x)*e^x, x = 0 .. 1), integral(f1(x)*f3(x)*e^x, x = 0 .. 1);
    integral(f2(x)*f1(x)*e^x, x = 0 .. 1), integral(f2(x)*f2(x)*e^x, x = 0 .. 1), integral(f2(x)*f3(x)*e^x, x = 0 .. 1);
    integral(f3(x)*f1(x)*e^x, x = 0 .. 1), integral(f3(x)*f2(x)*e^x, x = 0 .. 1), integral(f3(x)*f3(x)*e^x, x = 0 .. 1)
] = [1.71828, 1, 0.718282; 1, 0.718282, 0.563436; 0.718282, 0.563436, 0.464536]
B := [
    integral(f(x)*f1(x)*e^x, x = 0 .. 1);
    integral(f(x)*f2(x)*e^x, x = 0 .. 1);
    integral(f(x)*f3(x)*e^x, x = 0 .. 1)
] = [0.5; 0.333333; 0.25]
X := A^-1*B = [0.0173731; 0.798821; -0.457582]
E := |sqrt(integral(f(x)*f(x)*e^x, x = 0 .. 1) - sum(B[i]*X[i], i = 0 .. 2))| = 0.00617212
Fb(x) := f1(x)*X[0] + f2(x)*X[1] + f3(x)*X[2] → 0.798821356044*x + (-0.457582467239*x^2) + 0.0173730611012
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# Problema 3 )
# a )
f(x) := e^(-x^2)
F(x) == a + bx + cx^2 == af1(x) + bf2(x) + cf3(x)
f1(x) := 1  # B={f1,f2,f3}
w(x) := 1
f2(x) := x
f3(x) := x^2
A := [
    integral(f1(x)*f1(x)*w(x), x = 0 .. 1), integral(f1(x)*f2(x)*w(x), x = 0 .. 1), integral(f1(x)*f3(x)*w(x), x = 0 .. 1);
    integral(f2(x)*f1(x)*w(x), x = 0 .. 1), integral(f2(x)*f2(x)*w(x), x = 0 .. 1), integral(f2(x)*f3(x)*w(x), x = 0 .. 1);
    integral(f3(x)*f1(x)*w(x), x = 0 .. 1), integral(f3(x)*f2(x)*w(x), x = 0 .. 1), integral(f3(x)*f3(x)*w(x), x = 0 .. 1)
] = [1, 0.5, 0.333333; 0.5, 0.333333, 0.25; 0.333333, 0.25, 0.2]
B := [
    integral(f(x)*f1(x)*w(x), x = 0 .. 1);
    integral(f(x)*f2(x)*w(x), x = 0 .. 1);
    integral(f(x)*f3(x)*w(x), x = 0 .. 1)
] = [0.746824; 0.31606; 0.189472]
X := A^-1*B = [1.02742; -0.307117; -0.381104]
E := |sqrt(integral(f(x)*f(x)*w(x), x = 0 .. 1) - sum(B[i]*X[i], i = 0 .. 2))| = 0.0109591
Fa(x) := f1(x)*X[0] + f2(x)*X[1] + f3(x)*X[2] → -0.307117381394*x + (-0.381104062509*x^2) + 1.02741751101
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# b )
XV := [0, 0.5, 1]
YV := [f(transpose(XV)[0]), f(transpose(XV)[1]), f(transpose(XV)[2])] = [1, 0.778801, 0.367879]
A := [
    sum(f1(transpose(XV)[i])*f1(transpose(XV)[i])*w(x), i = 0 .. 2), sum(f2(transpose(XV)[i])*f1(transpose(XV)[i])*w(x), i = 0 .. 2), sum(f3(transpose(XV)[i])*f1(transpose(XV)[i])*w(x), i = 0 .. 2);
    sum(f1(transpose(XV)[i])*f2(transpose(XV)[i])*w(x), i = 0 .. 2), sum(f2(transpose(XV)[i])*f2(transpose(XV)[i])*w(x), i = 0 .. 2), sum(f3(transpose(XV)[i])*f2(transpose(XV)[i])*w(x), i = 0 .. 2);
    sum(f1(transpose(XV)[i])*f3(transpose(XV)[i])*w(x), i = 0 .. 2), sum(f2(transpose(XV)[i])*f3(transpose(XV)[i])*w(x), i = 0 .. 2), sum(f3(transpose(XV)[i])*f3(transpose(XV)[i])*w(x), i = 0 .. 2)
] = [3, 1.5, 1.25; 1.5, 1.25, 1.125; 1.25, 1.125, 1.0625]
B := [
    sum(transpose(YV)[i]*f1(transpose(XV)[i])*w(x), i = 0 .. 2);
    sum(transpose(YV)[i]*f2(transpose(XV)[i])*w(x), i = 0 .. 2);
    sum(transpose(YV)[i]*f3(transpose(XV)[i])*w(x), i = 0 .. 2)
] = [2.14668; 0.75728; 0.56258]
X := A^-1*B = [1; -0.252676; -0.379444]
E := |sqrt(sum(transpose(YV)[i]*transpose(YV)[i]*w(x), i = 0 .. 2) - sum(B[i]*X[i], i = 0 .. 1))| = 0.462026
Fb(x) := f1(x)*X[0] + f2(x)*X[1] + f3(x)*X[2] → -0.252676308886*x + (-0.379444249943*x^2) + 1
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# d )
integral(f(x), x = 0 .. 1) = 0.746824  # Funcion continua
integral(Fa(x), x = 0 .. 1) = 0.746824  # Funcion continua aproximada
integral(Fb(x), x = 0 .. 1) = 0.74718  # Funcion discreta aproximada
# Problema 4 )
y == aln(x) + b*e^(-x) == a*f1(x) + b*f2(x)
# B={f1, f2}
f1(x) := ln(x)
f2(x) := e^(-x)
w(x) := 1
YV := [0.2420, 0.1942, 0.1497, 0.1109, 0.079]
XV := [1, 1.2, 1.4, 1.6, 1.8]
A := [
    sum(f1(transpose(XV)[i])*f1(transpose(XV)[i])*w(x), i = 0 .. 4), sum(f1(transpose(XV)[i])*f2(transpose(XV)[i])*w(x), i = 0 .. 4);
    sum(f1(transpose(XV)[i])*f2(transpose(XV)[i])*w(x), i = 0 .. 4), sum(f2(transpose(XV)[i])*f2(transpose(XV)[i])*w(x), i = 0 .. 4)
] = [0.712851, 0.32994; 0.32994, 0.354949]
B := [
    sum(transpose(YV)[i]*f1(transpose(XV)[i])*w(x), i = 0 .. 4);
    sum(transpose(YV)[i]*f2(transpose(XV)[i])*w(x), i = 0 .. 4)
] = [0.184335; 0.219883]
X := A^-1*B = [-0.0493777; 0.665377]
Fa(x) := X[0]*f1(x) + X[1]*f2(x) → -0.0493776590373*ln(x) + 0.665376568138*e^(-x)
Fa(1.30) = 0.168381
Fa(2) = 0.0558229
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E := |sqrt(sum(transpose(YV)[i]*transpose(YV)[i]*w(x), i = 0 .. 4) - sum(B[i]*X[i], i = 0 .. 1))| = 0.00494246
# Problema 5 )
p(x) == a*e^(m*x)
ln(p(x)) == ln(a*e^(m*x))
(ln(p(x)) == ln(a)) + ln(e^(m*x))
(ln(p(x)) == ln(a)) + m*x
f(x) == h*f1(x) + k*f2(x)
f1(x) := 1
f2(x) := x
w(x) := 1
f(x) == ln(p(x))
h == ln(a)
k == m
XV := [0, 0.4, 0.8, 1.2, 1.6, 2]
YV := [3.1437, 4.4169, 6.0203, 8.6512, 11.0078, 16.2161]
A := [
    sum(f1(transpose(XV)[i])*f1(transpose(XV)[i])*w(x), i = 0 .. 5), sum(f1(transpose(XV)[i])*f2(transpose(XV)[i])*w(x), i = 0 .. 5);
    sum(f1(transpose(XV)[i])*f2(transpose(XV)[i])*w(x), i = 0 .. 5), sum(f2(transpose(XV)[i])*f2(transpose(XV)[i])*w(x), i = 0 .. 5)
] = [6, 6; 6, 8.8]
B := [
    sum(ln(transpose(YV))[i]*f1(transpose(XV)[i])*w(x), i = 0 .. 5);
    sum(ln(transpose(YV))[i]*f2(transpose(XV)[i])*w(x), i = 0 .. 5)
] = [11.7683; 14.0293]
X := A^-1*B = [1.15387; 0.807506]
a := e^X[0] = 3.17045
b := X[1] = 0.807506
Fa(x) := a*e^(b*x) → 3.17045371529*e^(0.807505688274*x)
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# Problema 6 )
y == α*x/(β + x)
# -->
1/y == β/α*1/x + 1/α
x1 == β/α
x2 == 1/α
f1(x) := 1/x
f2(x) := 1
w(x) := 1
XV := [1, 3, 5, 10, 15, 21]
YV := [0.89, 1.32, 1.46, 1.59, 1.64, 1.66]
A := [
    sum(f1(transpose(XV)[i])*f1(transpose(XV)[i])*w(x), i = 0 .. 5), sum(f1(transpose(XV)[i])*f2(transpose(XV)[i])*w(x), i = 0 .. 5);
    sum(f1(transpose(XV)[i])*f2(transpose(XV)[i])*w(x), i = 0 .. 5), sum(f2(transpose(XV)[i])*f2(transpose(XV)[i])*w(x), i = 0 .. 5)
] = [1.16782, 1.74762; 1.74762, 6]
B := [
    sum((1/transpose(YV))[i]*f1(transpose(XV)[i])*w(x), i = 0 .. 5);
    sum((1/transpose(YV))[i]*f2(transpose(XV)[i])*w(x), i = 0 .. 5)
] = [1.64534; 4.4072]
X := A^-1*B = [0.548961; 0.574637]
α := 1/X[1] = 1.74023
β := X[0]*α = 0.955317
Fa(x) := α*x/(β + x) → 1.74022777458*x/(x + 0.955317277876)
x := -3. - 2.999 .. 25
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