# Worksheet setting: ORIGIN = 1
# Tomando los casos activos de la base de datos de https://nssac.bii.virginia.edu/covid-19/dashboard/, los presentamos de la siguiente manera:
# Eje de las ordenadas: Casos activos
# Eje de las abscisas: Dia a partir de la aparicion del primer caso (dia 1)
ADEU := READPRN("C:\Users\Lucas\Documents\01 A Facultad\3° Año\1° Semestre\Estadistica II\TP\Analisis\Activos-DEU.txt")
y := ADEU
n := length(y) = 71
i := 1 .. n
x[i] := i
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# Ajuste exponencial:
y == a*e^(b*x)
ln(y) == ln(a) + b*x*ln(e)
ln(y) == ln(a) + b*x
Ly := ln(y)
# Mucho más simple, utilizando Mathcad:
a := intercept(x, Ly) = -0.359704  # Ordenada al origen
b := slope(x, Ly) = 0.170293  # Pendiente
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corr(x, Ly) = 0.947193
a := intercept(x, y) = -17318.4  # Ordenada al origen
b := slope(x, y) = 841.575  # Pendiente
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corr(x, y) = 0.785145
