# Worksheet setting: ORIGIN = 1
AITA := READPRN("C:\Users\Lucas\Documents\01 A Facultad\3° Año\1° Semestre\Estadistica II\TP\Analisis\Activos-ITA.txt")
y := AITA
n := length(y) = 81
i := 1 .. n
x[i] := i
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# Ajuste exponencial:
y == a*e^(b*x)
ln(y) == ln(a) + b*x*ln(e)
ln(y) == ln(a) + b*x
Ly := ln(y)
# Mucho más simple, utilizando Mathcad:
a := intercept(x, Ly) = 0.210662  # Ordenada al origen
b := slope(x, Ly) = 0.172979  # Pendiente
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corr(x, Ly) = 0.9407
a := intercept(x, y) = -30976.6  # Ordenada al origen
b := slope(x, y) = 1599.27  # Pendiente
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corr(x, y) = 0.918907
