# Worksheet setting: ORIGIN = 1
ASWE := READPRN("C:\Users\Lucas\Documents\01 A Facultad\3° Año\1° Semestre\Estadistica II\TP\Analisis\Activos-SWE.txt")
y := ASWE
n := length(y) = 128
i := 1 .. n
x[i] := i
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# Ajuste exponencial:
y == a*e^(b*x)
ln(y) == ln(a) + b*x*ln(e)
ln(y) == ln(a) + b*x
Ly := ln(y)
# Mucho más simple, utilizando Mathcad:
a := intercept(x, Ly) = 0.456892  # Ordenada al origen
b := slope(x, Ly) = 0.0963785  # Pendiente
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e := sum(((a + b*x[i]) - Ly[i])^2, i = 1 .. n)*1/n = 2.57614
e := sum((e^(a + b*x[i]) - y[i])^2, i = 1 .. n)*1/n = 853234119
corr(x, Ly) = 0.911679
a := intercept(x, y) = -7114.19  # Ordenada al origen
b := slope(x, y) = 257.805  # Pendiente
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e := sum(((a + b*x[i]) - y[i])^2, i = 1 .. n)*1/n = 10554524
corr(x, Ly) = 0.911679
