AARG := READPRN("C:\Users\Lucas\Documents\01 A Facultad\3° Año\1° Semestre\Estadistica II\TP\Analisis\Activos-ARG.txt")
x := 0 .. length(AARG)
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mAARG := mean(AARG) = 3328.5
meAARG := median(AARG) = 2125
ADEU := READPRN("C:\Users\Lucas\Documents\01 A Facultad\3° Año\1° Semestre\Estadistica II\TP\Analisis\Activos-DEU.txt")
x := 0 .. length(ADEU)
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mADEU := mean(ADEU) = 21024
meADEU := median(ADEU) = 12369
AUSA := READPRN("C:\Users\Lucas\Documents\01 A Facultad\3° Año\1° Semestre\Estadistica II\TP\Analisis\Activos-USA.txt")
x := 0 .. length(AUSA)
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mAUSA := mean(AUSA) = 723833
meAUSA := median(AUSA) = 797924
AITA := READPRN("C:\Users\Lucas\Documents\01 A Facultad\3° Año\1° Semestre\Estadistica II\TP\Analisis\Activos-ITA.txt")
x := 0 .. length(AITA)
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mAITA := mean(AITA) = 49898.4
meAITA := median(AITA) = 50966
ASWE := READPRN("C:\Users\Lucas\Documents\01 A Facultad\3° Año\1° Semestre\Estadistica II\TP\Analisis\Activos-SWE.txt")
x := 0 .. length(ASWE)
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mASWE := mean(ASWE) = 9514.23
meASWE := median(ASWE) = 5716.5
AURU := READPRN("C:\Users\Lucas\Documents\01 A Facultad\3° Año\1° Semestre\Estadistica II\TP\Analisis\Activos-URU.txt")
x := 0 .. length(AURU)
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mAURU := mean(AURU) = 180.151
meAURU := median(AURU) = 180
