# Worksheet setting: ORIGIN = 1
AURU := READPRN("C:\Users\Lucas\Documents\01 A Facultad\3° Año\1° Semestre\Estadistica II\TP\Analisis\Activos-URU.txt")
y := AURU
n := length(y) = 17
i := 1 .. n
x[i] := i
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# Ajuste exponencial:
y == a*e^(b*x)
ln(y) == ln(a) + b*x*ln(e)
ln(y) == ln(a) + b*x
Ly := ln(y)
# Mucho más simple, utilizando Mathcad:
a := intercept(x, Ly) = 1.84635  # Ordenada al origen
b := slope(x, Ly) = 0.269195  # Pendiente
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ec := sum((Ly[i] - (a + b*x[i]))^2, i = 1 .. n) = 5.69752
s_e := sqrt(1/(n - 2)*ec) = 0.616307
corr(x, Ly) = 0.915658
a := intercept(x, y) = -48.6103  # Ordenada al origen
b := slope(x, y) = 20.1397  # Pendiente
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corr(x, y) = 0.98746
ec := sum((y[i] - (a + b*x[i]))^2, i = 1 .. n) = 4229.92
pen := [20.14, 841.575, 1599, 18713, 118.369, 257.805]
dias := [17, 71, 81, 85, 91, 128]
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a := intercept(dias, pen)  # error: Este valor debe ser un vector de números reales.
b := slope(dias, pen)  # error: Este valor debe ser un vector de números reales.
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corr(dias, pen) = 0.0934599
