# Worksheet setting: ORIGIN = 1
AUSA := READPRN("C:\Users\Lucas\Documents\01 A Facultad\3° Año\1° Semestre\Estadistica II\TP\Analisis\Activos-USA.txt")
y := AUSA
n := length(y) = 85
i := 1 .. n
x[i] := i
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# Ajuste exponencial:
y == a*e^(b*x)
ln(y) == ln(a) + b*x*ln(e)
ln(y) == ln(a) + b*x
Ly := ln(y)
# Mucho más simple, utilizando Mathcad:
a := intercept(x, Ly) = 10.6273  # Ordenada al origen
b := slope(x, Ly) = 0.053059  # Pendiente
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corr(x, Ly) = 0.842456
a := intercept(x, y) = -80841  # Ordenada al origen
b := slope(x, y) = 18713.4  # Pendiente
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corr(x, y) = 0.990589
