# Grupo:
# - Colman, Mariano
# - Graffigna, Santiago
# - Soria, Lucas
# Problema 1:
#
# Una máquina de llenado automática se utiliza para llenar botellas con detergente líquido.
# Una muestra aleatoria de 20 botellas da como resultado una variación de muestra del volumen de llenado de σ2 = 0.0153 (onzas fluidas)2. Si la variación del volumen de llenado excede 0.01 (onzas fluidas) 2, una proporción inaceptable de botellas se subllenará o sobrecargará.
# ¿Existe evidencia en los datos de la muestra que sugiera que el fabricante tiene un problema con las botellas con o sin llenado?.
# Use α = 0.05 y suponga que el volumen de llenado tiene una distribución normal.
#
# 1
# Hipotesis nula: σ^2 = 0.01
# Hipotesis alternativa: σ^2 <> 0.01
#
# 2
# Nivel de significancia: α = 0.05
α := 0.05
n := 20
# 3 Criterio:
# Determinar el limite de aceptacion
chi0251 := qchisq(1 - α/2, n - 1) = 32.8523
chi0252 := qchisq(α/2, n - 1)
t := 0, .0.1 .. 50
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# 4
# Calculos:
s2 := 0.0153
chi := (n - 1)*s2/0.01 = 29.07
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# 5 Decision:
# Al quedar la línea rosa entre las azules, cae en la zona de ACEPTACIÓN. Vale decir que el llenado esta dentro de los limites tolerables
# Problema 2:
# En el contenido de azúcar del jarabe en duraznos enlatados, suponga que se cree que la varianza es σ2 = 18 (miligramos) 2. Una muestra aleatoria de n = 10 latas produce una desviación estándar de s = 4.8 miligramos.
# a)  Pruebe la hipótesis H0: σ2 = 18 versus H1: σ2 <> 18 usando 0.05.
# b)  Construya un intervalo de confianza bilateral del 95% para σ.
# 1
# Hipotesis nula: σ^2 = 18
# Hipotesis alternativa: σ^2 <> 18
#
# 2
# Nivel de significancia: α = 0.05
α := 0.05
n := 10
# 3 Criterio:
# Determinar  el limite de acceptacion
chi0251 := qchisq(1 - α/2, n - 1) = 19.0228
chi0252 := qchisq(α/2, n - 1) = 2.70039
t := 0, 0.0001 .. 30
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# 4
# Calculos:
s2 := 4.8^2 = 23.04
chi := (n - 1)*s2/18 = 11.52
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chi0252 = 2.70039
chi0251 = 19.0228
# Intervalo de confianza:
2.7 < σ^2 < 19.023
# 5 Decision:
# Al quedar la línea verde entre las azules, cae en la zona de ACEPTACIÓN. Vale decir que la varianza esta dentro de los limites tolerables
# Problema 3:
#
# Un fabricante de semiconductores produce controladores utilizados en aplicaciones de motores de automóviles. El cliente requiere que la caída del proceso o la fracción defectuosa en un paso crítico de fabricación no exceda p=0.05 y que el fabricante demuestre la capacidad del proceso a este nivel de calidad usando 0.05.
# El fabricante de semiconductores toma una muestra aleatoria de n = 200 dispositivos y descubre que x = 4 de ellos son defectuosos. ¿Puede el fabricante demostrar la capacidad del proceso para el cliente?
4/200 = 0.02
# 1
# Hipotesis nula:  p = 0.05
# Hipotesis alternativa: p < 0.05
# 2
# Nivel de significacion: 0.05
α := 0.05
# 3 Criterio:
z05 := qnorm(α, 0, 1) = -1.64485
t := -3, -2.99 .. 3
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# 4 Calculos:
z == (x - n*p0)/sqrt(n*p0*(1 - p0))
x := 4
n := 200
p0 := 0.05
z := (x - n*p0)/sqrt(n*p0*(1 - p0)) = -1.94666
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# 5 Decision:
# Al quedar la línea verde a la izquierda la azul, cae en la zona de RECHAZO. Vale decir que el fabricante no puede demostrar la capacidad del proceso al cliente.
# Se rechaza la hipotesis nula
# Problema 4:
# Un artículo en la Revista Fortune (21 de septiembre de 1992) afirmó que casi la mitad de todos los ingenieros continúan estudios académicos más allá del grado, en última instancia obteniendo una maestría o un doctorado. Los datos de un artículo en Engineering Horizons (Spring 1990) indicaron que x = 117 de x = 484 nuevos graduados en ingeniería estaban planeando estudios de posgrado.
# (a)  ¿Los datos de Engineering Horizons son consistentes con el reclamo informado por Fortune? Use 0.05 para llegar a sus conclusiones.
# (b)  Discuta cómo podría haber respondido la pregunta en la parte (a) construyendo un intervalo de confianza de dos lados acerca de p.
# (c)  Verificarlo gráficamente.
# a)
# 1 Hipotesis:
# Hipotesis nula: p = 0.5
# Hipotesis alternativa: p < 0.5
p := 117/484 = 0.241736  # Los datos de Engineering Horizons no parecen ser consitentes con los reclamos de Fortune
# 2 Intervalo de confianza:
α := 0.05
# 3 Criterio:
# Determinar  el limite de acceptacion
z05 := qnorm(α, 0, 1) = -1.64485
t := -3, -2.99 .. 3
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# 4 Calculos:
x := 117
n := 484
p0 := 0.5
z := (x - n*p0)/sqrt(n*p0*(1 - p0)) = -11.3636
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# 5 Decision:
# Se acepta la hipotesis alternativa, los datos no son consistentes
# b)c)
p := 0.21, 0.211 .. 0.274
z05 = -1.64485
-z05 = 1.64485
x1(p) := qbinom(α/2, n, 1 - p)/n
x0(p) := qbinom(α/2, n, p)/n
# Intervalo de confianza:
E := z05*sqrt(x/n*(1 - x/n)/n) = -0.03201
(x/n - E < p < x/n + E)
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# b)c)
p := 0.15, 0.1501 .. 0.30
z05 = -1.64485
-z05 = 1.64485
x1(p) := (n - qbinom(α/2, n, 1 - p))/n
x0(p) := qbinom(α/2, n, p)/n
# Intervalo de confianza:
E := z05*sqrt(x/n*(1 - x/n)/n) = -0.03201
(x/n - E < p < x/n + E)
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