# Grupo:
# - Colman, Mariano
# - Graffigna, Santiago
# - Soria, Lucas
# Problema 5:
# En una muestra aleatoria de 85 cojinetes del cigüeñal del motor de automóvil, 10 tienen una rugosidad de acabado superficial que excede las especificaciones. ¿Estos datos presentan pruebas contundentes de que la proporción de cojinetes del cigüeñal que presentan una rugosidad superficial excesiva excede de 0,10? Establezca y pruebe las hipótesis apropiadas usando 0.05.
# Proporcion muestral
10/85 = 0.117647
x := 10
p0 := 0.10
n := 85
# 1.  Hipotesis Nula:  p = 0.10
# Hipotesis Alternativa: p > 0.10
# 2. Nivel de significancia: α=0.05
α := 0.05
# 3 Criterio:
t := -3, -2.99 .. 3
z05 := qnorm(1 - α, 0, 1) = 1.64485
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# 4 Calculos:
z := (x - n*p0)/sqrt(n*p0*(1 - p0)) = 0.542326
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# 5 Decision:
# Se acepta la hiporesis nula
# Problema 6:
# Se está estudiando la fracción de circuitos integrados defectuosos producidos en un proceso de fotolitografía. Se prueba una muestra aleatoria de 300 circuitos, revelando 13 defectuosos.
# a) Encuentre un IC de dos lados del 95% en la fracción de circuitos defectuosos producidos por esta herramienta en particular.(b) Utilice los datos para probar H0: p = 0.05 versus H1: p <> 0.05. Use α = 0.05.
# Proporcion muestral:
13/300 = 0.0433333
x := 13
p0 := 0.05
n := 300
# b )
# 1.  Hipotesis Nula:  p = 0.05
# Hipotesis Alternativa: p <> 0.05
# 2. Nivel de significancia: α=0.05
α := 0.05
# 3 Criterio:
t := -3, -2.99 .. 3
z05 := qnorm(1 - α/2, 0, 1) = 1.95996
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# 4 Calculos:
z := (x - n*p0)/sqrt(n*p0*(1 - p0)) = -0.529813
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# 5 Decision:
# Se acepta la hiporesis nula
# a)
E := z05*sqrt(x/n*(1 - x/n)/n) = 0.0230398
# Intervalo de confianza
exinf := x/n - E = 0.0202935
exsup := x/n + E = 0.0663731
# Problema 7:
#
# Considere los datos del circuito defectuoso en el ejercicio anterior. (a) ¿Los datos respaldan la afirmación de que la fracción de unidades defectuosas producidas es menor que 0.05, usando α = 0.05? (b) Encuentre el P-valor para la prueba.
# a )
# 1.  Hipotesis Nula:  p = 0.05
# Hipotesis Alternativa: p < 0.05
# 2. Nivel de significancia: α=0.05
α := 0.05
# 3 Criterio:
t := -3, -2.99 .. 3
z05 := qnorm(α, 0, 1) = -1.64485
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# 4 Calculos:
z := (x - n*p0)/sqrt(n*p0*(1 - p0)) = -0.529813
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# 5 Decision:
# Se acepta la hiporesis nula
# b )
Pvalor := integral(dnorm(t, 0, 1), t = -∞ .. z) = 0.298121
# Problema 8:
# Un fabricante de lentes intraoculares está calificando una nueva rectificadora y calificará la máquina si el porcentaje de lentes pulidas que contienen defectos en la superficie no supera el 2%. Una muestra aleatoria de 250 lentes contiene seis lentes defectuosas.
# (a) Formule y pruebe un conjunto apropiado de hipótesis para determinar si la máquina puede ser calificada. Use α = 0.05.
p0 := 0.02
x := 6
n := 250
# 1.  Hipotesis Nula:  p = 0.02
# Hipotesis Alternativa: p > 0.02
# 2. Nivel de significancia: α=0.05
α := 0.05
# 3 Criterio:
t := -3, -2.99 .. 3
z05 := qnorm(1 - α, 0, 1) = 1.64485
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# 4 Calculos:
z := (x - n*p0)/sqrt(n*p0*(1 - p0)) = 0.451754
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# 5 Decision:
# Se acepta la hiporesis nula
# Problema 9:
# Se pregunta a una muestra aleatoria de 500 votantes si están a favor del uso de combustibles oxigenados durante todo el año para reducir la contaminación del aire. Si más de 315 votantes responden positivamente, concluiremos que al menos el 60% de los votantes favorecen el uso de estos combustibles.
# Encuentre la probabilidad de error de tipo I si exactamente el 60% de los votantes está a favor del uso de estos combustibles.
n := 500
p0 := 0.6
x := 315
# Proporcion muestral:
x/n = 0.63
z := (x - n*p0)/sqrt(n*p0*(1 - p0)) = 1.36931
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1 - pnorm(z, 0, 1) = 0.0854518
# Probabilidad de cometer el error de tipo I es de 8.35%
integral(dnorm(t, 0, 1), t = z .. ∞) = 0.0854518
