# Problema 13
# La siguiente es la distribución de las lecturas obtenidas con un contador Geiger del número de partículas emitidas por una sustancia radiactiva en 100 intervalos sucesivos de 40 segundos:
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# (a) Verifique que la media y la desviación estándar de esta distribución son x = 20 y s = 5.
#
# (b) Encuentre las probabilidades de que una variable aleatoria que tenga una distribución normal con μ = 20 y σ = 5 tome un valor inferior a 9.5, entre 9.5 y 14.5, entre 14.5 y 19.5, entre 19.5 y 24.5, entre 24.5 y 29.5 , entre 29.5 y 34.5, y mayor que 34.5.
#
# (c) Encuentre las frecuencias de curva normal esperadas para las diversas clases multiplicando las probabilidades obtenidas en la parte (b) por la frecuencia total, y luego pruebe al nivel de significancia de 0.05 si los datos pueden considerarse como una muestra aleatoria de una muestra población normal.
# (a)
# N° de
# partículas
# xi
# fi
# xifi
# (xi - x)^2 . fi
# 5-9
# 7
# 1
7*1 = 7
(7 - 20)^2*1 = 169
# 10 - 14
# 12
# 10
12*10 = 120
(12 - 20)^2*10 = 640
# 15 - 19
# 17
# 37
17*37 = 629
(17 - 20)^2*37 = 333
# 20 - 24
# 22
# 36
22*36 = 792
(22 - 20)^2*36 = 144
# 25 - 29
# 27
# 13
27*13 = 351
(27 - 20)^2*13 = 637
# 30 - 34
# 32
# 2
32*2 = 64
(32 - 20)^2*2 = 288
# 35 - 39
# 37
# 1
37*1 = 37
(37 - 20)^2*1 = 289
n := 100
sumxifi := 2000
x := sumxifi/n = 20
s := sqrt((169 + 640 + 333 + 144 + 637 + 288 + 289)/n) = 5
PM := transpose([7, 12, 17, 22, 27, 32, 37])  # puntos medios
NL := transpose([1, 10, 37, 36, 13, 2, 1])  # número de lecturas
TL := sum(NL)  # total de lecturas
# Media ponderada
MP := sum(PM[k]*NL[k], k = 0 .. 5)/TL = 19.63
# Desviación estándar
s := sqrt((sum(PM[k]^2*NL[k], k = 0 .. 5) - MP^2*TL)/TL) = 5.09638
# (b) y (c)
# N° de
# partículas
# Fronteras de clase
# Probabilidad de estar
# en cada categoría
# Frecuencia esperada
# 4.5 - 9.5
# -2.969  a  -1.988
0.022
0.022*100 = 2.2
# 9.5 - 14.5
# -1.988  a  -1.007
# 0.134
0.134*100 = 13.4
# 14.5 - 19.5
# -1.007  a  -0.026
# 0.333
0.333*100 = 33.3
# 19.5 - 24.5
# -0.026  a  0.956
# 0.341
0.341*100 = 34.1
# 24.5 - 29.5
# 0.956  a  1.937
# 0.143
0.143*100 = 14.3
# 29.5 - 34.5
# 1.937  a  2.918
0.025
0.025*100 = 2.5
# 34.5 - 39.5
# 2.918  a  3.899
# 1.713 x 10^-3
1.713*10^-3*100 = 0.1713
# 2da columna
(4.5 - MP)/s = -2.96877
(9.5 - MP)/s = -1.98768
(14.5 - MP)/s = -1.0066
(19.5 - MP)/s = -0.0255083
(24.5 - MP)/s = 0.95558
(29.5 - MP)/s = 1.93667
(34.5 - MP)/s = 2.91776
(39.5 - MP)/s = 3.89885
# 3ra columna
integral(dnorm(t, 0, 1), t = -2.969 .. -1.988) = 0.021912
integral(dnorm(t, 0, 1), t = -1.988 .. -1.007) = 0.133562
integral(dnorm(t, 0, 1), t = -1.007 .. -0.026) = 0.332661
integral(dnorm(t, 0, 1), t = -0.026 .. 0.956) = 0.340835
integral(dnorm(t, 0, 1), t = 0.956 .. 1.937) = 0.143163
integral(dnorm(t, 0, 1), t = 1.937 .. 2.918) = 0.0246112
integral(dnorm(t, 0, 1), t = 2.918 .. 3.899) = 0.00171313
# N° de
# partículas
# Frecuencia observada
# Frecuencia esperada
# 5-9
# 1
0.022*100 = 2.2
# 10 - 14
# 10
11
2.2 + 13.4 = 15.6
0.134*100 = 13.4
# 15 - 19
# 37
0.333*100 = 33.3
# 20 - 24
# 36
0.341*100 = 34.1
# 25 - 29
# 13
0.143*100 = 14.3
# 30 - 34
# 2
16
14.3 + 2.5 + 0.171 = 16.971
0.025*100 = 2.5
# 35 - 39
# 1
1.713*10^-3*100 = 0.1713
n := 100
# 1  Hipótesis nula:  Los datos pueden considerarse como una muestra aleatoria de una muestra población normal.
# Hipótesis alternativa:  No pueden considerarse de esa manera.
# 2  Nivel de significación: α=0.05
α := 0.05
# 3  Criterio:
k := 4
m := 2
ν := k - m - 1 = 1  # Grados de libertad
chi05 := qchisq(1 - α, ν) = 3.84146
t := 0, 0.01 .. 5
# Se rechaza la hipótesis nula si χ^2 > 3.841.
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# 4  Cálculos:
χ2 := (11 - 15.6)^2/15.6 + (37 - 33.3)^2/33.3 + (36 - 34.1)^2/34.1 + (16 - 16.971)^2/16.971 = 1.92894
# 5  Decisión: Se acepta la hipótesis nula porque 1.929 < 3.841, por lo tanto los datos pueden considerarse como una muestra aleatoria de una muestra población normal.
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