# Problema 10 Determine, sobre la base de los datos muestrales que se dan en la siguiente tabla, si la verdadera proporción de compradores que prefieren el detergente A sobre el detergente B es la misma en las tres ciudades:
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# Use el nivel de significancia de 0.05
pma := 232/400 = 0.58
pca := 260/500 = 0.52
psja := 197/400 = 0.4925
psjb := 203/400 = 0.5075
pmb := 168/400 = 0.42
pcb := 240/500 = 0.48
# 1  Hipótesis nula:  pm = pc = psj
# Hipótesis alternativa:  No son iguales
# 2  Nivel de significación: α=0.05
α := 0.05
# 3  Criterio:
k := 3  # Poblaciones
ν := k - 1 = 2  # Grados de libertad
t := 0, 0.01 .. 10
chi05 := qchisq(1 - α, ν) = 5.99146
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# 4  Cálculos:
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# Frecuencias esperadas
# 212 | 188
# 265 | 235
# 212 | 188
chi := (232 - 212)^2/212 + (260 - 265)^2/265 + (197 - 212)^2/212 + (168 - 188)^2/188 + (240 - 235)^2/235 + (203 - 188)^2/188 = 6.4733
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# 5  Decisión: Se rechaza la hipótesis nula, por lo tanto las proporciones no son
# iguales.
# Problema 11 Use los datos que se muestran en la siguiente tabla para evaluar con un nivel de significancia de 0.01 si la habilidad de una persona en matemáticas es independiente de su interés en las estadísticas
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# 1  Hipótesis nula:  la habilidad de una persona en matemáticas es independiente de su interés en las estadísticas
# Hipótesis alternativa:  No son independientes
# 2  Nivel de significación: α=0.01
α := 0.01
# 3  Criterio:
r := 3
c := 3
ν := (r - 1)*(c - 1) = 4  # Grados de libertad
chi01 := qchisq(1 - α, ν) = 13.2767
t := 0, 0.01 .. 15
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# 4  Cálculos:
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# Frecuencias esperadas
# 45 | 50 | 23.33
# 56.25 | 62.5 | 29.167
# 33.75 | 37.5 | 17.5
chi := (232 - 212)^2/212 + (260 - 265)^2/265 + (197 - 212)^2/212 + (168 - 188)^2/188 + (240 - 235)^2/235 + (203 - 188)^2/188 + (168 - 188)^2/188 + (240 - 235)^2/235 + (203 - 188)^2/188 = 9.90415
chi := 33.47
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# 5  Decisión: Se rechaza la hipótesis nula, por lo tanto no son independientes.
# Problema 12 Se supone que el número de defectos en las placas de circuito impreso sigue una distribución de Poisson. Se recolectó una muestra aleatoria de n =60 placas y se observó el siguiente número de defectos.
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# Hacer la correspondiente Prueba de Hipótesis sobre la Bondad de Ajuste con α = 0.05.
λ := (0*32 + 1*15 + 2*9 + 3*4)/60 = 0.75
# 1  Hipótesis nula:  Distribución de Poisson con λ=0.75
# Hipótesis alternativa:  No tiene dicha distribución.
# 2  Nivel de significación: α=0.05
α := 0.05
# 3  Criterio:
k := 4
m := 1
ν := k - m - 1 = 2  # Grados de libertad
chi05 := qchisq(1 - α, ν) = 5.99146
t := 0, 0.01 .. 15
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# 4  Cálculos:
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# Frecuencias esperadas
# 45 | 50 | 23.33
# 56.25 | 62.5 | 29.167
# 33.75 | 37.5 | 17.5
chi := (232 - 212)^2/212 + (260 - 265)^2/265 + (197 - 212)^2/212 + (168 - 188)^2/188 + (240 - 235)^2/235 + (203 - 188)^2/188 + (168 - 188)^2/188 + (240 - 235)^2/235 + (203 - 188)^2/188 = 9.90415
chi := 33.47
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# 5  Decisión: Se rechaza la hipótesis nula, por lo tanto no son independientes.
