# Worksheet setting: ORIGIN = 1
# Problema V-1
# En la siguiente Tabla, y es la pureza del oxígeno producido en un proceso de destilación química, y x es el porcentaje de hidrocarburos que están presentes en el condensador principal de la unidad de destilación.
# a)  Representar el diagrama de dispersión
# b) Ajustar un modelo de regresión lineal simple a los datos de pureza de oxígeno de la Tabla
# c )  Evaluar a cuanto corresponderia un valor de x = 1.10
#
# Número de  Nivel de  Pureza
# Observación  hidrocarburo
# x (%)  y (%)
# 1  0.99  90.01
# 2  1.02  89.05
# 3  1.15  91.43
# 4  1.29  93.74
# 5  1.46  96.73
# 6  1.36  94.45
# 7  0.87  87.59
# 8  1.23  91.77
# 9  1.55  99.42
# 10  1.40  93.65
# 11  1.19  93.54
# 12  1.15  92.52
# 13  0.98  90.56
# 14  1.01  89.54
# 15  1.11  89.85
# 16  1.20  90.39
# 17  1.26  93.25
# 18  1.32  93.41
# 19  1.43  94.98
# 20  0.95  87.33
A := READPRN("C:\Users\Lucas\Documents\01 A Facultad\3° Año\1° Semestre\Estadistica II\TPs\TP 4\ej1_tp_5.txt")
rows(A) = 20
cols(A) = 3
x := A[:, 2]
y := A[:, 3]
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n := length(x) = 20
i := 1 .. n
sum(y[i], i) == n*a + b*sum(x[i], i)
sum(x[i]*y[i], i) == a*sum(x[i], i) + b*sum(x[i]^2, i)
[a; b] := [n, sum(x[i], i); sum(x[i], i), sum(x[i]^2, i)]^-1*[sum(y[i], i); sum(x[i]*y[i], i)]
a = 74.2833  # Ordenada al origen
b = 14.9475  # Pendiente
t := min(x), min(x) + 0.01 .. max(x)
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# c )
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a + b*1.1 = 90.7255
x := 0
y := 0
y := READPRN("C:\Users\Lucas\Documents\01 A Facultad\3° Año\1° Semestre\Estadistica II\TPs\TP 4\covid.txt")
n := length(y) = 58
i := 1 .. n
x[i] := i
[a; b] := [n, sum(x[i], i); sum(x[i], i), sum(x[i]^2, i)]^-1*[sum(y[i], i); sum(x[i]*y[i], i)]
a = -2.99819  # Ordenada al origen
b = 2.68726  # Pendiente
t := min(x), min(x) + 0.01 .. max(x)
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# c )
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# Problema 2:
# Considere los siguientes datos sobre el número de horas que 10 personas estudiaron para un examen de francés y sus puntajes en el examen:
#
# Horas(x)  Score (y)
# 4  31
# 9  58
# 10  65
# 14  73
# 4  37
# 7  44
# 12  60
# 22  91
# 1  21
# 17  84
# a)  Hacer el ajuste lineal y hallar la suma de cuadrados de error.
# b)  Hallar el Score para  x=14hs. con la ecuación predictora.
# c)  Hallar el error estándar de estimación (se)
# a )
x := transpose([4, 9, 10, 14, 4, 7, 12, 22, 1, 17])
y := transpose([31, 58, 65, 73, 37, 44, 60, 91, 21, 84])
α := 0.05
n := length(x) = 10
i := 1 .. n
sum(y[i], i) == n*a + b*sum(x[i], i)
sum(x[i]*y[i], i) == a*sum(x[i], i) + b*sum(x[i]^2, i)
[a; b] := [n, sum(x[i], i); sum(x[i], i), sum(x[i]^2, i)]^-1*[sum(y[i], i); sum(x[i]*y[i], i)]
a = 21.6926  # Ordenada al origen
b = 3.47074  # Pendiente
t := min(x), min(x) + 0.01 .. max(x)
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q := sum((y[i] - (a + b*x[i]))^2, i) = 223.078
# b )
a + b*14 = 70.283  # Estimacion al valor 14
a + b*16 = 77.2245  # Estimacion al valor 16
# c )
s_e := sqrt(1/(n - 2)*q) = 5.2806
# Problema 3
# Con referencia a los datos del problema anterior  relacionados con la cantidad de tiempo que 10 personas estudiaron para una determinada prueba y los scores (puntajes) que obtuvieron, pruebe la hipótesis nula β = 3 contra la hipótesis alternativa β> 3 en el nivel 0.01 de significancia
b = 3.47074
# 1  Hipotesis nula: β = 3
# Hipotesis alternativa: β > 3
# 2 Nivel de significacion:
α := 0.01
# 3 Criterio:
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ν := n - 2 = 8  # Grados de libertad
t01 := qt(1 - α, ν) = 2.89646
w := -4, -3.99 .. 4
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# 4 Calculos:
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Sxx := n*sum(x[i]^2, i = 1 .. n) - sum(x[i], i = 1 .. n)^2 = 3760
t := (b - 3)/s_e*sqrt(Sxx/n) = 1.72861
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# 5 Decision:
# Se acepta la hipotesis nula, β es significativamente igual a 3
x := 0
y := 0
# Problema 4:
# Ajustar los siguientes datos mediante una exponencial del tipo α*β^x
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x := transpose([2, 2.5, 3, 4, 5, 5.4, 8])
y := transpose([5.891, 7.669, 8.9, 13.65, 19.52, 22.94, 64.93])
n := length(x) = 7
i := 1 .. n
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log(y) == log(α*β^x) == log(α) + x*log(β)
Ly := log(y)
transpose(Ly) = [0.770189, 0.884739, 0.94939, 1.13513, 1.29048, 1.36059, 1.81245]
[a; b] := [n, sum(x[i], i); sum(x[i], i), sum(x[i]^2, i)]^-1*[sum(Ly[i], i); sum(x[i]*Ly[i], i)] = [0.440113; 0.17131]
α := 10^a = 2.75495
β := 10^b = 1.48358
t := min(x), min(x) + 0.01 .. max(x)
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x := 0
y := 0
# Problema 5:
# Ajustar los siguientes datos mediante una potencial del tipo α*x^β
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x := transpose([1.4, 2.7, 2.9, 4, 5.3, 5.9, 7, 8])
y := transpose([2.296, 1.42, 1.065, 1.119, 0.8449, 0.9443, 0.7344, 0.2841])
n := length(x) = 8
i := 1 .. n
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Ly := log(y)
Lx := log(x)
[a; b] := [n, sum(Lx[i], i); sum(Lx[i], i), sum(Lx[i]^2, i)]^-1*[sum(Ly[i], i); sum(Lx[i]*Ly[i], i)] = [0.524418; -0.897512]
β := b = -0.897512
α := 10^a = 3.34517
t := min(x), min(x) + 0.01 .. max(x)
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x := 0
y := 0
# Problema 6:
# Ajustar los siguientes datos mediante una recíproca del tipo 1/(α + β x)
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x := transpose([0.2, 0.9, 2, 2.5, 3, 4, 6.1, 6.5])
y := transpose([0.3659, 0.2803, 0.2362, 0.1671, 0.1512, 0.1569, 0.09206, 0.08787])
n := length(x) = 8
i := 1 .. n
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y^-1 == α + β*x
[a; b] := [n, sum(x[i], i); sum(x[i], i), sum(x[i]^2, i)]^-1*[sum(1/y[i], i); sum(x[i]/y[i], i)] = [2.13748; 1.37496]
β := b = 1.37496
α := a = 2.13748
t := min(x), min(x) + 0.01 .. max(x)
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x := 0
y := 0
# Problema 7:
# Ajustar los siguientes datos mediante un polinomio de grado 3
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x := transpose([0.4, 1.5, 2, 2.7, 3, 3.5, 3.9, 4, 4.5, 5])
y := transpose([18.54, 19.88, 18.49, 16.03, 15.95, 16.83, 20.95, 21.22, 27.96, 37.92])
n := length(x) = 10
i := 1 .. n
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[a; b; c; d] := [
    n, sum(x[i], i), sum(x[i]^2, i), sum(x[i]^3, i);
    sum(x[i], i), sum(x[i]^2, i), sum(x[i]^3, i), sum(x[i]^4, i);
    sum(x[i]^2, i), sum(x[i]^3, i), sum(x[i]^4, i), sum(x[i]^5, i);
    sum(x[i]^3, i), sum(x[i]^4, i), sum(x[i]^5, i), sum(x[i]^6, i)
]^-1*[sum(y[i], i); sum(x[i]*y[i], i); sum(x[i]^2*y[i], i); sum(x[i]^3*y[i], i)] = [15.9021; 9.30889; -6.17688; 1.04212]
t := min(x), min(x) + 0.01 .. max(x)
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x := 0
y := 0
# Problema 8:
# De una encuesta de presupuestos familiares se han obtenido los siguientes datos mensuales:
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# (a) Construir un modelo para explicar el gasto en teléfono en función de la renta familiar y el tamaño de la familia.
# (b) Cuánto sería el gasto en teléfono para una renta familiar de $100000 y un tamaño familiar de 5 personas?
# a )
