C := READPRN("C:\Users\Lucas\Documents\01 A Facultad\3° Año\1° Semestre\Estadistica II\TPs\TP 3\covid.txt")
i := 0 .. rows(C) - 1
x[i] := i
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k := 1 .. length(C) - 1
CA[0] := C[0]
CA[k] := sum(C[i], i = 0 .. k)
CA[length(C) - 1] = 4424
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a := 1
b := 2
c := -1
Given
sum(C[i], i) - a*rows(C) - b*sum(x[i], i) - c*sum(x[i]^2, i) == 0
sum(C[i]*x[i], i) - a*sum(x[i], i) - b*sum(x[i]^2, i) - c*sum(x[i]^3, i) == 0
sum(C[i], i) = 4424
sum(C[i]*x[i]^2, i) - a*sum(x[i]^2, i) - b*sum(x[i]^3, i) - c*sum(x[i]^4, i) == 0
X := Find(a, b, c) = [-16.7802; 4.45183; -0.0309574]
Y[i] := X[0] + X[1]*x[i] + X[2]*x[i]^2
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