# Worksheet setting: ORIGIN = 1
# Problema 1:
# Se quiere evaluar la eficacia de distintas dosis de un fármaco contra la hipertensión arterial, comparándola con la de una dieta sin sal. Para ello se seleccionan al azar 25 hipertensos y se distribuyen aleatoriamente en 5 grupos. Al primero de ellos no se le suministra ningún tratamiento, al segundo una dieta con un contenido pobre en sal, al tercero una dieta sin sal, al cuarto el fármaco a una dosis determinada y al quinto el mismo fármaco a otra dosis. Las presiones arteriales sistólicas de los 25 sujetos al finalizar los tratamientos son:
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# Elaborar la Tabla de Análisis de la Varianza
Y := [
    180, 172, 163, 158, 147;
    173, 158, 170, 146, 152;
    175, 167, 158, 160, 143;
    182, 160, 162, 171, 155;
    181, 175, 170, 155, 160
]
α := 0.05  # Nivel de significancia
k := 5  # Numero de tratamientos
n := 5  # Tamaño de la muestra
i := 1 .. k
j := 1 .. n
y[i] := mean(Y[:, i])
y = [178.2; 166.4; 164.6; 158; 151.4]  # Vector de medias
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s2w := 1/(k*(n - 1))*sum(sum((Y[j, i] - y[i])^2, j = 1 .. n), i = 1 .. k) = 44.72  # Cambia respecto del apunte porque las muestras estan dadas en las columnas
s2w := 1/(k*(n - 1))*sum(sum((transpose(Y)[i, j] - y[i])^2, j = 1 .. n), i = 1 .. k) = 44.72  # Cualquier opcion es lo mismo
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s2h := n/(k - 1)*sum((y[i] - mean(y))^2, i = 1 .. k) = 502.66
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F == SS(Tr)/(k - 1)/(SSE/(k*(n - 1))) == MS(Tr)/MSE == s2h/s2w
F := s2h/s2w = 11.2402
ν1 := k - 1 = 4  # Grados de libertad del numerador
ν2 := k*(n - 1) = 20  # Grados de libertad del denominador
t := 0, 0.01 .. 5
F05 := qF(1 - α, ν1, ν2) = 2.86608
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# Decision:
# Se rechaza la hipotesis nula, la medicacion reduce la tension.
# Problema 2:
# Queremos comparar el consumo de combustible de diferentes tipos de automóvil, pero también de diferentes tipos de conductores. En concreto, es posible que nos interese saber c6mo influye la edad de los conductores en el consumo de combustible. Para eso, podemos subdividir los conductores en grupos de edad. Podríamos utilizar los seis grupos de edad siguientes (en años):
#
# 1. 25 años 0 menos
# 2. 26-35
# 3. 36-45
# 4. 46-55
# 5. 56-65
# 6. Más de 65
#
# A continuación, podemos organizar nuestro experimento de tal forma que un automóvil de cada grupo sea conducido por un conductor de cada grupo de edad.
# Contrastar la hipótesis de que las medias poblacionales del consumo de combustible de todos los tipos de automóvil son iguales, podemos además contrastar la hipótesis de que las medias poblacionales del consumo medio de combustible de todos los grupos de edad son iguales.
# Todo esto con un nivel de significación α = 0.05.
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Y := [
    25.1, 23.9, 26, 75;
    24.7, 23.7, 25.4, 73.8;
    26, 24.4, 25.8, 76.2;
    24.3, 23.3, 24.4, 72;
    23.9, 23.6, 24.2, 71.7;
    24.2, 24.5, 25.4, 74.1;
    148.2, 143.4, 151.2, 442.8
]
μf := Y[:, 4]/3 = [25; 24.6; 25.4; 24; 23.9; 24.7; 147.6]
μc := transpose(Y)[:, 7]/6 = [24.7; 23.9; 25.2; 73.8]  # Los ultimos de los valores se deben despreciar
# 1 Hipotesis nula 1: El consumo de combustible no depende de la edad
# Hipotesis alternativa 1: Si depende de la edad
# Hipotesis nula 2: El consumo de combustible no depende del tipo de auto
# Hiporesis alternativa 2: Si depende del tipo
# 2 Nivel de significacion: 0.05
α := 0.05
# 3 Criterio:
ν1 := 5  # Grados de libertad de los tratamientos
ν2 := 2  # Grados de libertad de los bloques
ν4 := 17  # Grados de libertad total
ν3 := ν4 - ν1 - ν2 = 10  # Grados de libertad de error
F105 := qF(1 - α, ν1, ν3) = 3.32583
F205 := qF(1 - α, ν2, ν3) = 4.10282
t := 0, 0.1 .. 6
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# 4 Calculos:
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a := 6
b := 3
Tpp := Y[a + 1, b + 1] = 442.8
C := 1/(a*b)*Tpp^2 = 10892.9
SST := sum(sum(Y[i, j]^2, j = 1 .. b), i = 1 .. a) - C = 11.88
SSTr := 1/b*sum(Y[i, 4]^2, i = 1 .. a) - C = 4.98
SSTBl := 1/a*sum(Y[7, j]^2, j = 1 .. b) - C = 5.16
SSE := SST - SSTr - SSTBl = 1.74
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T_punto_i := Y[:, b + 1]
transpose(T_punto_i) = [75, 73.8, 76.2, 72, 71.7, 74.1, 442.8]
T_j_punto := transpose(Y)[:, a + 1]
transpose(T_j_punto) = [148.2, 143.4, 151.2, 442.8]
T_punto_punto := Y[a + 1, b + 1] = 442.8
C := T_punto_punto^2/(a*b) = 10892.9
SST := sum(sum(Y[i, j]^2, j = 1 .. b), i = 1 .. a) - C = 11.88
SS_Tr := 1/b*sum(T_punto_i[i]^2, i = 1 .. a) - C = 4.98
SS_Bl := 1/a*sum(T_j_punto[j]^2, j = 1 .. b) - C = 5.16
SSE := SST - SS_Tr - SS_Bl
MSTr := SSTr/ν1 = 0.996
MSBl := SSTBl/ν2 = 2.58
MSE := SSE/ν3 = 0.174
FTr := MSTr/MSE = 5.72414
FBl := MSBl/MSE = 14.8276
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# 5 Decision:
# Se rechaza las Hipotesis Nulas, el consumo de combustible depende de la edad y del tipo de auto
