x := 0 .. 360
f(x) := tan(x*π/180)
f1(x) := sin(x*π/180)
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# Funcion normal
x := -3, -2.99 .. 3
f(x, μ, σ) := 1/(sqrt(2*π)*σ)*e^(-1/2*((x - μ)/σ)^2)
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z(x, y) := x^2 - y^2
# [component: inputs z]
t := -3, -2.99 .. 3
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integral(dchisq(t, 5), t = 0 .. ∞) = 1
t := 0, 0.01 .. 20
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pchisq(2, 5) = 0.150855
qchisq(0.151, 5) = 2.00105
A := [5, 9, 9; 8, 7, 8; 4, 6, 7]
A[2, 2] = 7
i := 0 .. 40
j := 0 .. 40
B[i, j] := floor(rnd(10))
B =  # no stored result
floor(-2.4) = -3
A^-1 = [-0.0322581, 0.290323, -0.290323; 0.774194, 0.0322581, -1.03226; -0.645161, -0.193548, 1.19355]
v := transpose(B)[:, 2] = [
    7; 1; 7; 9; 6; 5; 4; 2; 5; 2
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]
B^-1 =  # no stored result
rows(B) = 41
cols(B) = 41
A2 := transpose(A)[:, 1]
A1 := transpose(A)[:, 0]
A1*A2 = 175
A2×A1 = [-9; -32; 37]
sum(A1) = 23
