# CLASE DÍA 23 DE MARZO DE 2020
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# Ejemplo III: Si dos muestras aleatorias independientes de tamaños n1=7 y n2= 13 se toman de una población normal ¿Cuál es la probabilidad de que la primera sea al menos 3 veces más grande que la de la segunda?.
ν1 := 7 - 1
ν2 := 13 - 1
# Buscando en tablas de la distribución F con nivel de significancia α = 0.05 y los grados de libertad indicados (6 para numerador y 12 para denominador).
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f(x) := dF(x, ν1, ν2)
x := 0, 0.01 .. 5  # Función densidad de prob.
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# El área a la derecha de la linea azul vertical es 0.05.
1 - pF(3, ν1, ν2) = 0.0498074  # área a la derecha
# INFERENCIAS RELATIVAS A MEDIAS
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# El error  es la diferencia entre la estimación y la cantidad que se supone estima. Para n grande, se puede asegurar con una probabilidad 1- α que la desigualdad
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# será satisfecha.
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# Donde z_(α/2)  es una abscisa tal que el área bajo la curva normal estándar a su derecha es de α/2.
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# a los valores
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# y
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# se los denomina Límites de Confianza.
# Ejemplo I: Un supervisor intenta utilizar la media de una muestra aleatoria de tamaño n=150 para estimar la aptitud mecánica promedio (la cual se mide con una cierta prueba) de los obreros de una línea de ensamblado. Si por su experiencia puede suponer que σ=6.2 para tales datos. ¿Qué podemos asegurar con una probabilidad de 0.99 sobre el Error máximo de Estimación (E).
# Datos:
n := 150
σ := 6.2
α := 0.01
zα005 := qnorm(0.005, 0, 1) = -2.57583
x := -3, -2.99 .. 3
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# El área a la izquierda de la línea azul es de 0.005 (α/2), al igual que el área a la derecha de la negra. Luego, el área central es 0.99 (1-α).
E := -zα005*σ/sqrt(n) = 1.30396  # Error máximo de Estimación (signo menos para hacer positivo el valor)
# Se puede asegurar con una probabilidad del 99% que el error será a lo sumo 1.304.
# Simulación
N := 1000
i := 0 .. N - 1
j := 0 .. n - 1
X[j, i] := (sum(rnd(1), k = 1 .. 12) - 6)*σ  # Matriz n x N con distr. Normal  μ=0 y σ
M[i] := mean(X[:, i])  # vector de medias
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dif[i] := |M[i] - 0|
A[i] := if(dif[i] < E, 1, 0)  # Los valores que quedan por debajo de E, ponen 1 en el vector
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sum(A)/N*100 = 99  # Proporción de valores que quedan dentro del intervalo
# Si se desea usar la media de una muestra grande aleatoria para estimar la media de una población y que se quiere asegurar con probabilidad 1-α que el error será a lo sumo una cantidad predeterminada E, el número de elementos de la muestra debe ser:
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# Ejemplo II: Una investigación quiere determinar el tiempo promedio que un mecánico tarda en intercambiar los neumáticos de un auto, y además desea poder asegurar con una confianza del 95% que el error de su muestra sea a lo sumo de E=0.50 minutos. Si puede presumir, por experiencia que σ=1.6 minutos. ¿Qué tamaño deberá tener la muestra?.
# Datos:
α := 0.05
# nivel de significancia
E := 0.50  # Error máximo
σ := 1.6  # desviación estándar de la población
# Se calcula el valor de
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z025 := qnorm(0.975, 0, 1) = 1.95996
n := (z025*σ/E)^2 = 39.3365
# vale decir, la muestra debe tener un tamaño de 40.
# Para el caso de datos provenientes de una población normal, muestra chica y desviación estándar desconocida,  se debe aplicar el estadístico t.
# Ejemplo III: Una muestra de 10 medidas de diámetro de una esfera dio una media de 10.95 cm y una desviación típica de s=0.15 cm. Hallar los límites de confianza para el diámetro verdadero del a) 95% y b) 99%.
n := 10
s := 0.15
xm := 10.95
# a) 95%
α == 0.05
t025 := qt(0.975, n - 1) = 2.26216
E := t025*s/sqrt(n) = 0.107304
xm - E = 10.8427  # Extremo inferior del intervalo
xm + E = 11.0573  # Extremo superior del intervalo
# Otro ejemplo:
# Ejemplo I: Las medidas de los diámetros de una muestra de 200 cojinetes de bolas hechos por una determinada máquina durante una semana dieron una media de 2.06 cm y una desviación típica de 0.105 cm. Hallar los límites de confianza del a) 95% y b) 99% para el diámetro de todos los cojinetes.
n := 200
xm := 2.06
s := 0.105
# a) para α=0.05
z025 := qnorm(0.975, 0, 1) = 1.95996
E := z025*s/sqrt(n) = 0.014552
xm - E = 2.04545  # Extremo inferior del intervalo
xm + E = 2.07455  # Extremo superior del intervalo
# a) para α=0.01
z005 := qnorm(0.995, 0, 1) = 2.57583
E := z005*s/sqrt(n) = 0.0191246
xm - E = 2.04088  # Extremo inferior del intervalo
xm + E = 2.07912  # Extremo superior del intervalo
_______________________________________________________________________
# UNIDAD II
# PRUEBAS DE HIPÓTESIS
# En vez de estimar el valor de un parámetro, a veces se debe decidir si una afirmación relativa a un parámetro es verdadera o falsa. Vale decir, probar una hipótesis relativa a un parámetro.
# Ejemplo I: Un fabricante de pintura de secado rápido afirma que el tiempo de secado de la misma es de 20 min. El comprador diseña el siguiente experimento: pinta 36 tableros y decide rechazar el producto si el promedio de tiempo de secado de los mismos supera los 20.75 min. Si por experiencia σ=2.4 min, se pregunta cuál es la probabilidad de rechazar la partida aún perteneciendo a una población con media de 20 min.
# Datos:
n := 36  # número de elementos de la muestra
μ := 20  # media de la población (segun el fabricante)
σ := 2.4  # desviación estándar de la población
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xm := 20.75  # límite para la aceptación de que la media es μ, si este valor se supera, se RECHAZA lo aseverado por el fabricante.
# SIMULACIÓN
# Se va a hacer una simulación de N muestras de tamaño n a las que se les calcula la media a cada una de esas muestras. Resultara un vector de N elementos que denotaremos con M.
N := 1000  # Número de muestras sinuladas
i := 0 .. N - 1
j := 0 .. n - 1  # índices
# Matriz n x N que simula el experimento, cada columna corresponde a los valores de una muestra.
X[j, i] := σ*(sum(rnd(1), k = 1 .. 12) - 6) + μ
M[i] := mean(X[:, i])  # M es un vector en el que cada elemento es la media de cada columna
A[i] := if(M[i] > xm, 1, 0)  # Con esta expresión se analiza cada elemento del vector M, asignado a A un 1 si supera el valor crítico xm
# Se suman todos los elementos de A, lo que indica que número de elementos de M superaron el valor de xm (RECHAZO). Al dividir por N se calcula la proporción de rechazos.
α := sum(A)/N = 0
α*100 = 0  # proporción de rechazos (en %)
# CÁLCULO TEÓRICO
# La probabilidad de que el promedio de las muestras exceda 20.75 min a causa del azar se calcula del siguiente modo:
z := (xm - μ)/(σ/sqrt(n)) = 1.875  # abscisa normalizada
# con esta abscisa, se calcula la probabilidad (área hacia la derecha), resultando:
1 - pnorm(z, 0, 1) = 0.0303964
# o bien
integral(dnorm(x, 0, 1), x = z .. ∞) =  # no stored result; disabled  # área a la derecha
x := -3, -2.99 .. 3  # rango de valores (coordenadas normalizadas)
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# Si el gráfico se hiciera en coordenadas absolutas
x := 19, 19.01 .. 21  # rango de valores (coordenadas absolutas)
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integral(dnorm(x, μ, σ/sqrt(n)), x = xm .. ∞) = 0.0303964  # Da el mismo resultado
# Resumiendo
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# Entonces, la probabilidad de rechazar erróneamente la hipótesis μ=20 min es de aproximadamente 0.03, o bien 3%.
# Qué pasaría si la media real fuese μ=21 min. en vez de μ=20 min?
# La probabilidad de obtener una media muestral  menor o igual que 20.75 (y por lo tanto equivocarse en la aceptación, área a la izquierda) está dada por:
μ1 := 21  # Nueva media
z1 := (xm - μ1)/(σ/sqrt(n)) = -0.625  # abscisa normalizada
pnorm(z1, 0, 1) = 0.265986  # área bajo la curva (hacia la izquierda)
# o bien
integral(dnorm(x, 0, 1), x = -∞ .. z1) = 0.265986
x := -3, -2.99 .. 3  # rango
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# Es decir: la probabilidad de equivocarse al aceptar μ=20 (a pesar de ser μ=21) es del 26.6%. Gráficamente:
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# Resumiendo (coordenadas absolutas)
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# HIPÓTESIS NULA Y PRUEBA DE SIGNIFICANCIA
# A menudo se formula una hipótesis opuesta a lo que se quiere probar. Por ejemplo, si se quiere determinar el sistema de riego de menor costo de dos, se formula la hipótesis de que los dos sean igualmente costosos. A esta hipótesis se la llama Hipótesis Nula y se denota por Ho.
# Reformulemos el ejemplo de la pintura: Se rechaza la hipótesis μ = 20 min (y se acepta la alternativa μ > 20min), si la media de 36 valores muestrales excede 20.75 min, de lo contrario nos reservamos la decisión.
# Aquí no hay posibilidad de Error de tipo II (por lo de reservar la decisión). El criterio anterior puede ser descrito muy bien como una prueba de si xm es significativamente más grande que μ = 20 min, donde “significativamente más grande” significa que la discrepancia entre xm y μ = 20 min es tal que razonablemente puede atribuirse al azar.
# A esta clase de pruebas se las conoce como “Pruebas Significativas”.
# PRECEPTOS PARA LA RESOLUCIÓN DE PROBLEMAS
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# Para el caso de la pintura, Ho (Hipótesis nula): μ = 20 min y Ha (Hipótesis alternativa): μ > 20 min. Esta clase de alternativa se llama Unilateral.
# Un caso de prueba alternativa Bilateral sería el de un fraccionador de café que desea verificar si en cada frasco de 100 gr hay en realidad μ = 100 gr (Ho). La alternativa bilateral es μ <> 100 gr.
# Al fraccionador no le conviene menos de 100 gr porque puede perder mercado ni más de 100 gr por la pérdida económica.
# Ejemplo: Un fabricante de utensilios está considerando la conveniencia de adquirir una nueva máquina para grabar las piezas de lámina metálica. Si μo es el número promedio de piezas de buena calidad grabadas por hora en su máquina actual y si μ es el promedio correspondiente a la nueva máquina, el fabricante quiere probar la hipótesis nula μ= μo contra una alternativa adecuada. ¿Cuál sería la hipótesis si:
# a)  No quiere comprar una nueva máquina a menos que sea más productiva  que aquella con la que trabaja actualmente.
# b)  Quiere comprar la máquina nueva (la cual ofrece algunas otras características atractivas) a menos que sea menos productiva que la que tiene actualmente?
# Solución:
# a) Hipótesis alterna μ > μo (unilateral, cola derecha) y adquirirá sólo si la hipótesis nula puede ser rechazada.
# b) hipótesis alterna μ < μo (unilateral, cola izquierda) y adquirirá a menos que la hipótesis nula pueda ser rechazada.
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# La probabilidad de un Error Tipo I se denomina Nivel de Significación y se fija comunmente en α=0.05 ó α=0.01. No conviene muy chico α porque β se hace muy grande.
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# HIPÓTESIS RELATIVA A UNA MEDIA
#
# Ejemplo I: La duración media de una muestra de 100 tubos fluorescentes producidos por una compañía resulta ser de 1570 horas, con una desviación típica de 120 horas. Si μ es la duración media de todos los tubos producidos por la compañía, comprobar la hipótesis μ = 1600 contra la hipótesis alternativa μ <> 1600 horas con un nivel de significación de 0.05.
# 1 - Hipótesis Nula μ = 1600 hr.
# Hipótesis Alternativa μ <> 1600 hr. (bilateral)
#
# 2 - Nivel de significancia:
α := 0.05
z05i := qnorm(α/2, 0, 1)
z05i = -1.95996  # Cola izquierda
z05d := qnorm(1 - α/2, 0, 1)
z05d = 1.95996  # Cola derecha
# Datos:
n := 100  # Tamaño de la muestra
xm := 1570  # Media de la muestra
s := 120  # Desviación estándar de la muestra
μ := 1600  # media poblacional
# 3 - Criterio: Dado que la muestra es grande (> 30) independientemente de la distribución de los datos, se usa el estadístico z.
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# 4 - Cálculos:
z == (xm - μ)/(s/sqrt(n))
z := (1570 - 1600)/(120/sqrt(100)) = -2.5  # abscisa normalizada
# 5- Decisión - Dado que 2.5 < -z0.025 se Rechaza la Hipótesis Nula, luego la duración media de los tubos es significativamente menor que 1600 horas. Como se puede apreciar en el siguiente gráfico, la media muestral cae fuera de la zona de aceptación:
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# En general, el siguiente cuadro resume las distintas pruebas de hipótesis nulas  μ= μo que se pueden realizar sobre una media:
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# Cola izquierda
# Cola derecha
# Dos colas
# Ejemplo II: Una empresa de transportes desconfía de la afirmación de que la vida útil promedio de ciertos neumáticos es al menos de 28000 hs. Para verificar se colocan 40 neumáticos en camiones y se obtiene una vida útil promedio de 27463 hs con una s=1348 hd. ¿Qué se puede concluir con ese dato si la probabilidad de Error Tipo I es a lo sumo 0.01?.
# Datos:
μ0 := 28000  # media de la hipótesis Nula
n := 40  # Tamaño de la muestra
xm := 27463  # Media de la muestra
s := 1348  # Desviación estándar de la muestra
α := 0.01  # Nivel de significancia de la prueba
# 1 -  Hipótesis Nula, Ho: μ = 28000
# Hipótesis Alternativa, Ha: μ > 28000 (unilateral, cola derecha)
#
# 2 -  Nivel de significancia: α = 0.01.
#
# 3 -  Criterio: El ser la muestra grande (n>30) se utiliza el estadístico z.
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z01 := qnorm(0.01, 0, 1) = -2.32635  # Valor crítico de la prueba
# z01 es un valor crítico. Si la media de la muestra (normalizada) está por encima de él, se acepta Ho, si NO se rechaza y se acepta Ha.
# 4 -  Cálculos
z == (xm - μ0)/(s/sqrt(n))
z := (27463 - 28000)/(1348/sqrt(40)) = -2.5195  # abscisa normalizada
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# 5 -  Decisión: Dado que el valor de la media normalizada (z = -2.52) está por debajo del valor crítico (z01 = -2.326) se Rechaza la Hipótesis Nula, luego la vida útil de los neumáticos es significativamente menor que 28000.
# Como se puede apreciar en el gráfico, la media muestral (normalizada, linea azul) cae fuera de la zona de aceptación (derecha de la línea roja).
# CURVAS CARACTERÍSTICAS DE OPERACIÓN
#
# ANALISIS PARA COLA DERECHA
#
# Hasta el momento no se han atendido a los Errores Tipo II. La elección de μ=21 min en el tiempo de secado fue arbitraria. Veremos qué sucede con otros valores de μ.
# L(μ) será la probabilidad de aceptar la Hipótesis Nula ( μ > μ0, cola derecha,
# aún siendo la media  μ=21, para distintos valores de μ.
# Rescatando el ejemplo de la pintura: en que μ0 = 20, σ = 2.4 y n=36 y la línea divisoria del criterio en xm = 20.75
μ0 := 20
σ := 2.4
n := 36
xm := 20.75
i := 0 .. 15  # Índice para obtener 16 valores de μ
μ[i] := 18 + 0.25*i  # Vector con las variaciones de μ
z[i] := (xm - μ[i])/(σ/sqrt(n))  # coordenada normalizada
L[i] := pnorm(z[i], 0, 1)  # Probabilidad de aceptar la Ho (cola izquierda)
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# Gráficamente
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# ANALISIS PARA COLA IZQUIERDA
# Si la hipótesis alterna fuese la contraria ( μ < μo, cola izquierda) con los datos μo = 20 , σ = 2.4, n=36, y la línea divisoria de criterio en xm = 19.25.
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μ0 := 20
σ := 2.4
n := 36
xm := 19.25
i := 0 .. 15  # Índice para obtener 16 valores de μ
μ[i] := 18 + 0.25*i  # Vector con las variaciones de μ
z[i] := (xm - μ[i])/(σ/sqrt(n))  # coordenada normalizada
Liz[i] := 1 - pnorm(z[i], 0, 1)  # Probabilidad de aceptar la Ho (cola derecha)
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# ANALISIS PARA DOS COLAS
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# ANALISIS PARA MUESTRAS DE MAYOR TAMAÑO
# Volviendo al caso testigo de las pinturas, se analizará qué ocurre con L(μ) cuando la muestra es más grande, como por ejemplo n=100 (antes n=36), con los datos μo = 20 , σ = 2.4, y las línea divisorias del criterio
μ0 := 20
σ := 2.4
n1 := 100
xm := 20.75
i := 0 .. 15  # Índice para obtener 16 valores de μ
μ[i] := 18 + 0.25*i  # Vector con las variaciones de μ
z[i] := (xm - μ[i])/(σ/sqrt(n1))  # coordenada normalizada
L1[i] := pnorm(z[i], 0, 1)  # Probabilidad de aceptar la Ho (cola izquierda)
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# ALGORITMO PARA EL TRAZADO DE LAS CURVAS DE OPERACIÓN
β(d, n, α) == 0.5 + integral(dnorm(x, 0, 1), x = 0 .. qnorm(1 - α, 0, 1) - d*sqrt(n))
# donde
d == |μ0 - μ1|/σ  # μ0 es la media de la Ho y μ1 la media de la población real
# Si se representa gráficamente, se puede observarel comportamiento del Error II (β) con la variaciñon de d
α := 0.05
β(d, n, α) := (0.5 + integral(dnorm(x, 0, 1), x = 0 .. qnorm(1 - α, 0, 1) - d*sqrt(n)))
d := -1, -0.99 .. 3  # rango para d
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# En la literatura, se han hecho gráficos para calcular mediante ellos el error tipo II para distintos valores de d, usando el tamaño muestral (n) como parámetro y con valores de nivel de significancia de 0.01 y 0.05, para muestras de una cola y de dos colas..Para 1 cola y α =0.05:
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# Ejemplo: Suponer que se desea investigar la afirmación de que la intensidad de sonido de ciertas aspiradoras es una variable aleatorias que tiene una distribución normal con una media de 75.2 db, con una desviación estándar de 3.6 db. Específicamente, se quiere probar la hipótesis nula μ=75.2 contra la hipótesis alternativa μ > 75.2 en base a la medición de la intensidad del sonido de n=15 de tales máquinas. Si la probabilidad de cometer un error tipo I es α = 0.05 ¿Cuál es la probabilidad de cometer un error tipo II para μ = 77.db?.
# Datos:
μ0 := 75.2  # Media de la Hipótesis Nula
s := 3.6  # Desviación estándar de la muestra
n := 15  # Tamaño de la muestra
# Hipótesis Alternativa:
μ > 75.2  # unilateral, cola derecha
α := 0.05  # Nivel de significancia de la prueba
μ1 := 77  # Media para la que se quiere calcular el Error tipo II (β)
# Se calcula el parámetro d
d1 := |μ0 - μ1|/s
d1 = 0.5
β(d1, 15, α) = 0.385282
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º
