# GENERADOR DE VARIABLES ALEATORIAS UNFORMES
# (Generador de secuencias seudoaleatorias)
#
# Propiedades deseadas
#
# En simulación estocástica las variables aleatorias con distribución uniforme en el intervalo [0,1] son empleadas de muchas maneras:
# • En forma directa.
# • Para generar distribuciones discretas o continuas.
# • Para generar conjuntos de variables aleatorias dependientes (procesos estocásticos y/o distribuciones multivariadas).
#
# Debe quedar bien en claro que en la mayoría de las veces, la performance de una simulación estará fuertemente correlacionada con el generador de uniformes usado. De ahí la importancia del mismo.
# Un generador "razonable" que entrega una secuencia de variables aleatorias con distibución uniforme, debe satisfacer las dos siguientes propiedades:
#
# 1) "repetibilidad" y "portabilidad"
# 2) "velocidad computacional"
#
# Por "repetibilidad" se entiende que, dados los mismos parámetros que lo definen, el generador produzca la misma secuencia siempre que así se deseara.
# "Portabilidad" significa que, sobre las mismas condiciones de definición, una secuencia sea la "misma", independientemente del modo computacional usado para implementar el algoritmo de generación, o del computador usado.
# En cuanto a la "velocidad computacional" la misma está estrechamente ligada a la precisión deseada en los resultados finales de simulación en la que es usado el computador. Cuanto más rápido sea un generador, más resultados serán obtenidos en el mismo tiempo de uso del computador. Esto, en principio hará que la precisión pueda ser incrementada.
#
# Algoritmo Congruencial Lineal
#
# La estructura básica de un algoritmo congruencial lineal es la siguiente:
y[i + 1] == (a*y[i] + c)*mod(M)  # para todo i > 0
# donde a, c e y_0 son enteros del conjunto {0,...,M-1}
# En la terminología usual, a es el multiplicador, c el incremento y M el módulo.
# Si c=0 el generador se llama multiplicativo.
# Para valores de los parámetros M = 2 ^31 - 1 (2 mil millones) y a = 950706376 se presenta uno de los casos de los llamados "generadores multiplicativos óptimos".
a := 950706376
M := 2^31 - 1
N := 10^5  # longitud de la secuencia
c := 100
y[0] := M/2.45  # Semilla
i := 0 .. N - 1  # índice
y[i + 1] := mod(a*y[i] + c, M)
Y := y/M  # Secuencia generada
# Para hacer el histograma
n := 10  # número de subintervalos
k := 0 .. n  # índice
I[k] := min(Y) + (max(Y) - min(Y))/n*k  # Vector de subintervalos
h := hist(I, Y)/N  # vector histograma Normalizado
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# Se ve una disribución uniforme bastante buena.
# Comparando con rnd(1)
x[i] := rnd(1)
n := 10  # número de subintervalos
k := 0 .. n  # índice
I[k] := min(x) + (max(x) - min(x))/n*k  # Vector de subintervalos
h1 := hist(I, x)/N  # vector histograma Normalizado
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