# PRESENTACIONES ESTADÍSTICAS
# Dado un conjunto de datos en el vector x
x := transpose([5, 7, 3, 4, 9, 1, 8, 5, 3, 9])  # vector columna
# se quiere elaborar un histograma, para ello se diseña un vector de intervalos:
I := transpose([0, 3.3, 6.6, 10])
# Se realiza el conteo de las frecuencias en cada subintervalo
h := hist(I, x)
transpose(h) = [3, 3, 4]
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# DISTRIBUCIÓN MUESTRAL DE LA MEDIA (σ conocida)
# Se arrojan dos dados de 4 caras
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# Resultados posibles
# las medias correspondientes a cada muestra son
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# Agrupadas
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# Histograma
# Ejemplo II: Hallar 500 muestras aleatorias de tamaño n=10 extraída de una población que tiene distribución uniforme discreta que responde a la siguiente función densidad:
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N := 500  # Número de muestras
m := 10  # Tamaño de las muestras
i := 0 .. N - 1
j := 0 .. m - 1  # índices
x[j, i] := floor(rnd(10))  # Matriz 10 x 500
M[i] := mean(x[:, i])  # Vector de medias de cada columna (muestra)
# Para formar el vector de intervalos:
n := 7  # número de intervalos deseado
k := 0 .. n  # índice
I[k] := min(M) + (max(M) - min(M))/n*k  # Vector de intervalos
h := hist(I, M)  # vector histograma
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# La teoría dice  que la media de la distribución dada por f(x) está dada por:
μ == sum(x[i]*p[i], i = 0 .. 9)
μ := sum(i*1/10, i = 0 .. 9) = 4.5
# y la varianza por:
σ^2 == sum((x[i] - μ)^2*p[i], i = 0 .. 9)
sum((i - μ)^2*1/10, i = 0 .. 9) = 8.25
# A modo de comparación:
mean(M) = 4.5128
var(M) = 0.800196
# Si bien la media coincide, la varianza debe multiplicarde por m tamaño de las muestras.
var(M)*m = 8.00196
# FÓRMULAS PARA
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# Si una muestra aleatoria de tamaño n se elige de una población que tiene la media μ y varianza σ^2, entonces  es un valor de una variable aleatoria cuya distribución tiene la media μ.
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# Para muestras tomadas de poblaciones infinitas, la varianza de esta distribución es:
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# TEOREMA DE CHEBYSHEV
#
# Cuando la muestra es pequeña (n<30) y se supone que la población no está normalmente distribuida, no es posible utilizar la distribución de probabilidad normal ni la t-Student para construir un intervalo de confianza.
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# haciendo
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# Ejemplo I: Para una muestra de tamaño n=15 tubos de TV, la vida útil media de operación es  = 18900 con una desviación estándar de s = 500. Construir un intervalo de confianza 90% para la media de la población si en este caso la vida útil media de operación de todos los tubos no puede suponerse normalmente distribuida.
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# Si la media proviene de una población grande (n > 30, aún suponiendo que no se conozca la varianza de la misma) es posible definir una variable aleatoria llamada media estandarizada cuyos valores están dados por:
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# y que tiene una distribución normal estándar.
# Ejemplo II: Supóngase los datos del problema anterior, pero con la misma media extraída de una muestra de tamaño n=40
# Como la confianza debe ser del 90%, a ambos lados de la “campana” deben quedar colas con áreas de 5%. Esto implica la siguiente desigualdad que define el intervalo de confianza:
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z5 := qnorm(0.95, 0, 1) = 1.64485
8900 - z5*500/sqrt(40) = 8769.96
8900 + z5*500/sqrt(40) = 9030.04
# TOREMA CENTRAL DEL LÍMITE
#
# Sea la variable aleatoria Y = X_1 + X_2 + … + X_n , donde X_1, X_2, … , X_n son variables aleatorias distribuidas idénticamente, cada una con media μ y varianza finita σ^(2).  Luego la distribución de:
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# se aproxima a una distribución normal estándar cuando n tiende a infinito.
# DISTRIBUCION MUESTRAL DE LA MEDIA (σ desconocida)
#
# Como se ha dicho más arriba, cuando n es grande (mayor de 30) no hay problema en reemplazar a σ por s (desviación estándar de la muestra).
# Si se supone que la muestra no es grande (n menor que 30) pero que proviene de una población normal, se puede probar el siguiente teorema
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# Ejemplo: Un fabricante de fusibles asegura que, con una sobrecarga del 20%, sus fusibles fundirán al cabo de 12.40 minutos (μ) en promedio. Para probar esta afirmación, una muestra de n=20 de los fusibles fue sometida a una sobrecarga del 20% y los tiempos que tardaron en fundirse tuvieron una media de 10.63 minutos y la desviación estándar de 2.48 minutos (s). Si se supone que los datos constituyen una muestra aleatoria de una población normal ¿tienden a apoyar o a refutar la afirmación del fabricante?.
μ := 12.40  # lo que asegura el fabricante
n := 20  # tamaño de la muestra que elige el comprador, dándole sobrecarga
xm := 10.63  # tiempo para la fusión promedio de la muestra
s := 2.48  # desviación estándar del tiempo para la fusión de la muestra
# Se calcula el estadistico t (muestra chica, población normal, varianza desconocida)
t := (xm - μ)/(s/sqrt(n)) = -3.19181
ν := n - 1  # grados de libertad
x := -4, -3.99 .. 4  # rango para la representación de t
f(x) := dt(x, ν)  # función densidad
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# El área a la izquierda de la línea azul vertical está dada por la función pt
pt(t, ν) = 0.00240078
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# Como t < t_0.005 (un valor razonable el de 0.005 para el nivel de significación, área a la izquierda de la línea negra), los datos tienden a refutar la afirmación.
# Los fusibles con sobrecarga del 20% fundirán en menos de 12.40 minutos
# TABLA DE RESUMEN PARA ESTIMACION DE INTERVALOS DE CONFIANZA PARA LA MEDIA DE UNA POBLACI ÓN.
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# DISTRIBUCIÓN MUESTRAL DE LA VARIANZA
# Ejemplo I: Se produce una simulación tal como la de extraer muestras de tamaño n=5 de una población normal estándar (μ=0, σ=1), se calcula la varianza de cada una de estas muestras y finalmente se presenta el histograma para apreciar la forma de la distribución.
# Se puede dimulra una muestra con distribución normal, recurriendo a lo siguiente:
N := 1000
# tamaño de la muestra
i := 0 .. N - 1
x[i] := sum(rnd(1), k = 1 .. 12) - 6  # muestra con distribución normal estándar
# Para verificar esto se elabora un histograma:
n := 10  # cantidad de subintervalos
k := 0 .. n  # índice
I[k] := min(x) + (max(x) - min(x))/n*k  # Vector de subintervalos
h := hist(I, x)/N  # histograma (se divide por N para normalizar)
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# Para cumplimentar el problema se procede a:
m := 5  # tamaño de la muestra extraída de la población
j := 0 .. m - 1
X[j, i] := sum(rnd(1), k = 1 .. 12) - 6  # Matriz 5 x 100, cada columna es una muestra
s2[i] := var(X[:, i])  # Vector de varianzas
n := 10  # cantidad de subintervalos
k := 0 .. n  # índice
I[k] := min(s2) + (max(s2) - min(s2))/n*k
h := hist(I, s2)/N  # histograma (se divide por N para normalizar)
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# La distribución correspondiente es la llamada Chi-cuadrado (χ^2) la cual está tabulada para valores χ^2_(α) (con parámetro ν que son los llamados grados de libertad).  χ^2_(α) es tal que el área bajo la distribución a su derecha es α.
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# Ejemplo II: Una población normal tiene una varianza de 15. Si se extraen muestras de tamaño 5 de esta población ¿Qué porcentaje puede tener varianzas a) menores que 10, (b) mayores que 20, (c) entre 5 y 10.
n := 5
σ2 := 15
ν := n - 1
# a) se calcula el estadístico
ξ2_10 := (n - 1)*10/σ2 = 2.66667
f(x) := dchisq(x, ν)
x := 0, 0.01 .. 15
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# Las varianzas menores que 10 están dadas por el área a la izquierda de la línea azul
A_10 := pchisq(ξ2_10, ν) = 0.38494
# b) se calcula el estadístico para s^2=20:
ξ2_20 := (n - 1)*20/σ2 = 5.33333
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# Las varianzas mayores que 20 están dadas por el área a la derecha de la línea azul
A_20 := 1 - pchisq(ξ2_20, ν) = 0.254773
# c) por diferencia, la probabilidad que la varianza muestral esté entre 10 y 20 es:
A := 1 - A_10 - A_20 = 0.360287  # área entre las dos verticales azules
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# Ejemplo III: Si dos muestras aleatorias independientes de tamaños n1=7 y n2= 13 se toman de una población normal ¿Cuál es la probabilidad de que la primera sea al menos 3 veces más grande que la de la segunda?.
ν1 := 7 - 1
ν2 := 13 - 1
# Buscando en tablas de la distribución F con nivel de significancia α = 0.05 y los grados de libertad indicados (6 para numerador y 12 para denominador).
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f(x) := dF(x, ν1, ν2)
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# El área a la derecha de la linea azul vertical es 0.05.
1 - pF(3, ν1, ν2) = 0.0498074  # área a la derecha
# INFERENCIAS RELATIVAS A MEDIAS
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# El error  es la diferencia entre la estimación y la cantidad que se supone estima. Para n grande, se puede asegurar con una probabilidad 1- α que la desigualdad
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# será satisfecha.
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# Donde z_(α/2)  es una abscisa tal que el área bajo la curva normal estándar a su derecha es de α/2.
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# a los valores
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# y
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# se los denomina Límites de Confianza.
