# HIPÓTESIS RELATIVA A UNA MEDIA
#
# Ejemplo I: La duración media de una muestra de 100 tubos fluorescentes producidos por una compañía resulta ser de 1570 horas, con una desviación típica de 120 horas. Si μ es la duración media de todos los tubos producidos por la compañía, comprobar la hipótesis μ = 1600 contra la hipótesis alternativa μ <> 1600 horas con un nivel de significación de 0.05.
# 1 - Hipótesis Nula μ = 1600 hr.
# Hipótesis Alternativa μ <> 1600 hr. (bilateral)
#
# 2 - Nivel de significancia:
α := 0.05
z05i := qnorm(α/2, 0, 1)
z05i = -1.95996  # Cola izquierda
z05d := qnorm(1 - α/2, 0, 1)
z05d = 1.95996  # Cola derecha
# Datos:
n := 100  # Tamaño de la muestra
xm := 1570  # Media de la muestra
s := 120  # Desviación estándar de la muestra
μ := 1600  # media poblacional
# 3 - Criterio: Dado que la muestra es grande (> 30) independientemente de la distribución de los datos, se usa el estadístico z.
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# 4 - Cálculos:
z == (xm - μ)/(s/sqrt(n))
z := (1570 - 1600)/(120/sqrt(100)) = -2.5  # abscisa normalizada
# 5- Decisión - Dado que 2.5 < -z0.025 se Rechaza la Hipótesis Nula, luego la duración media de los tubos es significativamente menor que 1600 horas. Como se puede apreciar en el siguiente gráfico, la media muestral cae fuera de la zona de aceptación:
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# En general, el siguiente cuadro resume las distintas pruebas de hipótesis nulas  μ= μo que se pueden realizar sobre una media:
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# Cola izquierda
# Cola derecha
# Dos colas
# Ejemplo II: Una empresa de transportes desconfía de la afirmación de que la vida útil promedio de ciertos neumáticos es al menos de 28000 hs. Para verificar se colocan 40 neumáticos en camiones y se obtiene una vida útil promedio de 27463 hs con una s=1348 hd. ¿Qué se puede concluir con ese dato si la probabilidad de Error Tipo I es a lo sumo 0.01?.
# Datos:
μ0 := 28000  # media de la hipótesis Nula
n := 40  # Tamaño de la muestra
xm := 27463  # Media de la muestra
s := 1348  # Desviación estándar de la muestra
α := 0.01  # Nivel de significancia de la prueba
# 1 -  Hipótesis Nula, Ho: μ = 28000
# Hipótesis Alternativa, Ha: μ > 28000 (unilateral, cola derecha)
#
# 2 -  Nivel de significancia: α = 0.01.
#
# 3 -  Criterio: El ser la muestra grande (n>30) se utiliza el estadístico z.
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z01 := qnorm(0.01, 0, 1) = -2.32635  # Valor crítico de la prueba
# z01 es un valor crítico. Si la media de la muestra (normalizada) está por encima de él, se acepta Ho, si NO se rechaza y se acepta Ha.
# 4 -  Cálculos
z == (xm - μ0)/(s/sqrt(n))
z := (27463 - 28000)/(1348/sqrt(40)) = -2.5195  # abscisa normalizada
x := -3, -2.99 .. 3
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# 5 -  Decisión: Dado que el valor de la media normalizada (z = -2.52, negro) está por debajo del valor crítico (z01 = -2.326, azul) se Rechaza la Hipótesis Nula, luego la vida útil de los neumáticos es significativamente menor que 28000.
# Como se puede apreciar en el gráfico, la media muestral (normalizada, linea azul) cae fuera de la zona de aceptación (derecha de la línea roja).
# CURVAS CARACTERÍSTICAS DE OPERACIÓN
#
# ANALISIS PARA COLA DERECHA
#
# Hasta el momento no se han atendido a los Errores Tipo II. La elección de μ=21 min en el tiempo de secado fue arbitraria. Veremos qué sucede con otros valores de μ.
# L(μ) será la probabilidad de aceptar la Hipótesis Nula ( μ > μ0, cola derecha,
# aún siendo la media  μ=21, para distintos valores de μ.
# Rescatando el ejemplo de la pintura: en que μ0 = 20, σ = 2.4 y n=36 y la línea divisoria del criterio en xm = 20.75
μ0 := 20
σ := 2.4
n := 36
xm := 20.75
i := 0 .. 15  # Índice para obtener 16 valores de μ
μ[i] := 18 + 0.25*i  # Vector con las variaciones de μ
z[i] := (xm - μ[i])/(σ/sqrt(n))  # coordenada normalizada
L[i] := pnorm(z[i], 0, 1)  # Probabilidad de aceptar la Ho (cola izquierda)
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# Gráficamente
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# ANALISIS PARA COLA IZQUIERDA
# Si la hipótesis alterna fuese la contraria ( μ < μo, cola izquierda) con los datos μo = 20 , σ = 2.4, n=36, y la línea divisoria de criterio en xm = 19.25.
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μ0 := 20
σ := 2.4
n := 36
xm := 19.25
i := 0 .. 15  # Índice para obtener 16 valores de μ
μ[i] := 18 + 0.25*i  # Vector con las variaciones de μ
z[i] := (xm - μ[i])/(σ/sqrt(n))  # coordenada normalizada
Liz[i] := 1 - pnorm(z[i], 0, 1)  # Probabilidad de aceptar la Ho (cola derecha)
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# ANALISIS PARA DOS COLAS
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# ANALISIS PARA MUESTRAS DE MAYOR TAMAÑO
# Volviendo al caso testigo de las pinturas, se analizará qué ocurre con L(μ) cuando la muestra es más grande, como por ejemplo n=100 (antes n=36), con los datos μo = 20 , σ = 2.4, y las línea divisorias del criterio
μ0 := 20
σ := 2.4
n1 := 100
xm := 20.75
i := 0 .. 15  # Índice para obtener 16 valores de μ
μ[i] := 18 + 0.25*i  # Vector con las variaciones de μ
z[i] := (xm - μ[i])/(σ/sqrt(n1))  # coordenada normalizada
L1[i] := pnorm(z[i], 0, 1)  # Probabilidad de aceptar la Ho (cola izquierda)
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# ALGORITMO PARA EL TRAZADO DE LAS CURVAS DE OPERACIÓN
β(d, n, α) == 0.5 + integral(dnorm(x, 0, 1), x = 0 .. qnorm(1 - α, 0, 1) - d*sqrt(n))
# donde
d == |μ0 - μ1|/σ  # μ0 es la media de la Ho y μ1 la media de la población real
# Si se representa gráficamente, se puede observarel comportamiento del Error II (β) con la variaciñon de d
α := 0.05
β(d, n, α) := (0.5 + integral(dnorm(x, 0, 1), x = 0 .. qnorm(1 - α, 0, 1) - d*sqrt(n)))
d := -1, -0.99 .. 3  # rango para d
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# En la literatura, se han hecho gráficos para calcular mediante ellos el error tipo II para distintos valores de d, usando el tamaño muestral (n) como parámetro y con valores de nivel de significancia de 0.01 y 0.05, para muestras de una cola y de dos colas..Para 1 cola y α =0.05:
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# Ejemplo: Suponer que se desea investigar la afirmación de que la intensidad de sonido de ciertas aspiradoras es una variable aleatorias que tiene una distribución normal con una media de 75.2 db, con una desviación estándar de 3.6 db. Específicamente, se quiere probar la hipótesis nula μ=75.2 contra la hipótesis alternativa μ > 75.2 en base a la medición de la intensidad del sonido de n=15 de tales máquinas. Si la probabilidad de cometer un error tipo I es α = 0.05 ¿Cuál es la probabilidad de cometer un error tipo II para μ = 77.db?.
# Datos:
μ0 := 75.2  # Media de la Hipótesis Nula
s := 3.6  # Desviación estándar de la muestra
n := 15  # Tamaño de la muestra
# Hipótesis Alternativa:
μ > 75.2  # unilateral, cola derecha
α := 0.05  # Nivel de significancia de la prueba
μ1 := 77  # Media para la que se quiere calcular el Error tipo II (β)
# Se calcula el parámetro d
d1 := |μ0 - μ1|/s
d1 = 0.5
β(d1, 15, α) = 0.385282
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# HIPÓTESIS RELATIVA A DOS MEDIAS
#
# Considérese el caso de la discusión acerca de dos métodos de soldadura de rieles ferroviarios, se toman muestras y se decide cuál de ellos es el mejor comparando las medias de sus resistencias en pruebas mecánicas.
# Se consideran dos poblaciones con medias μ_1 y μ_2 y varianzas σ_1^2 y σ^2^2.
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## Se quiere probar la hipótesis nula μ_1 - μ_2= δ, siendo δ una constante, que se determina en base a muestras aleatorias independientes de tamaños n_1 y n_2.
# La prueba dependerá de las diferencias entre las media muestrales
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# y si ambas provienen de poblaciones normales, se define el estadístico:
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# siendo
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# la desviación estándar de la distribución muestral de la diferencia entre las medias muestrales
# Si las distribuciones de dos variables aleatorias independientes tienen las medias μ_1 y μ_2 y las varianzas σ_1^2 y σ_2^2, entonces la distribución de su suma (o diferencia) tiene la media μ_1 + μ_2 (o μ_1 - μ_2) y la varianza  σ_1^2 + σ_2^2.
# Dado que
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# Ello implica
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# Luego, el estadístico queda:
# Ejemplo I: Para probar la afirmación de que la resistencia de un conductor eléctrico puede reducirse en más de 0.050 ohms mediante aleaciones, 32 valores obtenidos de alambre ordinario produjeron xm1 = 0.136 ohms y s1 = 0.004 ohms y 32 valores obtenidos con alambre fabricado en base a aleaciones produjeron xm2 = 0.083 ohms y s2 = 0.005 ohms. ¿Se apoya la afirmación con un nivel de significación de 0.05?
# 1  Hipótesis Nula μ_1 - μ_2 = 0.050
# Hipótesis Alternativa μ_1 - μ_2  > 0.050 (unilateral)
# 2 -  Nivel de significancia: α =0.05. z_(α) = 1.65
# 3 -  Criterio:
z_α := qnorm(0.95, 0, 1)
z_α = 1.64485
x := -3, -2.99 .. 3
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# Se acepta la Ho si z < z_α (izquierda de la línea azul) y se rechaza en caso contrario (derecha de la línea azul) .
# 4 -  Cálculos:
δ := 0.050  # diferencia entre medias
n1 := 32  # tamaño de la muestra 1
xm1 := 0.136  # media de la muestra 1
s1 := 0.004  # desviación estándar de la muestra 1
n2 := 32  # tamaño de la muestra 2
xm2 := 0.083  # media de la muestra 2
s2 := 0.005  # desviación estándar de la muestra 2
z := ((xm1 - xm2) - δ)/sqrt(s1^2/n1 + s2^2/n2)
z = 2.65036
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# 5 -  Como se ve, la línea negra (correspondiente a z) se halla en la zona de rechazo. Por lo tanto se RECHAZA la Ho y se ACEPTA Ha, esto es:
# la aleación reduce significativamente en más de 0.050 ohms la resistencia del conductor
# Ejemplo II: La estatura media de 50 estudiantes de un colegio que tomaban parte en las pruebas atléticas fue de 1.70 mts con desviación estándar de 0.0625 mts, mientras que 50 estudiantes que no mostraban interés en tal participación tenían una estatura media de 1.687 mts con desviación estándar de 0.07 mts. Ensayar la hipótesis de que los estudiantes que participan en pruebas atléticas son más altos que los otros, con un nivel de significancia de 0.05.
# 1  Hipótesis Nula μ_1 - μ_2 = 0 no hay diferencia entre las estaturas medias
# Hipótesis Alternativa μ_1 - μ_2  > 0 (unilateral)
# 2 -  Nivel de significancia: α =0.05. z_(α) = 1.65
# 3 -  Criterio:
z_α := qnorm(0.95, 0, 1)
z_α = 1.64485
x := -3, -2.99 .. 3
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# Se acepta la Ho si z < z_α (izquierda de la línea azul) y se rechaza en caso contrario (derecha de la línea azul) .
# 4 -  Cálculos:
δ := 0  # diferencia entre medias
n1 := 50  # tamaño de la muestra 1
xm1 := 1.70  # media de la muestra 1
s1 := 0.0625  # desviación estándar de la muestra 1
n2 := 50  # tamaño de la muestra 2
xm2 := 1.687  # media de la muestra 2
s2 := 0.07  # desviación estándar de la muestra 2
z := ((xm1 - xm2) - δ)/sqrt(s1^2/n1 + s2^2/n2)
z = 0.979564
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# 5 -  Como se ve, la línea negra (correspondiente a z) se halla en la zona de aceptación Por lo tanto se  ACEPTA la Ho y se RECHAZA la Ha, esto es:
# los estudiantes que participan en pruebas atléticas no son significativamente más altos que los otros
# Cuando n_1 , n_2 o ambos son pequeños (menores que 30) y se desconocen las varianzas de las poblaciones, se puede fundamentar la hipótesis nula μ_1 - μ_2 = δ en un estadístico adecuado t, con tal de suponer a ambas poblaciones normales con σ_1= σ_2 (=σ). En estas condiciones:
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# con σ^2 estimado por ponderación de las sumas de los cuadrados con respecto a las medias muestrales:
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# haciendo las sustituciones correspondientes, se llega a la llamada prueba t bimuestral:
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# con ν = n_1 + n_2 -2  grados de libertad.
# Ejemplo: En una estación agrícola se deseaba ensayar el efecto de un determinado fertilizante sobre la producción de trigo. Para ello se eligieron 24 parcelas de terreno de igual superficie; la mitad de ellas fueron tratadas con el fertilizante y la otra mitad no (grupo control). Todas las demás condiciones fueron las mismas. La media de trigo conseguida fue de 0.264 m3 con una desviación estándar de 0.02 m3, mientras que la media en las parcelas tratadas fue de 0.28 m3 con una desviación estándar de 0.022 m3.
# ¿Puede decirse que hay un incremento significativo en la producción de trigo por el empleo del fertilizante al nivel de significación del 5%?
# 1  Hipótesis Nula μ_1 - μ_2 = 0 la diferencia se debe al azar
# Hipótesis Alternativa μ_1 - μ_2  > 0 (unilateral) el fertilizante incrementa significativamente la producción
# 2 -  Nivel de significancia: α =0.05.
n := 24  # Tamaño muestral
ν := n - 2  # grados de libertad
t05 := qt(0.95, ν)
t05 = 1.71714
x := -3, -2.99 .. 3
# 3 -  Criterio:
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# Se acepta la Ho si z < z_α (izquierda de la línea azul) y se rechaza en caso contrario (derecha de la línea azul) .
# 4 -  Cálculos:
δ := 0  # diferencia entre medias
n1 := 12  # tamaño de la muestra 1
xm1 := 0.28  # media de la muestra 1
s1 := 0.022  # desviación estándar de la muestra 1
n2 := 12  # tamaño de la muestra 2
xm2 := 0.264  # media de la muestra 2
s2 := 0.02  # desviación estándar de la muestra 2
t := ((xm1 - xm2) - δ)/sqrt((n1 - 1)*s1^2 + (n2 - 1)*s2^2)*sqrt(n1*n2*(n1 + n2 - 2)/(n1 + n2))
t = 1.86417
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# 5 -  Como se ve, la línea negra (correspondiente a z) se halla en la zona de rechazo. Por lo tanto se  RECHAZA la Ho y se ACEPTA la Ha, esto es:
# hay un incremento significativo en la producción de trigo por el empleo del fertilizante.
# Al aplicar la prueba t-bimuestral se deben vigilar que las muestras sean independientes. Por ejemplo, no puede utilizarse cuando se trabaja con datos de “antes y después”, para ese caso se utiliza la diferencia de los datos apareados (con su signo).
# Ejemplo: Los siguientes datos son las horas-hombre que se pierden semanalmente en promedio por accidentes en 10 plantas industriales antes y después de implantar un cierto programa de seguridad:
#
# 45 y 36  73 y 60  46 y 44  124 y 119  33 y 35
# 57 y 51  83 y 77  34 y 29  26 y 24  17 y 11
#
# utilizar el nivel de significación de 0.05 para probar si el sistema de seguridad es eficaz.
# 1  Hipótesis Nula μ = 0 la media de la población de diferencia es nula
# Hipótesis Alternativa μ  > 0 (unilateral) el sistema de seguridad es eficaz
# 2 -  Nivel de significancia: α =0.05.
n := 10  # Tamaño muestral
ν := n - 1  # grados de libertad
t05 := qt(0.95, ν)
t05 = 1.83311
x := -3, -2.99 .. 3
# 3 -  Criterio:
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# Se acepta la Ho si z < z_α (izquierda de la línea azul) y se rechaza en caso contrario (derecha de la línea azul) .
# 4 -  Cálculos:
# Se utiliza el estadistico t unimuestral. Para ello se expresa el vector diferencia:
v := transpose([9, 13, 2, 5, -2, 6, 6, 5, 2, 6])
# y se calcula la media y desviación estándar
xm := 1/n*sum(v)
xm = 5.2
s := sqrt((sum(v^2) - n*xm^2)/(n - 1))
s = 4.07704
t := (xm - 0)/(s/sqrt(n))
t = 4.03328
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# 5 -  Como se ve, la línea negra (correspondiente a z) se halla en la zona de rechazo. Por lo tanto se  RECHAZA la Ho y se ACEPTA la Ha, esto es:
# el sistema de seguridad es eficaz.
#
# Esta prueba t se conoce como “Prueba t para Muestras Apareadas”.
