# ESTIMACIÓN DE VARIANZAS
#
# Si bien la varianza muestral s^2 es un estimador insesgado de σ^2, esto no implica que la desviación estándar muestral (s) sea un estimador insesgado de σ.
# En realidad no lo es.
# Sin embargo, para muestras de gran tamaño el sesgo es pequeño y se acostumbra a estimar σ con s.
# Se llama Rango Muestral R, al valor más grande de una muestra menos el más pequeño.
# Dada una muestra de tamaño n de una población normal, puede verificarse que la distribución muestral del rango tiene la media d_2.σ y la desviación estándar d_3.σ. donde d_2 y d_3 son constantes que dependen del tamaño de la muestra.
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# Se verifica que
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# Simulación: Se hallan N muestras de tamaño n=5 de una población normal y se le encuentra a cada una su rango.
N := 1000
# cantidad de muestras
i := 0 .. N - 1
n := 5
# tamaño de cada muestra
j := 0 .. n - 1
X[j, i] := sum(rnd(1), k = 1 .. 12) - 6  # Matriz n x N (simula distribución normal estándar)
R[i] := max(X[:, i]) - min(X[:, i])  # Vector de rangos
mean(R) = 2.35571  # media de rangos
stdev(R) = 0.871354  # desviación estándar de rangos
# Que son aproximadamente los valores correspondientes de la tabla.
#
# Luego R/d2 es un estimador insesgado de σ, y para muestras muy pequeñas.
# El rango se emplea fundamentalmente en Control de Calidad.
# Ejemplo: Las siguiente muestra aleatoria son mediciones de la capacidad de producción de calor (en millones de calorías por tonelada) de especímenes de carbón de una mina:
#
# 8260  8130  8350  8070  8340
#
# usar el rango de la muestra para estima σ de la capacidad de producción de calor del carbón de la mina.
# Dado que n = 5, d2 = 2.326 y el rango vale: R = 8350-8070= 280
# Luego la estimación de σ queda:
v := transpose([8260, 8130, 8350, 8070, 8340])
# vector de datos
n := 5
d3 := 2.326  # valor de d_3 para n=5 (tabla)
σ := (max(v) - min(v))/d3
σ = 120.378
# mientras que calculado directamente da:
stdev(v)*sqrt(n/(n - 1)) = 125.499  # desviación estándar corregida
# Dado que la muestra es chica, la medida que utiliza el rango es la más fiable.
# En la mayoría de las aplicaciones prácticas, la estimación de intervalos para σ o σ_(2) se basan en la desviación estándar muestral o en la varianza muestral.
# En muestras aleatorias de poblaciones normales:
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# Definiendo a χ_(α) como la abscisa que deja a la izquierda un área α para una distribución chi-cuadrado con n-1 grados de libertad, con esto se puede asegurar con probabilidad 1-α que se satisface
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# Operando matemáticamente:
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# Ejemplo: La desviación estándar de las duraciones de una muestra de 20 lámpara eléctricas fue de 100 horas. Hallar los límites de confianza del 95% para la desviación estándar de dichas lámparas.
n := 20
s := 100
α := 0.05
ξ2_025 := qchisq(α/2, n - 1)
ξ2_025 = 8.90652
integral(dchisq(x, n - 1), x = 0 .. ξ2_025) = 0.025  # Verificación
ξ2_975 := qchisq(1 - α/2, n - 1)
ξ2_975 = 32.8523
integral(dchisq(x, n - 1), x = 32.852 .. ∞) = 0.0250022  # Verificación
# El intervalo de confianza para la varianza será
LI := (n - 1)*s^2/ξ2_975
LI = 5783.46  # Límite inferior
LS := (n - 1)*s^2/ξ2_025
LS = 21332.7  # Límite superior
5.783*10^3 < σ^2 < 2.133*10^4  # Intervalo de confianza para la varianza
# y para la desviación estándar:
sqrt(LI) = 76.0491
sqrt(LS) = 146.057
76.049 < σ < 146.057
# Lo que significa que hay un 95% en el nivel de confianza que la desviación estándar estará entre 76.049 y 146.057
# Si el tamaño de la muestra es grande, la distribución muestral de la desviación estándar puede aproximarse a una distribución normal con media σ y desviación estándar σ/(2.n)^(1/2)
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# Luego, el estadistico es
# lo que supone una desigualdad, para un intervalo de confianza (1-α).100%, del tipo:
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# despejando σ
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# que es un intervalo de confianza para σ en muestras de gran tamaño.
# Ejemplo: La desviación estándar de la resistencia a la rotura de 100 cables producidos por una compañía fue de 180 libras. Hallar los límites de confianza del 95% para la desviación estándar de todos los cables producidos por la compañía.
n := 100
s := 180
α := 0.05
z025 := qnorm(0.975, 0, 1.) = 1.95996  # abscisa normalizada
# El intervalo de confianza para la desviación estándar será
LI := s/(1 + z025/sqrt(2*n))
LI = 158.09  # Límite inferior
LS := s/(1 - z025/sqrt(2*n))
LS = 208.96  # Límite superior
158.09 < σ < 208.96  # Intervalo de confianza para la desviación estándar
# Lo que significa que hay un 95% en el nivel de confianza que la desviación estándar estará entre 158.09 y 208.96
# HIPÓTESIS REFERIDA A UNA VARIANZA
# Se considera el problema de probar la hipótesis nula de que la varianza de una población es igual a una determinada, contra una alternativa unilateral o bilateral adecuada.
# Para muestras aleatorias extraídas de una población normal con varianza σ^2 se utiliza el estadístico:
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# Ejemplo: El proceso de bruñido se usa para esmerilar ciertos discos de silicio al grueso apropiado es aceptable sólo si σ (desviación estándar de la población de grosores de los cubitos cortados de dichos discos) es a lo sumo 0.50 mil. Emplear el nivel de significación de 0.05 para probar la hipótesis nula σ = 0.50 contra la hipótesis alterna σ > 0.5 si el grosor de 15 cubitos cortados de tales discos tienen una desviación estándar de 0.64 mil.
σ0 := 0.5  # desviación estándar de referencia
α := 0.05  # nivel de significancia
n := 15  # tamaño de la muestra
s := 0.64  # desviación estándar de la muestra
# 1 -  Hipótesis Nula σ = 0.50
# Hipótesis Alternativa σ > 0.50  (unilateral)
# 2 -  Nivel de significancia:
α = 0.05
chi05 := qchisq(0.95, n - 1) = 23.6848
# 3 -  Criterio:
x := 0, 0.01 .. 40  # rango
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# El área a la izquierda de la línea azul (critica) es α/2, se acepta Ho hacia la derecha, si no se rechaza.
# 4 -  Cálculos: Se usa el estadístico
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chi := (n - 1)*s^2/σ0^2
chi = 22.9376
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# 5 -  Decisión: Al quedar la línea negra a la izquierda de la azul, cae en la zona de ACEPTACIÓN. Vale decir, el grosor de los cubitos tienen una desviación estándar significativamente igual a 0.5 mil.
# Si la muestra tomada de la población tiene un tamaño relativo grande (n > 30) la hipótesis nula se puede probar con:
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# ESTIMACIÓN DE PROPORCIONES
#
# La información que suele disponerse al estimar la proporción es el número de veces x, que un evento ocurre en n ensayos, ocasiones u observaciones.
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# La estimación  puntual suele ser x/n (proporción muestral).
# Para n ensayos que satisfacen la distribución binomial, se verifica
μ == n*p
# media
σ == sqrt(n*p*(1 - p))  # desv. estándar  # (1)
# Ejemplo: se simula una muestra muy grande de distribución binomial y se le calcula la media y la desviación estándar.
N := 10000
n := 10
p := 0.4
R := rbinom(N, n, p)
mean(R) = 3.9885
n*p = 4
stdev(R) = 1.5409
sqrt(n*p*(1 - p)) = 1.54919
# Si en (1) se divide por n, se encuentra la media y la desviación estándar de la proporción de éxitos (es decir la proporción muestral)
μ/n == n*p/n == p
σ/n == sqrt(n*p*(1 - p))/n == sqrt(n*p*(1 - p)/n^2) == sqrt(p*(1 - p)/n)
# La proporción muestral es un estimador insegado del parámetro binomial p (proporción real que se desea estimar a partir de la muestra).
# Ya que x y x/n son variables discretas, un intervalo de confianza de exactamente (1- α).100% es difícil de lograr y para hallar σ/n hace falta conocer p.
# DISTRIBUCIÓN BINOMIAL
# La distribución binomial es una distribución de probabilidad discreta que cuenta el número de éxitos en una secuencia de n ensayos de Bernoulli independientes ente si, con una probabilidas fija p de ocurrencia de "éxito" ente los ensayos. La probabilidad de "fracaso" está dada por q=1-p
# Ejemplo: Se arrojan n =10 monedas legales (p = 0.5) a la vez computando el número de "caras (1)" como "éxito", Cuál es la probabilidad de la suma de los valores.
# Simulación:
N := 1000
# número de ensayos
i := 0 .. N - 1
n := 10
# tamaño de la muestra
j := 0 .. n - 1
p := 0.5  # probabilidad
X[j, i] := round(rnd(1))  # matriz n x N
S[i] := sum(X[:, i])  # vector de N elementos que son suma de los elementos de X
H :=
    for k ∈ 0 .. n
        for i ∈ 0 .. N - 1
            M[i] ← if(S[i] == k, 1, 0)
            H[k] ← sum(M)
    H/N
# con este programa se calcula cuantos elementos de S son 0, 1, ..., 10, luego se normaliza
k := 0 .. n
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# Se comparan los resultados teóricos con los de la simulación
T[k] := dbinom(k, n, p)
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P[k] := n!/(k!*(n - k)!)*p^k*(1 - p)^(n - k)  # Otra expresión de la la función densidad
# x/n COMO UN ESTIMADOR DE p
# El parámetro p (poblacional, proporción) es estimado a través de x/n (proporción muestral).
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# Se puede asegurar con probabilidad de aproximadamente (1- α).100%  que se cumple la siguiente desigualdad:
#
# x0(p) < x < x1(p)
#
# Para transformar esta desigualdad en un intervalo de confianza para p, se recurre a un método gráfico.
# Lo que se está buscando es que para un p determinado, se establezca el intervalo de confianza pedido.
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# Ejemplo: Se desean hallar intervalos con un nivel de confianza del 95%, aproximadamente,  para p en muestras de tamaño n=20.
# Nos vamos a basar en la distribución binomial con n=20, valores de k de 0 a 20 y valores de p de 0.1 a 0.9 de a 0.1 en 0.1.
# Para p=0.1, los valores de densidad binomiales son:
# Como se ve en la figura anterior, donde se fija el valor de p en 0.4, la cola cuya suma de "bastones" está por debajo de α/2 (0.025) a izquierda esta dada por:
dbinom(0, 20, 0.4) + dbinom(1, 20, 0.4) + dbinom(2, 20, 0.4) + dbinom(3, 20, 0.4) + 0 = 0.0159612
# Si agregara uno, se pasaría.
# Esto corresponde a un valor de k=3, por lo tanto x0(0.4)=3.
# Para el otro lado, para la cola derecha:
dbinom(20, 20, 0.4) + dbinom(19, 20, 0.4) + dbinom(18, 20, 0.4) + dbinom(17, 20, 0.4) + dbinom(16, 20, 0.4) + dbinom(15, 20, 0.4) + dbinom(14, 20, 0.4) + dbinom(13, 20, 0.4) = 0.0210289
# Esto corresponde a un valor de k=13, por lo tanto x1(0.4)=13.
# Procediendo del mismo modo para valores de p entre 0.1 y 0.9 de 0.1 en 0.1:
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p := transpose([0.1, 0.2, 0.3, 0.4, 0.5, 0.6, 0.7, 0.8, 0.9])
x0 := transpose([0, 0, 1, 3, 5, 7, 9, 11, 14])
x1 := transpose([6, 9, 11, 13, 15, 17, 19, 20, 0])
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# Para un valor dado de x, es posible obtener cuotas de p, con un nivel de significación del 95%, trazando una línea horizontal de una curva a otra y marcando los valores correspondientes. Para x=9
t := 0 .. 1
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# El intervalo de confianza 95% para x=9 está entre 0.2 y 0.7.
# Si se hiciese una trama de p más fina, quedarían dos curvas. Esto se ha estandarizado en gráficos que se pueden ver en http://www.um.edu.ar/math/estadis/tablas/prob.gif y en http://www.um.edu.ar/math/estadis/tablas/prob1.gif para α=0.05 y α=0.01.
# Para el caso x=9
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# Como regla práctica para que una distribución binomial se acerque a la normal basta con que n.p y (1-p).p sean a la vez mayores que 5.
# Por ejemplo, para n=200 se puede usar la aproximación si p está entre 0.025 y 0.975. Esta es la significación de hacer “n suficientemente grande”.
# Se puede asegurar con una probabilidad 1-α que se cumpla:
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# Para elaqborar un intervalo de confianza se debería despejar p, cosa difícil. La solución es reemplazar p en el denominador del segundo miembro por su estimación x/p.
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# Ahora, operando matemáticamente, el intervalo de confianza queda
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# Ejemplo: si x=36 de n=100 entrevistados están familiarizados con los incentivos en los impuestos que se ofrecen por instalar ciertos dispositivos para ahorrar energía. Construir un intervalo de confianza de 95% para la correspondiente proporción real.
# Datos:
x := 36  # número de "éxitos"
n := 100  # Tamaño de la muestra
α := 0.05
# Nivel de significancia
z025 := qnorm(1 - α/2, 0, 1) = 1.95996
# Dado que el estadístico es z [ya que 0.36*100=36 y (1-0.36)*100=64 son ambos mayores que 5] queda:
x/n - z025*sqrt(x/n*(1 - x/n)/n) = 0.265922  # Extremo inferior
x/n + z025*sqrt(x/n*(1 - x/n)/n) = 0.454078  # Extremo superior
# o sea
0.266 < p < 0.454
# Gráficamente
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# La magnitud del error cometido cuando se usa x/n como un estimador de p está dada por |x/n  p|. En base a la distribución normal, se puede asegurar con probabilidad 1-α que se cumplirá:
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# es decir que el error será a lo sumo:
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# o aproximadamente
# Ejemplo: En una encuesta levantada en una gran ciudad, 136 de 400 personas respondieron afirmativamente a la pregunta de si el sistema de transporte público es adecuado. Con una confianza del 99% ¿Qué se puede decir acerca del error máximo si x/n =136/400=0.34 se emplea como una estimación de la correspondiente población real?.
# Datos:
x := 136  # número de "éxitos"
n := 400  # tamaño de la muestra
α := 0.01  # Nivel de significancia
z005 := qnorm(1 - α/2, 0, 1) = 2.57583
E := z005*sqrt(x/n*(1 - x/n)/n) = 0.0610096  # Error máximo de estimación
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# Int. de confianza
# Gráficamente
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# La fórmula anterior de E puede servir para determinar el tamaño muestral que es necesario para alcanzar un grado deseado de precisión.
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# se puede asegurar con una probabilidad de al menos 1-α que el error de servirse de x/n como una estimación de p, no excede E. Una vez obtenidos los datos, se puede asegurar con una confianza de al menos (1-α).100% que el error no sobrepasa E.
# Esta fórmula no se puede utilizar a menos que se tenga información de p (en base a datos auxiliares, digamos una muestra previa).
# Si no se conoce, se sabe que p.(1-p) es a lo sumo ¼, correspondiente a p=1/2. Luego:
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# Para hallar el máximo del producto p(1-p), se deriva este producto respecto de p y se iguala a cero. Esto es d/dp [p - p^2] = 1 - 2p = 0.
# Luego, p=1/2. Reemplazado, el valor máximo es 1/2(1-1/2) = 1/4
# Ejemplo: Suponer que se desea estimar la proporción real de unidades defectuosas en un cargamento de ladrillos y que se necesita una confianza de al menos 95% de que el error sea a lo sumo de 0.04 ¿De qué tamaño se necesita la muestra si:
# a) No se tiene idea de cómo podría ser la proporción muestral
# b) Se sabe que la proporción real no excede de 0.127
# a) Aplicando lo visto:
z025 := qnorm(0.975, 0, 1) = 1.95996  # valor de z_(α/2)
E := 0.04  # Error máximo de estimación
n := 1/4*(z025/E)^2 = 600.228  # tamaño de la muestra a recabar
# b) Teniendo el dato previo de la proporción:
p := 0.127
n := p*(1 - p)*(z025/E)^2 = 266.191  # tamaño de la muestra a recabar
# Esto ilustra cómo conociendo alguna información auxiliar de p, se puede reducir en gran medida el tamaño de la muestra requerida.
# Cuando p es próximo a 0 (alta confiabilidad) y cuando p es la probabilidad de fracaso, se necesitan intervalos de confianza unilaterales para p chico y n grande, la distribución de Poisson se aproxima  a la binomial.
# Se puede mostrar que:
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# χ^2 | tiene una distribución chi-cuadrado con 2(x+1) g.l.
# Ejemplo: Si hay x=4 fallas en n=2000 partes utilizadas continuamente durante un mes, construir un intervalo unilateral con un nivel de confianza del 99% para la probabilidad de que una de tales partes falle en las condiciones establecidas.
# Datos:
x := 4  # número de fallas
n := 2000  # tamaño de la muestra
α := 0.01  # nivel de significancia
chi := qchisq(1 - α, 2*(x + 1)) = 23.2092  # abscisa
t := 0, 0.1 .. 30
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1/(2*n)*chi = 0.0058023  # Estadístico
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# HIPÓTESIS RELATIVA A UNA PROPORCIÓN
#
# Se considerarán casos de grandes muestras. Se probará la hipótesis nula p = p0 contra las alternativas p < p0 , p > p0 ó p <> p0 mediante al aplicación del siguiente estadístico:
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# Ejemplo: En un estudio diseñado para investigar si ciertos detonadores empleados en explosivos en una mina de carbón cumplen con los requerimientos de que al menos el 90% encenderá el explosivo a ser detonado, se encontró que 174 de 200 funcionaron adecuadamente. Probar la hipótesis nula de que p=0.90 contra la hipótesis alterna p<0.90 con un nivel de significancia de 0.05.
# 1 -  Hipótesis Nula p = 0.90,
# Hipótesis Alternativa p < 0.90  (unilateral, cola izquierda),
# 2 -  Nivel de significancia: α =0.05.
α := 0.05
z05 := qnorm(α, 0, 1) = -1.64485
# 3 -  Criterio
t := -3, -2.99 .. 3
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# Se ACEPTA Ho si el estadístico z cae a la DERECHA de la línea azul, si no se RECHAZA
# 4 -  Cálculos
# Conforme a los datos
x := 174  # número de "éxitos"
n := 200  # tamaño de la muestra (grande)
p0 := 0.9  # proporción de la hipótesis nula
z := (x - n*p0)/sqrt(n*p0*(1 - p0)) = -1.41421  # estadístico para la prueba
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# 5 -  Decisión: Dado que -1.414 > z_0.05 (z0.05 = -1.645) no se Rechaza la Hipótesis Nula. Νo hay suficiente evidencia que la clase determinada de detonador no cumpla
# con las normas.
# La línea negra (z) cae dentro de la zona de ACEPTACIÓN.
# HIPÓTESIS RELATIVA A VARIAS PROPORCIONES
#
# Cuando se compara la respuesta del consumidor (porcentaje favorable y desfavorable) con respecto a diferentes productos, cuando se decide que un proceso permanece constante día a día, etc. interesa probar si dos o más poblaciones binomiales tienen el mismo parámetro p.
# Si estos parámetros son p_(1,) p_2,.., p_k , interesa probar la Hipótesis Nula:
# p_1 = p_2 = … = p_k = p
# contra la Hipótesis Alterna de que no lo sean.
# Bastaría con que uno de ellos fuese significativamente distinto para que la Hipótesis Nula no se cumpla.
# Para aplicar esta técnica se necesitan muestras aleatorias de tamaño n_1, n_2,.., n_k de las k poblaciones.
# Luego, si los números correspondientes de éxitos son x_1, x2,.., x_k respectivamente, la prueba que se utiliza se fundamenta en el hecho que:
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# •  Para grandes muestras la distribución muestral de:
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# es aproximadamente la distribución normal estándar.
# •  El cuadrado de una variable aleatoria, con función densidad normal estándar, es otra variable aleatoria con distribución chi-cuadrado con 1 grado de libertad.
# •  La suma de k variables aleatorias independientes cuyas distribuciones son chi-cuadrado con 1 grado de libertad, es otra variable aleatoria chi-cuadrado con k grados de libertad.
#
# En consecuencia
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# chi-cuadrado con ν=k grados de libertad
# Dado que las p_i son todas iguales por hipótesis, se pueden sustituir por
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# ya que la Hipótesis Nula se debe rechazar si las diferencias entre las x_i y las
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# son grandes, la región crítica es χ2 > χ2α y el número de grados de libertad es k-1.
# La pérdida de un grado de libertada surge de reemplazar a p por su estimación de ^p
# Para calcular χ2 conviene disponer los datos de la siguiente manera:
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# Este cuadro corresponde a los llamados valores observados, notados con o _(i,j)
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# donde i varía ente 1 y dos y k varía entre 1 y k.
# Del mismo modo, de puede formar un cuadro de valores esperados donde el valor de cualquier celda puede obtenerse multiplicando los totales de la columna y del renglón (fila) a los cuales pertenece y dividiendo después por el total general.
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# Por ejemplo: e_(1,1) = n_1.x.
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# En esta notación el estadístico χ^2, con p_i =
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# Ejemplo: Muestras de tres tipos de materiales sujetas a cambios extremos de temperatura producen los resultados que aparecen en la siguiente tabla:
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# utilizar el nivel de significación 0.05 para probar si, bajo las condiciones establecidas, la probabilidad de desmoronamiento es la misma en los tres tipos de materiales
# 1  - Hipótesis Nula: p_1 =  p_2 = p_3
# -  Hipótesis Alternativa: p_1 <>  p_2 <> p_3  (cola derecha)
#
# 2 - Nivel de significancia: 0.05
α := 0.05
# 3 - Criterio:
k := 3  # número de poblaciones
ν := k - 1  # grados de libertad
chi05 := qchisq(0.95, ν) = 5.99146
t := 0, 0.01 .. 15
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# Se ACEPTA Ho si el estadístico z cae a la IZQUIERDA de la línea azul, si no se RECHAZA
# 4 - Cálculos:
o[1, 1] := 41
o[1, 2] := 27
o[1, 3] := 22
# observados
o[2, 1] := 79
o[2, 2] := 53
o[2, 3] := 78
e[1, 1] := 120*90/300
e[1, 2] := 80*90/300
e[1, 3] := 100*90/300
# esperados
e[2, 1] := 120*210/300
e[2, 2] := 80*210/300
e[2, 3] := 100*210/300
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chi := sum(sum((o[i, j] - e[i, j])^2/e[i, j], j = 1 .. k), i = 1 .. 2) = 4.5754  # Estadístico de la prueba
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chi = 4.5754
chi05 = 5.99146
# 5 -  Decisión: Dado que 4.575 < χ^2_α (chi05 =5991) se ACEPTA la Hipótesis Nula. Luego, la probabilidad de desmoronamiento es la misma en los tres tipos de materiales
# La línea negra (chi) cae dentro de la zona de ACEPTACIÓN.
# TABLAS r x c
#
# Se llaman así a aquellas en que los datos se disponen en dos criterios de clasificación que tiene r renglones y c columnas. Es igual que el caso anterior, pero con más de dos resultados posibles. También se las llama Tablas de Contingencia.
# Para el análisis de una tabla r x c, se calculan primero las frecuencias esperadas en cada celda e_(i,j) , es decir multiplicando los totales de los renglones y columnas respectivos y dividiendo por el gran total.
# Sólo es necesario calcular (r-1).(c-1) de las e_(i,j) , las restantes salen por sustracción  de totales en los renglones o columnas apropiadas.
# Luego, el estadístico para el análisis de la tabla r x c es:
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# Se rechaza la Hipótesis Nula si el valor de χ^2 excede a χ^2_α para ν = (r-1).(c-1) grados de libertad.
# Ejemplo: Para determinar si en realidad existe una relación entre el aprovechamiento de un empleado en el programa de capacitación y su rendimiento real en el trabajo, considerada una muestra de 400 casos de archivos muy detallados de los que se obtuvieron los resultados que se ven en la tabla:
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# con el nivel de significancia 0.01 probar la Hipótesis Nula de que el aprovechamiento en el programa de capacitación y el éxito en el trabajo son independientes.
# 1  - Hipótesis Nulat: el aprovechamiento en el programa de capacitación y el éxito en el trabajo son independientes
#
# -  Hipótesis Alternativa: no son independientes
#
# 2 - Nivel de significancia: 0.01
α := 0.01
# 3 - Criterio:
r := 3  # número de filas o renglones
c := 3  # número de columnas
ν := (r - 1)*(c - 1) = 4  # grados de libertad
chi01 := qchisq(0.99, ν) = 13.2767
t := 0, 0.01 .. 15
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# Se ACEPTA Ho si el estadístico χ^2 cae a la IZQUIERDA de la línea azul, si no se RECHAZA
# 4 - Cálculos:
o[1, 1] := 23
o[1, 2] := 60
o[1, 3] := 29
o[2, 1] := 28
o[2, 2] := 79
o[2, 3] := 60  # observados
o[3, 1] := 9
o[3, 2] := 49
o[3, 3] := 63
e[1, 1] := 60*112/400
e[1, 2] := 188*112/400
e[1, 3] := 152*112/400
e[2, 1] := 60*167/400
e[2, 2] := 188*167/400
e[2, 3] := 152*167/400
e[3, 1] := 60*121/400
e[3, 2] := 188*121/400
e[3, 3] := 152*121/400
chi := sum(sum((o[i, j] - e[i, j])^2/e[i, j], j = 1 .. c), i = 1 .. r) = 20.1789  # Estadístico de la prueba
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# 5 -  Decisión: Dado que 20.179 > χ^2_α (chi01 = 13.277) se RECHAZA la Hipótesis Nula.
# Luego, existe diferencia entre el aprovechamiento de un empleado en el programa de capacitación y su éxito en el empleo.
# BONDAD DE AJUSTE
#
# Se habla de Bondad de Ajuste cuando se trata de comparar una distribución de frecuencia observada con los valores correspondientes a una distribución de esperada o teórica.
# Como ejemplo se analizan 400 intervalos de 5 minutos en el control de tráfico aéreo en cuanto a la recepción de mensajes de radio, comparándola con una distribución de Poisson con λ=4.6.
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# La columna correspondiente a Probabilidad de Poisson se obtiene o bien de Tablas (generalmente acumuladas, luego se debe hacer una resta para calcular este valor) o bien resolviendo la siguiente expresión:
e := 2.717
p(λ, k) := λ^k/k!*e^(-λ)  # Densidad de prob. de la distr. de Poisson
# Por ejemplo, para λ = 4.6 y k =3:
p(4.6, 3) = 0.163422  # o bien
dpois(3, 4.6) = 0.163068
# Se han combinado algunos datos de forma que ninguna de las frecuencias esperadas sea menor que 5.
# Para probar las discrepancias entre las frecuencias observadas y las esperadas pueden atribuirse al azar, se usa el estadístico:
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# con k - m - 1 grados de libertad.
# Siendo k el número de términos de la fórmula y m el número de parámetros en la distribución supuesta (en este caso Poisson, λ).
# Problema I: En relación con el caso anterior, probar con un nivel de significación 0.05 si los datos pueden considerarse como una variable aleatoria que tiene distribución de Poisson con λ=4.6.
# 1 - Hipótesis Nula: variable aleatoria que tiene distribución de Poisson con λ=4.6.
# Hipótesis Alternativa: No la tiene.
#
# 2 -  Nivel de significancia: α = 0.05.
α := 0.05
ν := 10 - 1 - 1
chi05 := qchisq(1 - α, ν) = 15.5073  # Límite de aceptación/rechazo
# 3 -  Criterio:
t := 0, 0.1 .. 20
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# Se ACEPTA Ho si el estadístico χ^2  cae a la IZQUIERDA de la línea azul, si no se RECHAZA
# 3 -  Cálculos:
i := 0 .. 13
x[i] := i
λ := 4.6  # tasa de ocurrencia
Frec_obs := transpose([3, 15, 47, 76, 68, 74, 46, 39, 15, 9, 5, 2, 2, 1])
Pp[i] := dpois(i, λ)
transpose(Pp) = [0.0100518, 0.0462384, 0.106348, 0.163068, 0.187528, 0.172526, 0.13227, 0.08692, 0.049979, 0.0255448, 0.0117506, 0.00491389, 0.00188366, 0.000666526]
N := sum(Frec_obs)  # Número de observaciones
Frec_esp[i] := Pp[i]*sum(Frec_obs)
transpose(Frec_esp) = [4.04084, 18.5879, 42.7521, 65.5532, 75.3861, 69.3553, 53.1724, 34.9418, 20.0916, 10.269, 4.72375, 1.97539, 0.757231, 0.267943]
k := 1 .. 8  # índice para tener en cuanta las asociaciones
FE[0] := Frec_esp[0] + Frec_esp[1] = 22.6287  # primer ajuste
FE[k] := Frec_esp[k + 1]
FE[9] := Frec_esp[10] + Frec_esp[11] + Frec_esp[12] + Frec_esp[13] = 7.72431  # último ajuste
# Para las frecuencias esperadas
FO[0] := Frec_obs[0] + Frec_obs[1] = 18  # primer ajuste
FO[k] := Frec_obs[k + 1]
FO[9] := Frec_obs[10] + Frec_obs[11] + Frec_obs[12] + Frec_obs[13] = 10  # último ajuste
# Cálculo del estadístico:
χ^2 == (18 - 22.4)^2/22.4 + .. + (10 - 8)^2/8 == 7.625
chi := sum((FO[k] - FE[k])^2/FE[k], k = 0 .. 9) = 7.62482
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# 5- Decisión: dado que 7.625 < 15.507 (χ ^2_α ) se ACEPTA la hipótesis Nula.
# Luego, la distribución de Poisson λ=4.6 proporciona un buen ajuste.
# Problema II: La siguiente tabla indica la cifra promedio de accidentes por mil horas-hombre  de la muestra de 50 firmas , obtenidas de una industria específica. Probar la hipótesis nula de que las frecuencias observadas en esta muestra siguen una distribución normal, utilizando un nivel de significancia de 0.05.
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# 1 -  Hipótesis Nula: variable aleatoria que tiene distribución Normal.
# Hipótesis Alternativa: No la tiene.
# 2 -  Nivel de significancia: α =0.05.
k := 4
m := 2
ν := k - m - 1 = 1
α := 0.05
chi05 := qchisq(0.95, ν) = 3.84146
# 3 -  Criterio: Se rechaza la Hipótesis Nula si χ2 > 3.841
t := 0, 0.01 .. 6
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# 4 -  Cálculos: Es necesario determinar dos parámetros muestrales, la media y la desviación estándar:
PM := transpose([1.6, 1.9, 2.2, 2.5, 2.8, 3.1])  # puntos medios
NF := transpose([3, 12, 14, 9, 7, 5])  # Número de firmas
TF := sum(NF)  # total de firmas
MP := sum(PM[k]*NF[k], k = 0 .. 5)/TF = 2.32  # Media ponderada
# desviación estándar
s := sqrt((sum(PM[k]^2*NF[k], k = 0 .. 5) - MP^2*TF)/TF) = 0.42
# Para determinar las frecuencias esperadas se arma el siguiente cuadro:
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# La segunda columna se calcula normalizando los valores de la prrimera.
# Para el comienzo:
(1.45 - MP)/s = -2.07143
(1.75 - MP)/s = -1.35714
# La tercera columna se arma tomando el área de la distribución normal entre los extremos recién determinados
integral(dnorm(t, 0, 1), t = -2.071 .. -1.357) = 0.0682112
# En la cuarta columna se multiplican los valores de la tercera por el número de firmas
0.068*50 = 3.4
# En base a esto se puede generar el siguiente cuadro:
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# Y ahora se calcula el estadístico χ2 :
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# 5- Decisión: dado que 2.40 < 3.841, La líea vertical negra está en la zona de ACEPTACIÓN, por lo tanto  No se Rechaza la Hipótesis Nula.
# Luego, la distribución Normal proporciona un buen ajuste.
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