# PRUEBAS NO PARAMÉTRICAS
# Los métodos que suponen normalidad son tomados como los más eficientes (referencia 100%).
# Por ejemplo, para estimar la media (μ) el método más eficiente es la media aritmética.
# Pero también se puede estimar con la mediana. Sin embargo es menos eficiente.
# La eficiencia se mide con la varianza del estimador.
#
# Simulación: Se van a sacar N=10000 muestras de tamaño n=30 de una población de media desconocida y se va a observar la relación entre las varianzas de las estimaciones cuando se usa la media aritmética y la mediana.
N := 10000  # Número de muestras
i := 0 .. N - 1
n := 30
# Tamaño muestral
j := 0 .. n - 1
x[j, i] := sum(rnd(1), k = 1 .. 12) - 6  # Matriz n * N
X_media[i] := mean(x[:, i])  # vector de medias
X_mediana[i] := median(x[:, i])  # vector de medianas
# Para ver el histograma
m := 25  # Número de subintervalos
k := 0 .. m
# Para la media aritmética:
I1[k] := min(X_media) + (max(X_media) - min(X_media))/m*k  # Vector intervalo
# Para la mediana:
I2[k] := min(X_mediana) + (max(X_mediana) - min(X_mediana))/m*k  # Vector intervalo
h1 := hist(I1, X_media)/N  # Histograma de medias aritméticas
h2 := hist(I1, X_mediana)/N  # Histograma de medianas
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var(X_mediana)/var(X_media) = 1.52424  # Relación de varianzas
var(X_media)/var(X_mediana) = 0.656064  # Eficiencia
# La varianza de la distribución muestral de la mediana, en teoría, es casi
# 1.57 σ^2/n, luego la eficiencia de la mediana es 1/1.57 o aproximadamente del 64%.
# Vale decir, la mediana basada en una muestra de tamaño 100 da una estimación tan confiable como la media de tamaño 64, para evaluar la media poblacional (μ) de una normal.
# En cambio la eficiencia del estimador rango para la desviación estándar (σ) de una población normal decrece cuando el tamaño de la muestra crece.
# La eficiencia es del 100 % para n=2; 96% para n=5; 81% para n=15.
# PRUEBA DEL SIGNO
#
# Es una alternativa no paramétrica de la prueba t unimuestral, de la prueba t para muestras apareadas y las correspondientes pruebas para muestras de gran tamaño.
# Se aplica cuando se muestrea una población simétrica, de tal manera que la probabilidad de obtener un valor mayor o menor son ambas iguales a ½.
# Para probar la Hipótesis Nula μ = μ_(0) , contra una alternativa apropiada en base a una muestra de tamaño n, se reemplaza cada valor muestral por un signo "+" si
# μ > 0 ó "-" si μ < 0 y se ignora en caso que μ = μ0.
#
# Después se prueba la Hipótesis Nula que los signos + y  son los resultados de ensayos binomiales con p=1/2.
# Problema: Los siguientes datos integran una muestra aleatoria de 15 mediciones de octanaje de cierto tipo de nafta:
#
# 99.0  102.3  99.8  100.5  99.7  96.2  99.1  102.5
# 103.3  97.4  100.4  98.9  98.3  98.0  101.6
#
# probar la Hipótesis Nula que μ = 98.0 contra la Hipótesis alternativa μ > 98.0 con un nivel de significancia de 0.01.
# 1.  Hipótesis Nula: μ = 98.0 (p=1/2).
# Hipótesis Alternativa: μ > 98.0 (p>1/2).
#
# 2.  Nivel de significancia: α =0.01.
# 3.  Criterio: Se denota con x a los signos positivos. Se rechaza la hipótesis nula si la probabilidad de obtener x o más signos es menor o igual que 0.01.
# 4.  Cálculos: de las comparaciones de 98 con los valores muestrales, surge:
#
# + + + + + - + + + - + + + +  x=12  n=14 (ya que uno de los valores es 98)
# La probabilidad que esto suceda en una distribución binomial está dada por:
sum(dbinom(k, 14, 0.5), k = 12 .. 14) = 0.00646973
P(x ≥ 12)
# 5-  Decisión: dado que 0.0065 < 0.01 Se Rechaza la Hipótesis Nula. Luego, el octanaje promedio excede la media de 98.0.
# La prueba de signo se puede emplear también como alternativa no paramétrica de la prueba t para muestras apareadas o también para la prueba correspondiente para muestras de gran tamaño.
# En tales problemas, cada par de valores muestrales se reemplaza por un signo "+" si el primer valor es mayor que el segundo y con signo "-"  en caso contrario y si son iguales, se descarta.
# Problema: Conforme a un ejemplo anterior, el cual trataba de un programa de seguridad industrial, con la prueba de signo verificar si el programa es eficaz. Los datos eran:
#
# 45 y 36  73 y 60  46 y 44  124 y 119  33 y 35
# 57 y 51  83 y 77  34 y 29  26 y 24  17 y 11
# 1.  Hipótesis Nula: μ1 - μ2 = 0 (p=1/2).
# Hipótesis Alternativa:  μ1 - μ2 > 0  (p>1/2).
#
# 2.  Nivel de significancia: α =0.05.
# 3.  Criterio: Se denota con x a los signos positivos.
# Se rechaza la hipótesis nula si la probabilidad de obtener x o más signos es menor o igual que 0.05.
#
# 4.  Cálculos: reemplazando cada par de valores por un signo + o  según el primero sea mayor que el segundo y viceversa.
#
# + + + + - + + + + +  x=9  n=10
# PRUEBAS DE SUMA DE RANGOS
#
# Existen dos pruebas: la U y la H. La primera es una alternativa no paramétrica de la prueba t bimuestral.
# A manera de ejemplo de aplicación de la Prueba U (o de Wilcoxon), suponer que en un estudio de rocas sedimentarias se obtuvieron los siguientes diámetros (en milímetros) de dos tipos de arena:
#
# Arena I:
# 0.63 0.17 0.35 0.49 0.18 0.43 0.12 0.20 0.47 1.36 0.51 0.84 0.32 0.40 0.45
# Arena II:
# 1.13 0.54 0.96 0.26 0.39 0.88 0.92 0.53 1.01 0.48 0.89 1.07 1.11 0.58
# Para tomar estos datos en Matcad, vamos a copiar los elementos de cada vector en el Notepad y lo vamos a guardar con un nombre de archivo .txt (por ej. a1.txt y a2.txt).
# Posteriormente, los datos se leerán en las variables v1 y v2 con la sentencia REAPRN.
v1 := transpose(READPRN("c:\a1.txt"))  # error: No se puede abrir el fichero de datos.
v2 := transpose(READPRN("c:\a2.txt"))  # error: No se puede abrir el fichero de datos.
m1 := mean(v1)  # Media de la muestra 1
m2 := mean(v2)  # Media de la muestra 2
# El problema estriba en decidir si la diferencia es significativa.
# Se consideran los datos como si fueran una sola muestra y se los ordena en forma creciente:
#
# 0.12  0.17  0.18  0.2  0.26  0.32  0.35  0.39  0.4  0.43  0.45  0.47  0.48
# I  I  I  I  II  I  I  II  I  I  I  I  II
#
# 0.49  0.51  0.53  0.54  0.58  0.63  0.84  0.88  0.89  0.92  0.96  1.01  1.07
# I  I  II  II  II  I  I  II  II  II  II  II  II
# 1.11  1.13  1.36
# II  II  I
# asignando a los datos en este orden los rangos 1, 2, …, 29: Se encuentra que los valores de la primera muestra tienen los rangos: 1, 2, 3, 4, 6, 7, 9, 10, 11, 12, 14, 15, 19, 20, 29 mientras que los de la segunda muestra 5, 8, 13, 16, 17, 18, 21, 22, 23, 24, 25, 26, 27, 28.
#
# Si, por ejemplo, el tercero y cuarto valores fuesen idénticos se asignaría a cada uno el rango (3+4)/2=3.5. Otro caso, si el 9no., 10mo. y 11mo. fueran iguales, se asignaría a cada uno el rango (9+10+11)/3=10].
# La Hipótesis Nula que se desea probar es que las dos muestras provienen de poblaciones idénticas, habiendo razón en tal caso para establecer que las medias de los rangos asignados a los valores de las dos muestras deberían ser más o menos iguales.
# Se comparan las sumas de los rangos asignados a los valores de las dos muestras, con ello se toma en cuenta de manera apropiada una posible diferencia de los tamaños. La suma de rangos son R1=162 y R2=273 y queda por ver si la diferencia es demasiado grande como para rechazar la Hipótesis Nula.
# Se definen 2 estadísticos:
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# De ellos se elige el estadístico U, como el correspondiente al de rango más pequeño de los dos (en este caso el U1).
# Puede comprobarse que la media y la varianza de la distribución muestral (de U1, en este caso) son:
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# Estudios numéricos han demostrado que la distribución muestral de U1 puede aproximarse mediante una distribución normal con n1 y n2 ambos mayores que 8, la Hipótesis Nula (provenir de dos poblaciones idénticas) se puede fundamentar en el estadístico:
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# Problema: De acuerdo a los datos de la propuesta anterior, mediante la prueba U, con un nivel de significancia de 0.01, verificar la Hipótesis Nula de que las dos muestras provienen de poblaciones iguales  contra la Hipótesis Alternativa que tienen medias distintas.
# 1.  Hipótesis Nula: las poblaciones son idénticas (μ1 = μ2)
# Hipótesis Alternativa:  μ1 <> μ2 (dos colas)
#
# 2  Nivel de significancia
α := 0.01
z001 := qnorm(1 - α/2, 0, 1) = 2.57583
# 3  Criterio: Se rechaza Ho si
z > z001
# o bien
z < -z001
t := -3, -2.99 .. 3
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# 3  Cálculos:
n1 := length(v1)  # Tamaño de la muestra de la población 1
n2 := length(v2)  # Tamaño de la muestra de la población 2
R1 := 162
R2 := 273  # Sumas de rangos
U1 := n1*n2 + n1*(n1 + 1)/2 - R1
μ_U1 := n1*n2/2
σ_U1 := sqrt(n1*n2*(n1 + n2 + 1)/12)
z := (U1 - μ_U1)/σ_U1  # Estadístico de la prueba
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# 5-  Decisión: dado que 2.75 (z) > z005 (2.576) Se Rechaza la Hipótesis Nula.
# Luego, existe diferencia en las dimensiones de los promedios reales de los dos tipos de arena.
# PRUEBA H (o de Kruskal-Wallis)
#
# Es una generalización de la Prueba U que permite probar la Hipótesis Nula  de que k muestras aleatorias independientes provienen de poblaciones idénticas.
# Se clasifican las observaciones conjuntamente, y si R_i es la suma de los rangos ocupados por las n_i observaciones de la i-ésima muestra y n_1 + n_2 +…+ n_k = n. La prueba se funda en el estadístico:
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# cuando n_i  > 5 para toda i y cuando Ho es verdadera, la distribución muestral de H es aproximada con la distribución chi-cuadrada con k-1 grados de libertad.
# Problema: Un experimento para comparar tres métodos preventivos contra la corrosión produjo las siguientes profundidades máximas de las cavidades (en milésimo de pulgada) en piezas de alambre que fueron sometidas a los tratamientos respectivos:
# Método A: 77, 54, 67, 74, 71, 66
# Método B: 60, 41, 59, 65, 62, 64, 52
# Método C: 49, 52, 69, 47, 56
# Con un nivel de significación de 0.05, probar la Hipótesis Nula que las tres muestras provienen de poblaciones idénticas.
# 1.  Hipótesis Nula: las poblaciones son idénticas (μ1 = μ2 = μ3)
# Hipótesis Alternativa: las poblaciones son distintas.
#
# 2.  Nivel de significancia: 0.05
α := 0.05
k := 3
chi05 := qchisq(1 - α, k - 1) = 5.99146
# 3.  Criterio: se rechaza Ho si chi > chi05
t := 0, 0.01 .. 10
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# 4.  Cálculos:
n[1] := 6
n[2] := 7
n[3] := 5
# Se ordenan los datos como si fueran una sola muestra, preservando el origen
#
# 41 47 49 52 52 54 56 59 60 62 64 65 66 67 69 71 74 77
# B  C  C  B  C  A  C  B  B  B  B  B  A  A  C  A  A  A
# Los rangos son:
#
# Método A: 6, 13, 14, 16, 17, 18  R1= 84
# Método B: 1, 4.5, 8, 9, 10, 11, 12  R2= 55.5
# Método C: 2, 3, 4.5, 7, 15  R3= 31.5
R[1] := 84
R[2] := 55.5
R[3] := 31.5
nn := n[1] + n[2] + n[3]
H := 12/(nn*(nn + 1))*sum(R[i]^2/n[i], i = 1 .. k) - 3*(nn + 1) = 6.66617
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# 5- Decisión: dado que H (6.66) > chi05 (5.991) Se Rechaza la Hipótesis Nula. Luego, los tres métodos no tienen igual eficacia
# PRUEBAS DE ALEATORIEDAD
#
# Es necesario saber que seguridad hay de que una muestra sea aleatoria.
# Una de las pruebas se basa en el orden en que fueron obtenidos los datos. Con más precisión, se fundamenta en el número de corridas exhibidas en los resultados muestrales.
# Dada una sucesión de dos símbolos (por ejemplo, cara y cruz de una moneda) una corrida es la sucesión de símbolos idénticos contenidos entre símbolos diferentes o ninguno de todos. Por ejemplo:
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# En el esquema se aprecian 5 corridas
# Esto puede servir para determinar el grado de aleatoriedad. Si sólo hubieran habido 2 corridas consistentes de 10 lados A seguidos por 10 lados B (2 corridas), sería sospechoso del mismo modo que lo serían la aparición alternada 1 a 1 de los lados ( 20 corridas).
# La sospecha de falta de aleatoriedad está en el orden de aparición.
# Si una sucesión contiene n_1 símbolos del primer tipo y n_2 del segundo tipo (ni n_1 ni n_2 menores que 10) entonces la distribución muestral del número de corridas u, puede aproximarse mediante una distribución muestral con:
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# De esta manera, la prueba de Hipótesis Nula de que el arreglo de los símbolos (y de
# aquí la muestra) es aleatoria , puede fundamentarse en el estadístico:
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# que tiene aproximadamente la distribución normal.
# Problema: El siguiente arreglo se refiere al número de piezas defectuosas d y no defectuosas n en el orden dado producidas por cierta máquina:
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# probar la aleatoriedad con un nivel de confianza de 0.01.
# 1.  Hipótesis Nula: El arreglo es aleatorio
# Hipótesis Alternativa: No hay aleatoriedad (cola izquierda)
#
# 2.  Nivel de significancia: α =0.01.
# 3.  Criterio: Se rechaza la hipótesis nula si z < z_0.01.
α := 0.01  # Nivel de significancia
z01 := qnorm(α, 0, 1) = -2.32635
t := -3, -2.99 .. 3
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# 4.  Cálculos:
u := 6
n1 := 10
n2 := 17
μ_u := 2*n1*n2/(n1 + n2) + 1 = 13.5926
σ_u := sqrt(2*n1*n2*(2*n1*n2 - n1 - n2)/((n1 + n2)^2*(n1 + n2 - 1))) = 2.36952
z := (u - μ_u)/σ_u = -3.20427  # Estadístico
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# 5-  Decisión: dado que -3.204 (z) < -2.326 (z01) Se Rechaza la Hipótesis Nula. Luego, el arreglo no es aleatorio. En realidad el número total de corridas es mucho menor que el esperado y existe una fuerte tendencia a que las partes defectuosas aparezcan aglomeradas, la razón de esto seguramente la descubrirá un ingeniero familiarizado con el proceso.
# _______________________________________________________
# También se puede utilizar la prueba de secuencias para probar la aleatoriedad de muestras que constan de datos numéricos contando secuencias por encima y por debajo de la mediana.
# Si con a se denota una observación por encima de la mediana de la muestra y con b se denota una observación por debajo de la mediana, se puede emplear la sucesión de letras a y b para probar la aleatoriedad del método indicado.
# Una aplicación muy común de esta prueba es el Control de Calidad, donde las media de pequeñas muestras sucesivas se exhiben en orden cronológico sobre una gráfica.
# Problema: Un ingeniero está preocupado debido a que están realizando demasiadas modificaciones al ajustar un torno automático. Dados los siguientes diámetros medios (en pulgadas) de 40 ejes maquinados sucesivamente en el torno:
# .261 .258 .249 .251 .247 .256 .250 .247 .255 .243 .252 .250 .253 .247 .251 .243 .258 .251 .245 .250 .248 .252 .254 .250 .247 .253 .251 .246 .249 .252 .247 .250 .253 .247 .249 .253 .246 .251 .249 .253
# emplear el nivel de significación 0.01 para probar la hipótesis nula de aleatoriedad contra la alterna de que existe un patrón que se repite con frecuencia.
# 1.  Hipótesis Nula: El arreglo es aleatorio
# Hipótesis Alternativa: No hay aleatoriedad, existe un patrón
# de repetición.
#
# 2.  Nivel de significancia: α =0.01.
# 3.  Criterio: Se rechaza la hipótesis nula si z < z_0.01.
α := 0.01  # Nivel de significancia
z01 := qnorm(1 - α, 0, 1) = 2.32635
t := -3, -2.99 .. 3
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# 4.  Cálculos: La mediana de las 40 mediciones es 0.250. Con este valor como referencia se construye el siguiente cuadro
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u := 27
n1 := 19
n2 := 16
μ_u := 2*n1*n2/(n1 + n2) + 1 = 18.3714
σ_u := sqrt(2*n1*n2*(2*n1*n2 - n1 - n2)/((n1 + n2)^2*(n1 + n2 - 1))) = 2.89216
z := (u - μ_u)/σ_u = 2.98344  # Estadístico
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z01 = 2.32635
# 5-  Decisión: dado que 2.983 (z) > 2.326 (z01) Se Rechaza la Hipótesis Nula. Luego, el arreglo no es aleatorio.
# PRUEBAS DE KOLMOGOROV-SMIRNOV
# Se utilizan para diferencias entre distribuciones acumuladas. La prueba unimuestral es una prueba de Bondad de Ajuste. Es más eficiente que la prueba χ2 en muestras pequeñas.
# No se aplica a distribuciones discretas.
# La prueba unimuestral se funda en la diferencia absoluta máxima D entre los valores de la distribución acumulada de una muestra aleatoria de tamaño n y una distribución teórica determinada.
# Para decidir si esta diferencia es mayor de la razonablemente esperada con un nivel de significación α, se buscan los valores críticos de D en Tablas apropiadas.
# Problema: Se desea comprobar si los agujeros en una placa de hojalata electrolítica están uniformemente distribuidos a través de la placa. Por ello se han tomado distancias (en pulgadas) de 10 agujeros a partir de un extremo de una larga tira de 30 pulgadas de ancho, dando los siguientes resultados:
# 4.8  14.8  28.2  23.1  4.4  28.7  19.5  2.4  25.0  6.2
# Probar esta hipótesis nula con un nivel de significación de 0.05
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# 1.  Hipótesis nula:
# Hipótesis alterna: no están uniformemente distribuídos
# 2.  Nivel de significación: α = 0.05
# 3.  Criterio: Se rechaza Ho si D > 0.410, donde D es la diferencia máxima entre la distribución acumulada observada  y la supuesta bajo la Hipótesis Nula.
# 4.  Cálculos: Se construye el siguiente gráfico que muestra la distribución acumulada observada  y la supuesta.
# Para ello se ordenan los valores:
Obs := transpose([2.4, 4.4, 4.8, 6.2, 14.8, 19.5, 23.1, 25, 28.2, 28.7]/30)
i := 0 .. rows(Obs)
Esp[i] := i/10
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# 5.  Decisión: Ya que 0.193 < 0.410 (valor de Tabla) No  se Rechaza la Hipótesis Nula. Luego, los agujeros están significativamente uniformemente distribuidos.
