# UNIDAD V - AJUSTE DE CURVAS
# En múltiples ocasiones se encuentran situaciones en las que se requiere analizar la relación entre dos variables cuantitativas.
# Los dos objetivos fundamentales de este análisis serán:
#
# 1 ) Determinar si dichas variables están asociadas y en qué sentido se da dicha asociación (es decir, si los valores de una de las variables tienden a aumentar o disminuir- al aumentar los valores de la otra);
# 2) Estudiar si los valores de una variable pueden ser utilizados para predecir el valor de la otra.
# Una solución es utilizar el coeficiente de correlación, que sirne para 1) mediante un sólo número.
# Pero lo que interesa es modelizar dicha relación y usar una de las variables para explicar la otra.
# Para tal propósito se recurrirá a la técnica de regresión.
# Aquí se analizará el caso más sencillo en el que se considera únicamente la relación entre dos variables (x e y).
# Así mismo, se limita al caso en el que la relación que se pretende modelizar es de tipo lineal.
# En este caso, la media de la distribución de las y sobre x está dada por α + β.x
# El problema radica en encontrar aquella recta que mejor ajuste a los datos. Tradicionalmente se ha recurrido para ello al método de mínimos cuadrados, que elige como recta de regresión a aquella que minimiza las distancias verticales de las observaciones a la recta.
# Cualquier observación i-ésima y_i diferirá verticalmente de esa recta (por ahora desconocida) en un valor ε_i.
# Luego ε es el valor de una variable aleatoria.
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# El valor de ε para cualquier observación determinada dependerá de un posible error de medición y de los valores de otras variables distintas de x que podrían influir sobre y.
# Habrá que calcular los valores de  α y  β de la línea de regresión, es decir la ecuación de la recta que de alguna manera da el mejor ajuste.
# En referencia al gráfico anterior, es relativamente fácil trazarla a simple vista con un poco de sentido común. Sin embargo, lo habitual es recurrir a un método menos subjetivos.
# Para plantear este problema de manera formal, considérese n parejas de observaciones (x_i,y_i) en las cuales es razonable suponer que la regresión de y sobre x es lineal, y se desea determinar la recta del mejor ajuste.
# Si se predice y por medio de la ecuación:
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# sea e_i el error de predecir el valor de y correspondiente a la x_i es:
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# Se quiere determinar a y b de modo que estos errores sean, en cierto modo, lo más pequeños posibles.
# Ya que no se pueden minimizar cada uno de los e_i por separado, esto sugiere intentar
q == sum(e[i], i)
# tan cercano a cero como sea posible.
# Esto no es aconsejable puesto que errores positivos y negativos se compensarán dando líneas inadecuadas como respuesta.
# Por lo tanto, se minimizará la suma de los cuadrados de e_i. Es decir, se elegirán a y b de modo que:
sum((y[i] - (a + b*x[i]))^2, i = 1 .. n)  # sea mínima
# Esto equivale a minimizar la suma de los cuadrados de las distancias verticales a partir de los puntos respecto de la línea.
# Este método (llamado de los Mínimos Cuadrados) da valores de a y b (estimaciones de α y β) que tienen muchas propiedades convenientes.
# Una condición necesaria para que exista un mínimo relativo es la anulación de las derivadas parciales con respecto a a y b:
2*sum((y[i] - (a + b*x[i]))*(-1), i = 1 .. n) == 0  # derivada respecto de a
2*sum((y[i] - (a + b*x[i]))*(-x[i]), i = 1 .. n) == 0  # derivada respecto de b
# lo que se puede reescribir como:
sum(y[i], i = 1 .. n) == a*n + b*sum(x[i], i = 1 .. n)
sum(y[i]*x[i], i = 1 .. n) == a*sum(x[i], i = 1 .. n) + b*sum(x[i]*2, i = 1 .. n)
# esto es un conjunto de dos ecuaciones lineales con incógnitas a y b, denominadas Ecuaciones Normales.
# Resolviendo por determinantes
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# Ejemplo: Los siguientes datos son las mediciones de la Tensión Arterial en 14 pacientes
# de distintas edades:
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# ajustar una línea recta a estos datos por el método de mínimos cuadrados y utilizarla para estimar la tensión arterial para una persona de 36 años.
x := transpose([17, 18, 20, 22, 25, 29, 33, 35, 38, 40, 42, 45, 47, 50])
y := transpose([114, 134, 116, 130, 125, 130, 144, 148, 150, 153, 124, 135, 156, 142])
n := length(x) = 14
i := 0 .. n - 1
sum(x[i], i = 0 .. n - 1) = 461
sum(y[i], i = 0 .. n - 1) = 1901
sum(x[i]*y[i], i = 0 .. n - 1) = 63892
sum(x[i]^2, i = 0 .. n - 1) = 16819
# de aquí el sistema de ecuaciones queda
1.901*10^3 == 14*a + b*461
6.389*10^4 == 461*a + b*(1.682*10^4)
# Resolviendo:
[a; b] := [14, 461; 461, 1.682*10^4]^-1*[1.901*10^3; 6.389*10^4] = [109.828; 0.788318]
# Soluciones:
a = 109.828  # ordenada al origen (intercept)
b = 0.788318  # pendiente (slope)
# Para una persona de x=36 años
y == a + b*x  # Ecuación predictora
a + b*36 = 138.207
# En el siguiente gráfico se puede apreciar el Diagrama de Dispersión y la recta del mejor ajuste (desde el punto de vista de los mínimos cuadrados) y la estimación para una persona de 36 años de edad:
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# Mathcad realiza los cálculos anteriores con las funciones intercept y slope.
intercept(x, y) = 109.771  # coeficiente a, ordenada al origen
slope(x, y) = 0.79002  # coeficiente b, pendiente
# INFERENCIAS BASADAS EN ESTIMADORES DE MÍNIMOS CUADRADOS
#
# En lo que sigue se supondrá que la regresión es lineal y, más aún, que las n variables aleatorias que tienen valores y_i (i=1, 2, …, n) son independientes y que están distribuidos normalmente con las medias α + β.x_i y la varianza común σ^2.
# Si se escribe: y_i = α + β.x_i + ε_i se considera que los ε_i son valores de variables aleatorias independientes, distribuidas normalmente, y que tienen medias 0 y varianza común σ^2^. Gráficamente:
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# En las suposiciones hechas hasta aquí, como se ilustra, se pueden advertir las distribuciones de los y_i para varios valores de las x_i.
# Antes de establecer un teorema relativo a la distribución de los estimadores de mínimos cuadrados de α y β, es conveniente introducir una notación especial:
Sxx == n*sum(x[i]^2, i = 0 .. n - 1) - sum(x[i], i = 0 .. n - 1)^2 == n*sx^2*(n - 1)
Syy == n*sum(y[i]^2, i = 0 .. n - 1) - sum(y[i], i = 0 .. n - 1)^2 == n*sy^2*(n - 1)
Sxy == n*sum(x[i]*y[i], i = 0 .. n - 1) - sum(x[i], i = 0 .. n - 1)*sum(y[i], i = 0 .. n - 1) == n*sxy^2*(n - 1)
# en base a esto, las ecuaciones normales, resueltas por determinantes, quedan:
