# UNIDAD V - AJUSTE DE CURVAS
# En múltiples ocasiones se encuentran situaciones en las que se requiere analizar la relación entre dos variables cuantitativas.
# Los dos objetivos fundamentales de este análisis serán:
#
# 1 ) Determinar si dichas variables están asociadas y en qué sentido se da dicha asociación (es decir, si los valores de una de las variables tienden a aumentar o disminuir- al aumentar los valores de la otra);
# 2) Estudiar si los valores de una variable pueden ser utilizados para predecir el valor de la otra.
# Una solución es utilizar el coeficiente de correlación, que sirne para 1) mediante un sólo número.
# Pero lo que interesa es modelizar dicha relación y usar una de las variables para explicar la otra.
# Para tal propósito se recurrirá a la técnica de regresión.
# Aquí se analizará el caso más sencillo en el que se considera únicamente la relación entre dos variables (x e y).
# Así mismo, se limita al caso en el que la relación que se pretende modelizar es de tipo lineal.
# En este caso, la media de la distribución de las y sobre x está dada por α + β.x
# El problema radica en encontrar aquella recta que mejor ajuste a los datos. Tradicionalmente se ha recurrido para ello al método de mínimos cuadrados, que elige como recta de regresión a aquella que minimiza las distancias verticales de las observaciones a la recta.
# Cualquier observación i-ésima y_i diferirá verticalmente de esa recta (por ahora desconocida) en un valor ε_i.
# Luego ε es el valor de una variable aleatoria.
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# El valor de ε para cualquier observación determinada dependerá de un posible error de medición y de los valores de otras variables distintas de x que podrían influir sobre y.
# Habrá que calcular los valores de  α y  β de la línea de regresión, es decir la ecuación de la recta que de alguna manera da el mejor ajuste.
# En referencia al gráfico anterior, es relativamente fácil trazarla a simple vista con un poco de sentido común. Sin embargo, lo habitual es recurrir a un método menos subjetivos.
# Para plantear este problema de manera formal, considérese n parejas de observaciones (x_i,y_i) en las cuales es razonable suponer que la regresión de y sobre x es lineal, y se desea determinar la recta del mejor ajuste.
# Si se predice y por medio de la ecuación:
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# sea e_i el error de predecir el valor de y correspondiente a la x_i es:
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# Se quiere determinar a y b de modo que estos errores sean, en cierto modo, lo más pequeños posibles.
# Ya que no se pueden minimizar cada uno de los e_i por separado, esto sugiere intentar
q == sum(e[i], i)
# tan cercano a cero como sea posible.
# Esto no es aconsejable puesto que errores positivos y negativos se compensarán dando líneas inadecuadas como respuesta.
# Por lo tanto, se minimizará la suma de los cuadrados de e_i. Es decir, se elegirán a y b de modo que:
sum((y[i] - (a + b*x[i]))^2, i = 1 .. n)  # sea mínima
# Esto equivale a minimizar la suma de los cuadrados de las distancias verticales a partir de los puntos respecto de la línea.
# Este método (llamado de los Mínimos Cuadrados) da valores de a y b (estimaciones de α y β) que tienen muchas propiedades convenientes.
# Una condición necesaria para que exista un mínimo relativo es la anulación de las derivadas parciales con respecto a a y b:
2*sum((y[i] - (a + b*x[i]))*(-1), i = 1 .. n) == 0  # derivada respecto de a
2*sum((y[i] - (a + b*x[i]))*(-x[i]), i = 1 .. n) == 0  # derivada respecto de b
# lo que se puede reescribir como:
sum(y[i], i = 1 .. n) == a*n + b*sum(x[i], i = 1 .. n)
sum(y[i]*x[i], i = 1 .. n) == a*sum(x[i], i = 1 .. n) + b*sum(x[i]*2, i = 1 .. n)
# esto es un conjunto de dos ecuaciones lineales con incógnitas a y b, denominadas Ecuaciones Normales.
# Resolviendo por determinantes
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# Ejemplo: Los siguientes datos son las mediciones de la Tensión Arterial en 14 pacientes
# de distintas edades:
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# ajustar una línea recta a estos datos por el método de mínimos cuadrados y utilizarla para estimar la tensión arterial para una persona de 36 años.
x := transpose([17, 18, 20, 22, 25, 29, 33, 35, 38, 40, 42, 45, 47, 50])
y := transpose([114, 134, 116, 130, 125, 130, 144, 148, 150, 153, 124, 135, 156, 142])
n := length(x) = 14
i := 0 .. n - 1
sum(x[i], i = 0 .. n - 1) = 461
sum(y[i], i = 0 .. n - 1) = 1901
sum(x[i]*y[i], i = 0 .. n - 1) = 63892
sum(x[i]^2, i = 0 .. n - 1) = 16819
# de aquí el sistema de ecuaciones queda
1.901*10^3 == 14*a + b*461
6.389*10^4 == 461*a + b*(1.682*10^4)
# Resolviendo:
[a; b] := [14, 461; 461, 1.682*10^4]^-1*[1.901*10^3; 6.389*10^4] = [109.828; 0.788318]
# Soluciones:
a = 109.828  # ordenada al origen (intercept)
b = 0.788318  # pendiente (slope)
# Para una persona de x=36 años
y == a + b*x  # Ecuación predictora
a + b*36 = 138.207
# En el siguiente gráfico se puede apreciar el Diagrama de Dispersión y la recta del mejor ajuste (desde el punto de vista de los mínimos cuadrados) y la estimación para una persona de 36 años de edad:
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# Mathcad realiza los cálculos anteriores con las funciones intercept y slope.
intercept(x, y) = 109.771  # coeficiente a, ordenada al origen
slope(x, y) = 0.79002  # coeficiente b, pendiente
# INFERENCIAS BASADAS EN ESTIMADORES DE MÍNIMOS CUADRADOS
#
# En lo que sigue se supondrá que la regresión es lineal y, más aún, que las n variables aleatorias que tienen valores y_i (i=1, 2, …, n) son independientes y que están distribuidos normalmente con las medias α + β.x_i y la varianza común σ^2.
# Si se escribe: y_i = α + β.x_i + ε_i se considera que los ε_i son valores de variables aleatorias independientes, distribuidas normalmente, y que tienen medias 0 y varianza común σ^2^. Gráficamente:
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# En las suposiciones hechas hasta aquí, como se ilustra, se pueden advertir las distribuciones de los y_i para varios valores de las x_i.
# Antes de establecer un teorema relativo a la distribución de los estimadores de mínimos cuadrados de α y β, es conveniente introducir una notación especial:
Sxx == n*sum(x[i]^2, i = 0 .. n - 1) - sum(x[i], i = 0 .. n - 1)^2 == n*sx^2*(n - 1)
Syy == n*sum(y[i]^2, i = 0 .. n - 1) - sum(y[i], i = 0 .. n - 1)^2 == n*sy^2*(n - 1)
Sxy == n*sum(x[i]*y[i], i = 0 .. n - 1) - sum(x[i], i = 0 .. n - 1)*sum(y[i], i = 0 .. n - 1) == n*sxy^2*(n - 1)
# en base a esto, las ecuaciones normales, resueltas por determinantes, quedan:
b == Sxy/Sxx
# pendiente
a == mean(y) - b*mean(x)  # ordenada al origen
Sxx := n*sum(x[i]^2, i = 0 .. n - 1) - sum(x[i], i = 0 .. n - 1)^2 = 22945
Sxy := n*sum(x[i]*y[i], i = 0 .. n - 1) - sum(x[i], i = 0 .. n - 1)*sum(y[i], i = 0 .. n - 1) = 18127
Sxy/Sxx = 0.79002
b = 0.788318
# verificación
mean(y) - b*mean(x) = 109.828
a = 109.828
# La varianza común σ^2 puede estimarse en término de las desviaciones verticales de los puntos muestrales a partir de la línea de mínimos cuadrados.
# La i-ésima de tales desviaciones es:
y[i] - (a + b*x[i])
# De aquí, la estimación, s_e^2, es:
s_e^2 == 1/(n - 2)*sum(y[i] - (a + b*x[i]), i = 0 .. n - 1)
# donde s_e se denomina Error Estándar de Estimación, también la suma de los cuadrados dada por s_e^2.(n-2) recibe el nombre de Suma de Cuadrados Residual o Suma de Cuadrados de Error.
# Una fórmula equivalente de esa estimación de σ^2 es:
s_e^2 == (Sxx*Syy - Sxy^2)/(n*(n - 2)*Sxx)
# el divisor n - 2 se emplea para que el estimador resultante de σ^2 sea insesgado.
# En base a las suposiciones efectuadas relativas a la distribución de las y, se pueden probar los siguientes teoremas:
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# con valores de variables aleatorias que tienen la distribución t-Student con n - 2 grados de libertad.
# Esto permite que se puedan calcular intervalos de confianza para los coeficientes de regresión α y β, se sustituye el término medio de - t_(α/2) < t < t_(α/2) por el estadístico t adecuado del teorema anterior. Luego, por medio de cálculos simples, se determinan los correspondientes intervalos de confianza:
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# Centrados en los estimadores a y b
# Problema: Los siguientes datos son las mediciones de la velocidad del aire y del coeficiente de evaporación de las gotitas de combustible en una turbina de propulsión:
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# Construir un intervalo de confianza del 95% para el coeficiente de regresión α.
x := transpose([20, 60, 100, 140, 180, 220, 260, 300, 340, 380])
y := transpose([0.18, 0.37, 0.35, 0.78, 0.56, 0.75, 1.18, 1.36, 1.17, 1.65])
n := length(x)
i := 0 .. n - 1
Sxx := n*sum(x[i]^2, i = 0 .. n - 1) - sum(x[i], i = 0 .. n - 1)^2 = 1320000
Sxy := n*sum(x[i]*y[i], i = 0 .. n - 1) - sum(x[i], i = 0 .. n - 1)*sum(y[i], i = 0 .. n - 1) = 5054
Syy := n*sum(y[i]^2, i = 0 .. n - 1) - sum(y[i], i = 0 .. n - 1)^2 = 21.3745
b := Sxy/Sxx = 0.00382879
slope(x, y) = 0.00382879
a := mean(y) - b*mean(x) = 0.0692424
intercept(x, y) = 0.0692424
# Gráficamente:
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α := 0.05
ν := n - 2 = 8  # grados de libertad
t025 := qt(1 - α/2, ν) = 2.306
s_e := sqrt((Sxx*Syy - Sxy^2)/(n*(n - 2)*Sxx)) = 0.159052  # Error Estándar de Estimación
E := t025*s_e*sqrt((Sxx + (n*mean(x))^2)/(n*Sxx)) = 0.232846  # Error máximo de estimación
a - E = -0.163603  # Extremo inferior del intervalo
a + E = 0.302088  # Extremo superior del intervalo
# En las pruebas de hipótesis relativas a los coeficientes de regresión α y β, las que se refieren a β son muy importantes ya que β es la pendiente de la línea de regresión.
# Esto es, β es el “cambio promedio” de las y correspondiente a un incremento unitario de x
# Si β=0, la línea de regresión es horizontal y la media de las y no “depende linealmente” de x.
# Ejemplo: En base al problema anterior, probar la Hipótesis Nula de que β=0 contra la Hipótesis Alterna que β<>0, con un nivel de significación de 0.05.
# 1.  Hipótesis nula: β=0
# Hipótesis alterna: β<>0
#
# 2.  Nivel de significación 0.05
α := 0.05
ν := n - 2 = 8  # grados de libertad
t025 := qt(1 - α/2, ν) = 2.306
# 3.  Criterio: Se rechaza Ho si t > 2.306 o t < -2.306, con ν = n - 2 = 8 g.d.l.
w := -3, -2.99 .. 3
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# 4.  Cálculos:
t := (b - 0)/s_e*sqrt(Sxx/n) = 8.74599  # Estadístico
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# 5.  Decisión: Ya que 8.749 (t) >2.306  Se Rechaza la Hipótesis Nula.
# Luego, existe relación entre la velocidad del aire y el coeficiente de evaporación promedio (la relación es lineal por las suposiciones que fundamentan la prueba).
# Otro problema es estimar α + β.x, es decir la media de la distribución de las y (μ_y), para un valor dado de x.
# Si x se hace igual a un valor fijo x_0 se desea estimar α + β.x_0 y sería razonable emplear a + b.x_0 (con a y b obtenidos por el método de los mínimos cuadrados). Puede verificarse que este estimador es insesgado, y que tiene la varianza:
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# y que los límites de confianza del (1-α).100% para α + β. x_0 están dados por:
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# Problema: En relación al ejemplo anterior, construir un intervalo de confianza del 95% para el coeficiente de evaporación cuando la velocidad del aire es de 190 cm/seg.
a := 0.05
ν := n - 2 = 8
t025 := qt(1 - α/2, ν) = 2.306
x0 := 190
E := t025*s_e*sqrt(1/n + n*(x0 - mean(x))^2/Sxx) = 0.116423
(a + b*x0) - E = 0.661047  # Extremo inferior del intervalo
(a + b*x0) + E = 0.893893  # Extremo superior del intervalo
0.661 < α + β*x[0] < 0.893  # Intervalo de confianza
# De mayor importancia aún que la estimación de α + β. x_0 es la “predicción” de un valor futuro de y cuando x = x_0 donde x_0 está dentro del rango de experimentación (se agrega “dentro del rango de experimentación” dado que, la extrapolación es aventurada y se observa que una relación no siempre es válida fuera de tal rango).
# Para el primer problema se verifica que para una velocidad de 190 cm/seg (valor situado bien adentro del rango de experimentación) el coeficiente de evaporación es de 0.777 mm2/seg.
a + b*190 = 0.77747
# Se describirá un método para construir un intervalo en el cual puede esperarse que una futura observación y se halle con una probabilidad determinada (o confianza) cuando x = x_0.
# Si se conocieran α y β se podría usar el hecho de que y es un valor de una variable aleatoria que tiene distribución normal con la media α + β. x_0 y varianza σ^(2) (o que y - α - β. x_0 es un valor de una variable aleatoria con distribución normal de media cero y varianza σ^(2)).
# Sin embargo α y β se desconocen, debiéndose considerar la cantidad y - a  - b.x_0 (donde y, a, b son todas variables aleatorias y la teoría resultante origina los siguientes límites de predicción para y cuando x = x_0.
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# Problema: Conforme al ejemplo anterior, encontrar los límites de predicción del 95% para una observación del coeficiente de evaporación cuando la velocidad del aire es de 190 cm/seg.
x0 := 190
E := t025*s_e*sqrt(1 + 1/n + n*(x0 - mean(x))^2/Sxx) = 0.384809
(a + b*x0) - E = 0.392661  # Extremo inferior del intervalo
(a + b*x0) + E = 1.16228  # Extremo superior del intervalo
0.393 < α + β*x[0] < 1.162  # Intervalo de confianza
# Comparando con el problema anterior, se ve que si bien la media de la distribución de las y cuando x=190 puede estimarse con bastante precisión, el valor de una simple estimación futura no puede predecirse con mucha precisión.
# El ancho del intervalo de predicción depende fundamentalmente de s_e que mide la variabilidad inherente de los datos. Se nota que si se desea extrapolar, el intervalo de predicción (y también el intervalo de confianza para  α + β. x_0) incrementa su ancho.
# Problema: Conforme al ejemplo anterior, suponer que la relación de linealidad se cumple más allá del rango de experimentación y calcular los límites de predicción del 95% para una observación del coeficiente de evaporación cuando la velocidad del aire es de 450 cm/seg.
x0 := 450
E := t025*s_e*sqrt(1 + 1/n + n*(x0 - mean(x))^2/Sxx) = 0.460077
(a + b*x0) - E = 1.31288  # Extremo inferior del intervalo
(a + b*x0) + E = 2.23303  # Extremo superior del intervalo
1.313 < α + β*x[0] < 2.233  # Intervalo de confianza
τ
# REGRESIÓN CURVILÍNEA
#
# Se considerará primero el caso en que la graficación en una escala adecuada puede ser lineal.
# Por ejemplo, si un conjunto de parejas de datos que conste de n puntos (x_i,y_i) "se enderezan" cuando son graficados sobre ejes escalados adecuadamente.
#
# Función Exponencial
#
# En este caso, al ser representados sobre papel semilogarítmico, indican que la curva de regresión de y sobre x es exponencial, es decir para cualquier x considerada, la media de la distribución está dada por la siguiente ecuación predictora y = α . β ^x, tomando logaritmos en ambos miembros:
log(y) == log(α) + x*log(β)
# y se puede estimar ahora log(α) y log(β), y de ahí obtener α y β, aplicando los métodos anteriores a los n pares de valores [x_i,log(y_i)].
# Problema: Las cifras siguientes son datos sobre el porcentaje de llantas radiales producidas por cierto fabricante que aún pueden usarse después de recorrer cierto número de millas:
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# a)  Graficar los datos proporcionados en escala semilogaritmica para advertir
# si  es razonable que la relación es exponencial.
# b)  Ajustar una curva exponencial aplicando el método de mínimos cuadrados a las parejas de puntos [x_i,log(y_i)].
# c)  Emplear los resultados de la parte b) para estimar qué porcentaje de las llantas
# radiales del fabricante durarán menos de 25000 millas
# a) Se crean los vectores:
x := transpose([1, 2, 5, 10, 20, 30, 40, 50])
y := transpose([98.2, 91.7, 81.3, 64, 36.4, 32.6, 17.1, 11.3])
Ly := log(y)
n := length(x)
i := 0 .. n - 1
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# El patrón global (del segundo gráfico) es lineal y esto justifica el ajuste mediante una curva exponencial.
# b) Para formar las ecuaciones normales:
sum(Ly[i], i) = 13.0311
sum(x[i]*Ly[i], i) = 212.121
sum(x[i], i) = 158
sum(x[i]^2, i) = 5530
sum(Ly[i], i) == n*log(a) + log(b)*sum(x[i], i)
sum(x[i]*Ly[i], i) == log(a)*sum(x[i], i) + log(b)*sum(x[i]^2, i)
13.031 == 8*log(a) + 158*log(b)  # Ecuaciones normales
212.121 == 158*log(a) + 5.53*10^3*log(b)
log(a) == det([13.031, 158; 212.121, 5.53*10^3])/det([8, 158; 158, 5.53*10^3])
det([13.031, 158; 212.121, 5.53*10^3])/det([8, 158; 158, 5.53*10^3]) = 1.9997
log(b) == det([8, 13.031; 158, 212.121])/det([8, 158; 158, 5.53*10^3])
det([8, 13.031; 158, 212.121])/det([8, 158; 158, 5.53*10^3]) = -0.0187762
A := 10^2 = 100
B := 10^-0.019 = 0.957194
# Mucho más simple, utilizando Mathcad:
in := intercept(x, Ly) = 1.99974  # Ordenada al origen
sl := slope(x, Ly) = -0.0187772  # Pendiente
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# c)  Utilizando la última expresión para x=25:
A*B^25 = 33.4965
# Vale decir, el 33.5% durarán menos de 25000 millas.
# Función Potencial
#
# Hay dos relaciones más, muy aplicadas: La función potencial y = α x^β y la función recíproca y = 1/(α + β.x).
# Para el primer caso, al ser representado el conjunto de datos sobre papel doble logarítmico toma la forma de recta, esto significa que los valores siguen una ley potencial.
# Si la ecuación predictora está dada por:
y == α*x^β
# tomando logaritmos en ambos miembros, queda:
log(y) == log(α) + β*log(x)
# En este caso habrá que considerar tanto los logaritmos de los elementos de y como los de x.
# Problema: Sea el siguiente conjunto de valores, las lecturas de un experimento donde x es la variable independiente (controlada, medida con poco error) e y la variable resultante.
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x := 0
y := 0
Ly := 0  # inicialización
x := transpose([1, 2, 3, 4, 5, 6, 7])
n := length(x)
i := 0 .. n - 1
y := transpose([6.5, 40, 90, 140, 250, 500, 700])
Lx := log(x)
Ly := log(y)
sum(Lx[i], i) = 3.70243
sum(Lx[i]^2, i) = 2.48901
sum(Ly[i], i) = 14.4574
sum(Lx[i]*Ly[i], i) = 8.88746
sum(Ly[i], i) == n*log(a) + b*sum(Lx[i], i)
sum(Lx[i]*Ly[i], i) == log(a)*sum(Lx[i], i) + b*sum(Lx[i]^2, i)
14.457 == 7*log(a) + 3.702*log(b)  # Ecuaciones normales
8.887 == 3.702*log(a) + 2.489*log(b)
log(a) == det([14.457, 3.702; 8.887, 2.489])/det([7, 3.702; 3.702, 2.489])
det([14.457, 3.702; 8.887, 2.489])/det([7, 3.702; 3.702, 2.489]) = 0.82938
log(b) == det([7, 14.457; 3.702, 8.887])/det([7, 3.702; 3.702, 2.489])
det([7, 14.457; 3.702, 8.887])/det([7, 3.702; 3.702, 2.489]) = 2.33694
A := 10^0.829 = 6.74528
B := 2.337
# Mucho más simple, utilizando Mathcad:
in := intercept(Lx, Ly) = 0.828862  # Ordenada al origen
sl := slope(Lx, Ly) = 2.33774  # Pendiente
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# Función Recíproca
#
# Para el caso de la función recíproca y = 1/(α + β.x), se obtienen α y β, aplicando los métodos anteriores a los n pares de valores [x_i,1/ y_i].
#
# Problema: Sea el siguiente conjunto de valores, las lecturas de un experimento donde x es la variable independiente (controlada, medida con poco error) e y la variable resultante.
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x := 0
y := 0  # inicialización
x := transpose([1, 2, 3, 4, 5, 6, 7])
n := length(x)
i := 0 .. n - 1
y := transpose([1.5, 1, 0.8, 0.85, 0.6, 0.5, 0.55])
Ry := 1/y
sum(x[i], i) = 28
sum(x[i]^2, i) = 140
sum(Ry[i], i) = 9.57799
sum(x[i]*Ry[i], i) = 44.1832
sum(Ry[i], i) == n*a + b*sum(x[i], i)
sum(x[i]*Ry[i], i) == a*sum(x[i], i) + b*sum(x[i]^2, i)
9.578 == 7*a + 28*b  # Ecuaciones normales
44.183 == 28*a + 140*b
a == det([9.578, 28; 44.183, 140])/det([7, 28; 28, 140])
a := det([9.578, 28; 44.183, 140])/det([7, 28; 28, 140]) = 0.529571
b == det([7, 9.578; 28, 44.183])/det([7, 28; 28, 140])
b := det([7, 9.578; 28, 44.183])/det([7, 28; 28, 140]) = 0.209679
A := a
B := b
# Mucho más simple, utilizando Mathcad:
in := intercept(x, Ry) = 0.529539  # Ordenada al origen
sl := slope(x, Ry) = 0.209686  # Pendiente
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# Ajuste Polinómico
#
# Si no hay ninguna indicación acerca de la forma funcional de la regresión de y sobre x, se supone a menudo que la relación fundamental al menos “se comporta bien” al grado que admita un desarrollo en Serie de Taylor y que los primeros términos constituyen una aproximación bastante buena.
# Vale decir, los datos se ajustan a un polinomio o ecuación predictora de la forma
y == β[0] + β[1]*x + β[2]*x^2 + ... + β[p]*x^p
# donde el grado se determina por observación de los datos o por un método más riguroso como el siguiente: dado un conjunto de datos que consta de n puntos (x_i,y_i) se estiman los coeficientes β_0 , β_1 , β_2,… β_p del polinomio de p-ésimo grado, minimizando:
sum((y[i] - (β[0] + β[1]*x[i] + β[2]*x[i]^2 + ... + β[p]*x[i]^p))^2, i = 0 .. n - 1)  # suma de cuadrados de error
# diferenciado parcialmente con respecto a β_0 , β_1 , β_2,… β_p , igualando estas derivadas parciales a cero, reacomodando términos e indicando con b_i las estimaciones de βi, se obtienen las p+1ecuaciones normales:
sum(y[i], i = 0 .. n - 1) == b[0]*n + b[1]*sum(x[i], i = 0 .. n - 1) + b[2]*sum(x[i]^2, i = 0 .. n - 1) + ... + b[p]*sum(x[i]^p, i = 0 .. n - 1)
sum(y[i]*x[i], i = 0 .. n - 1) == b[0]*sum(x[i], i = 0 .. n - 1) + b[1]*sum(x[i]^2, i = 0 .. n - 1) + b[2]*sum(x[i]^2, i = 0 .. n - 1) + ... + b[p]*sum(x[i]^(p + 1), i = 0 .. n - 1)
# ........................................................................................................
sum(y[i]*x[i]^p, i = 0 .. n - 1) == b[0]*sum(x[i]^p, i = 0 .. n - 1) + b[1]*sum(x[i]^(p + 1), i = 0 .. n - 1) + b[2]*sum(x[i]^(p + 2), i = 0 .. n - 1) + ... + b[p]*sum(x[i]^(2*p), i = 0 .. n - 1)
# siendo b_0, b_1, …, b_p las p+1 incógnitas.
# Problema: Los datos siguientes corresponden al tiempo de secado de cierto barniz y a la cantidad de un aditivo con que se intenta reducir el tiempo de secado:
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# a)  Dibujar el diagrama de dispersión de modo que permita advertir si es
# razonable una relación parabólica.
# b)  Ajustar un polinomio de segundo grado por el método de mínimos cuadrados.
# c)  Emplear el resultado de b) para predecir el valor del tiempo de secado cuando se han utilizado 6.5 gr. del aditivo.
x := 0
y := 0
x := transpose([0, 1, 2, 3, 4, 5, 6, 7, 8])
n := length(x)
i := 0 .. n - 1
y := transpose([12, 10.5, 10, 8, 7, 8, 7.5, 8.5, 9])
# a)
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# b) Cálculos
sum(x[i]^4, i) = 8772
sum(x[i], i) = 36
sum(x[i]^2, i) = 204
sum(x[i]^3, i) = 1296
sum(y[i], i) = 80.5
sum(y[i]*x[i], i) = 299
sum(y[i]*x[i]^2, i) = 1697
# con lo que las ecuaciones normales quedan:
80.5 == b[0]*9 + b[1]*36 + b[2]*204
299 == b[0]*36 + b[1]*204 + b[2]*1296
1697 == b[0]*204 + b[1]*1296 + b[2]*8772
# Resolviendo por matrices
[b[0]; b[1]; b[2]] := [9, 36, 204; 36, 204, 1296; 204, 1296, 8772]^-1*[80.5; 299; 1697] = [12.1848; -1.84654; 0.1829]
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# c) Sustituyendo
b[0] + b[1]*6.5 + b[2]*6.5^2 = 7.9099
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# En la práctica, puede ser difícil determinar el grado del polinomio que se ajusta a un conjunto de parejas de datos. Como siempre, es posible hallar un polinomio de grado n-1 que pase a través de los n puntos correspondientes a n valores distintos de x.
# Debe ser claro el objetivo de encontrar un polinomio de grado mínimo que “describa adecuadamente” a los datos. A menudo es posible determinar el grado con la simple observación de los datos.
# AJUSTE POLINOMIAL MEDIANTE LA VARIAZA RESIDUAL
# Cuando se ajusta un polinomio a un conjunto de parejas de datos, se suele empezar  ajustando una línea recta y se calcula la varianza residual después de este ajuste.
# Se sigue con las parábolas cuadrática, cúbica, etc. calculando las respectivas varianzas residuales.
# Cada una de estas varianzas residuales está dada por:
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# con la estimación de y determinada, respectivamente, de la ecuación de la recta del polinomio de segundo grado, etc..
# Los grados de libertad se determinan restando el número de puntos considerados y los coeficientes estimados.
# Este proceso se reitera, hacia grados superiores, hasta que la varianza residual produzca “el salto decreciente más significativo”.
# Problema: Dado el siguiente conjunto de datos:
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# encontrar el polinomio de mejor ajuste.
# Se intenta en primer lugar, el ajuste lineal. Para ello se determinan y resuelven  las ecuaciones normales:
x := 0
y := 0
x := transpose([.5, 1.5, 2.5, 5.5, 6.5, 9.5, 10.5, 12.5, 14.5, 15.5])
n := length(x)
i := 0 .. n - 1
y := transpose([3, 7, 12.5, 14.5, 16, 14.5, 16, 16, 21, 23])
# Se intenta en primer lugar, el ajuste lineal.
[b[0]; b[1]] := [n, sum(x[i], i); sum(x[i], i), sum(x[i]^2, i)]^-1*[sum(y[i], i); sum(y[i]*x[i], i)] = [6.57848; 0.983737]
# Luego se calcula la varianza residual
var_res[1] := sum((y[i] - b[0] - b[1]*x[i])^2, i)/(n - 2) = 7.20688
# El segundo ajuste es cuadrático
# Se sigue con el ajuste cuadrático
[b[0]; b[1]; b[2]] := [
    n, sum(x[i], i), sum(x[i]^2, i);
    sum(x[i], i), sum(x[i]^2, i), sum(x[i]^3, i);
    sum(x[i]^2, i), sum(x[i]^3, i), sum(x[i]^4, i)
]^-1*[sum(y[i], i); sum(y[i]*x[i], i); sum(y[i]*x[i]^2, i)] = [5.39938; 1.50042; -0.0326694]
var_res[2] := sum((y[i] - b[0] - b[1]*x[i] - b[2]*x[i]^2)^2, i)/(n - 3) = 7.57981
# El Tercer ajuste es cúbico
[b[0]; b[1]; b[2]; b[3]] := [
    n, sum(x[i], i), sum(x[i]^2, i), sum(x[i]^3, i);
    sum(x[i], i), sum(x[i]^2, i), sum(x[i]^3, i), sum(x[i]^4, i);
    sum(x[i]^2, i), sum(x[i]^3, i), sum(x[i]^4, i), sum(x[i]^5, i);
    sum(x[i]^3, i), sum(x[i]^4, i), sum(x[i]^5, i), sum(x[i]^6, i)
]^-1*[sum(y[i], i); sum(x[i]*y[i], i); sum(y[i]*x[i]^2, i); sum(y[i]*x[i]^3, i)] = [0.49717; 5.79298; -0.71398; 0.0281458]
var_res[3] := sum((y[i] - b[0] - b[1]*x[i] - b[2]*x[i]^2 - b[3]*x[i]^3)^2, i)/(n - 4) = 1.02062
# Y así hasta llegar a un polinomio de grado 9, que pasará por todos los puntos (varianza residual nula).
# Una tabla con las varianzas residuales para cada ajuste es la siguiente (hasta el orden cuártico):
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# Se ve que el salto mayor se produce entre el ajuste cuadrático y el cúbico, por lo tanto el mejor estimador lo constituye el ajuste cúbico.
# Graficamente:
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# REGRESIÓN MÚLTIPLE
#
# Es necesario señalar que las curvas obtenidas (y las superficies a obtener) no sólo se utilizan para hacer predicciones . A menudo también se emplean para fines de optimización, es decir, para determinar los valores de la variable independiente (o variables) de tal manera que la variable dependiente sea un máximo o un mínimo. En el caso del barniz del problema de ajuste cuadrático, el tiempo de secado tiene un mínimo cuando la cantidad de aditivo es de 5.1 gramos.
# Esto se obtiene derivando el polinomio de ajuate 12.2 - 1.85.x + 0.1873.x^2 e igualando a cero.
# En la regresión múltiple, se manejan datos que constan de n (r+1) coordenadas (x1_i, x2_i , …, xr_i, y_i) donde otra vez se supone que las x_i se conocen sin error,  mientras que las y son valores de variables aleatorias. Datos de esta clase aparecen en:
# •  Estudios diseñados para determinar el efecto que ejercen en la resistencia
# mecánica de un metal la corrosión bajo varias condiciones climáticas.
# •  El efecto que la temperatura de horneado, humedad  y contenido de hierro
# tienen en la resistencia mecánica de un revestimiento cerámico.
# •  El efecto de la producción industrial, nivel de consumo y existencias
# almacenadas producen en el precio de un producto.
# Como en el caso de una sola variable, en primer término se aborda el problema en que la ecuación de regresión es lineal, es decir cuando para cualquier conjunto determinado de valores x1, x2 , …, xr la media de la distribución es:
β[0] + β[1]*x1 + ... + β[r]*xr
# En el caso de dos variables independientes, el problema es ajustar un plano a un conjunto de n puntos con coordenadas (x1_(i,) x2_(i,) , y_(i,)). Gráficamente:
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# Aplicando el método de los mínimos cuadrados para obtener estimaciones de β_0, β_1 y β_2, se minimiza la suma de los cuadrados de las distancias verticales de los puntos del plano, es decir minimizar:
q == sum((y[i] - (β[0] + β[1]*x1[i] + β[2]*x2[i]))^2, i = 0 .. n - 1)
# Las ecuaciones normales resultantes de la aplicación de derivadas parciales son:
sum(y[i], i = 0 .. n - 1) == b[0]*n + b[1]*sum(x1[i], i = 0 .. n - 1) + b[2]*sum(x2[i], i = 0 .. n - 1)
sum(y[i]*x1[i], i = 0 .. n - 1) == b[0]*sum(x1[i], i = 0 .. n - 1) + b[1]*sum(x1[i]^2, i = 0 .. n - 1) + b[2]*sum(x1[i]*x2[i], i = 0 .. n - 1)
sum(y[i]*x2[i], i = 0 .. n - 1) == b[0]*sum(x2[i], i = 0 .. n - 1) + b[1]*sum(x1[i]*x2[i], i = 0 .. n - 1) + b[2]*sum(x2[i]^2, i = 0 .. n - 1)
# Estas son las ecuaciones normales para regresión múltiple con r=2. Donde b_0, b_1 y b_2 son estimadores de mínimos cuadrados para β_0, β_1 y β_2.
# Problema: Los datos siguientes provienen del número de torsiones necesarios para romper una barra hecha con cierto tipo de aleación y los porcentajes de metales que la integran:
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# Ajustar un plano de regresión por mínimos cuadrados y emplear su ecuación para estimar el número de torsiones requeridas para romper una de las barras cuando x1= 2.5 y x2 = 12.
x1 := transpose([1, 2, 3, 4, 1, 2, 3, 4, 1, 2, 3, 4, 1, 2, 3, 4])
n := length(x1)
i := 0 .. n - 1
x2 := transpose([5, 5, 5, 5, 10, 10, 10, 10, 15, 15, 15, 15, 20, 20, 20, 20])
y := transpose([38, 40, 85, 59, 40, 60, 68, 53, 31, 35, 42, 59, 18, 34, 29, 42])
[b[0]; b[1]; b[2]] := [
    n, sum(x1[i], i), sum(x2[i], i);
    sum(x1[i], i), sum(x1[i]^2, i = 0 .. n - 1), sum(x1[i]*x2[i], i = 0 .. n - 1);
    sum(x2[i], i = 0 .. n - 1), sum(x1[i]*x2[i], i = 0 .. n - 1), sum(x2[i]^2, i = 0 .. n - 1)
]^-1*[sum(y[i], i); sum(y[i]*x1[i], i = 0 .. n - 1); sum(y[i]*x2[i], i = 0 .. n - 1)] = [48.1875; 7.825; -1.755]
# El plano de regresión tiene entonces la ecuación
y == 48.188 + 7.825*x1 + (-1.755)*x2
# sustituyendo por x1= 2.5 y x2 = 12:
48.188 + 7.825*2.5 + (-1.755)*12 = 46.6905
# __________________________________________________________________
# COEFICIENTE DE CORRELACIÓN SIMPLE DE PEARSON
# (MODELO RECTILÍNEO)
#
# El coeficiente de correlación es una medida de asociación entre dos variables y se simboliza con la literal r.
# Los valores de la correlación van de + 1 a  1, pasando por el cero, el cual corresponde a ausencia de correlación.
# Los primeros dan a entender que existe una correlación directamente proporcional e inversamente proporcional.
# El coeficiente de correlación permite predecir si entre dos variables existe o no una relación o dependencia matemática.
# Supóngase que se quiere estudiar la correlación existente entre peso y altura de un grupo de personas tomadas al azar.
# Se someten los datos recogidos de peso y altura al análisis de correlación y se encuentra el coeficiente de correlación entre ambas, resultando r = 0.78.
# Esto significa que a mayor altura correspondería mayor peso.
# Otro caso, en el siguiente gráfico se observa la correlación entre potencia de motor de un automóvil y consumo en litros por cada 100 Km.
# El r = 0.87 (correlación positiva).
# Evidentemente a mayor potencia se observa mayor consumo de combustible. Esto quiere decir que la correlación entre potencia y consumo no es aleatoria.
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# En el siguiente gráfico se encuentra la relación existente entre peso del automóvil en kg. y aceleración 0 a 100 Km/hora en segundos.
# Para este caso, r=- 0.56. Esto significa que existe una correlación negativa significativa, entre peso del auto y respuesta de la aceleración.
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# Para interpretar el coeficiente de correlación, Colton a dado los siguientes lineamientos generales:
#
# •  Valor de r de 0 a 0.25 implica que no existe correlación entre ambas
# variables.
# •  Valor de r de 0.25 a 0.50 implica una correlación baja a moderada.
# •  Valor de r de 0.50 a 0.75 implica correlación moderada a buena.
# •  Valor de r de 0.75 o mayor, implica una muy buena a excelente
# correlación.
#
# Estos rangos de valores se pueden extrapolar a correlaciones negativas también.
# Se debe tener cuidado al analizar la correlación entre dos variables, de que ambas varíen juntas permanentemente.
# Esto parece redundante, pero es importante. Por ejemplo, si se correlaciona edad y altura. La altura irá aumentando con la edad hasta un determinado punto en donde ya no aumentará más.
# Puede que exista una relación que no sea lineal, sino exponencial, parabólica, etc. En estos casos, el coeficiente de correlación lineal mediría mal la intensidad de la relación entre las variables, por lo que convendría utilizar otro tipo de coeficiente más apropiado.
# Para ver, por tanto, si se puede utilizar el coeficiente de correlación lineal, lo mejor es representar los pares de valores en un gráfico y ver que forma describen.
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# Para calcular el coeficiente de correlación lineal se considera el caso en que las dos variables son aleatorias. Dada una muestra:
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# El coeficiente de correlación de la muestra de tamaño n proveniente de una población bidimensional (X,Y), se pueden determinar como:
r == Sxy/sqrt(Sxx*Syy)
# Recordemos las expresiones Sxx, Syy y Sxy
Sxx == n*sum(x[i]^2, i = 0 .. n - 1) - sum(x[i], i = 0 .. n - 1)^2
Syy == n*sum(y[i]^2, i = 0 .. n - 1) - sum(y[i], i = 0 .. n - 1)^2
Sxy == n*sum(x[i]*y[i], i = 0 .. n - 1) - sum(x[i], i = 0 .. n - 1)*sum(y[i], i = 0 .. n - 1)
# Se puede demostrar que el valor de r cumple con la condición  -1 < r < 1
# Los valores de la muestra (x_1, y_1) (x_2, y_2)  ……  (x_n, y_n) se localizan sobre una recta si y sólo si el coeficiente de correlación tiene los valores +1 ó 1
# Problema: Sea la siguiente muestra:
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x := 0
y := 0
x := transpose([26, 45, 111, 92, 119, 114, 136, 156, 132, 55, 30, 35])
y := transpose([36, 59, 102, 90, 97, 116, 114, 143, 131, 59, 41, 37])
n := length(x) = 12
i := 0 .. n - 1
# El diagrama de dispersión correspondiente es:
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# y para calcular el coeficiente de correlación, se procede del siguiente modo:
Sxx := n*sum(x[i]^2, i = 0 .. n - 1) - sum(x[i], i = 0 .. n - 1)^2 = 287987
Syy := n*sum(y[i]^2, i = 0 .. n - 1) - sum(y[i], i = 0 .. n - 1)^2 = 188771
Sxy := n*sum(x[i]*y[i], i = 0 .. n - 1) - sum(x[i], i = 0 .. n - 1)*sum(y[i], i = 0 .. n - 1) = 228733
r := Sxy/sqrt(Sxx*Syy) = 0.981013  # Coeficiente de correlación
# Más fácil, utilizando Mathcad:
corr(x, y) = 0.981013
# COEFICIENTE DE CORRELACIÓN DE LA POBLACIÓN
#
# Hasta aquí se usó una muestra de n parejas (x_1, y_1)(x_2, y_2  ……  (x_n, y_n) que se tomaron de una población XY.
# Dadas las variables aleatorias X e Y, las medias poblacionales se definen como:
# μ_X = E [X]  y  μ_Y = E [Y]
# a las varianzas s_X^2 y s_Y^2 les corresponden las varianzas:
# σ_X^2 = E [(X - μX) ^2]  y  σ_Y^2 = E [(Y - μY) ^2]
# la cantidad
# σ_XY = E [(X - μ_X) (Y - μ_Y)]
# se llama covarianza de las variables aleatorias X e Y. El cociente:
ρ == σ[XY]/(σ[X]*σ[Y])
# se llama coeficiente de correlación de X e Y.
# Si ρ = 0, se dice que X e Y son no correlacionadas, también si X e Y son independientes  σ_XY = 0 y  ρ = 0.
#
# Teorema: Si las variables aleatorias X e Y son independientes entonces son no correlacionadas. Lo recíproco no es cierto.
# Ejemplo: Suponer que X es una variable aleatoria que toma los valores 1, 0 y +1 con probabilidad p=1/3.
# Luego, μ_X = 0 . Sea Y = X^2, entonces:
# σ_XY = E[XY] - E[X] E[Y] = E [X^3] - 0. E[Y]
# σ_XY = (-1) ^3 1/3 +  (0) ^3 1/3 + (1) ^3 1/3 = 0
# Luego, por ser σ_XY = 0, ρ = 0, las variables aleatorias X e Y no están correlacionadas, pero no son independientes entre sí, ya que están ligadas por una relación funcional.
#
# En el ejemplo se ve que ρ no es una medida de la dependencia general, pero si se verá que es una medida de la dependencia lineal.
# VARIACIÓN EXPLICADA Y NO EXPLICADA
#
# La variación total de una variable aleatoria Y se define como:
sum((y[i] - mean(y))^2, i = 0 .. n - 1)
# es decir, la suma de los cuadrados de las desviaciones de los valores de la variable aleatoria Y respecto de su media. La misma se puede reescribir como:
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# El primer término del segundo miembro se llama variación no explicada, mientras que el segundo se llama variación explicada.
# En el primer caso la variación tiene un comportamiento aleatorio (por y_i),0 mientras que en el segundo hay un patrón definido.
# Resultados análogos se obtienen para la variable X.
#
# La razón de la variación explicada a la variación total se llama Coeficiente de Correlación.
# Si la variación explicada es cero, es decir la variación total es toda no explicada, esta razón es cero.
# Si la variación no explicada es cero, es decir, la variación total es toda explicada, entonces la razón es uno.
# En los demás casos la razón se encuentra entre 0 y 1.
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# Los signos + se utilizan para la correlación lineal positiva y negativa, respectivamente. Nótese que r es una cantidad sin dimensiones, es decir no depende de las unidades empleadas.
# Problema: Los datos siguientes corresponden al número de minutos x que tardan 10 mecánicos en ensamblar cierta pieza de una maquinaria en la mañana, e y representa el tiempo que ocupan en la tarde.
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# Calcular r.
x := 0
y := 0
x := transpose([11.1, 10.3, 12, 15.1, 13.7, 18.5, 17.3, 14.2, 14.8, 15.3])
y := transpose([10.9, 14.2, 13.8, 21.5, 13.2, 21.1, 16.4, 19.3, 17.4, 19])
n := length(x)
i := 0 .. n - 1
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a := intercept(x, y) = 2.27443  # ordenada al origen
b := slope(x, y) = 1.01234  # pendiente
VE := sum((a + b*x[i] - mean(y))^2, i) = 61.8802  # variación explicada
VT := sum((y[i] - mean(y))^2, i) = 115.576  # variación Total
r := sqrt(VE/VT) = 0.731715
r^2 = 0.535407
# Esto implica que r^2.100% (es decir 53.5%) de la variación entre los tiempos de la tarde responden a las diferencias correspondientes entre los tiempos de la mañana.
# PRUEBAS DE HIPÓTESIS PARA LA CORRELACIÓN
# Siempre que un valor de r se fundamenta en una muestra aleatoria de una población normal bivariada, se puede practicar una prueba de significación (como ρ = ρ _0) o construir un intervalo de confianza para ρ, en base a la transformación:
Z == 1/2*ln((1 + r)/(1 - r))
# Z es un estadístico con distribución normal con media y varianza dadas por las siguientes expresiones:
μ_Z == 1/2*ln((1 + ρ)/(1 - ρ))
σ_Z == 1/(n - 3)
# Luego las inferencias respecto de ρ serán:
z == (Z - μ_Z)/(1/sqrt(n - 3)) == sqrt(n - 3)*ln((1 + r)*(1 - ρ)/((1 - r)*(1 + ρ)))
# donde z es una variable aleatoria con distribución normal estándar.
# En particular, se puede probar la Hipótesis Nula de que no hay correlación (ρ =0)
# con el estadístico
z == sqrt(n - 3)*ln((1 + r)/(1 - r))
# Ejemplo: En relación con el problema anterior (donde n=10 y r=0.73) probar la Hipótesis Nula que ρ =0 contra la alternativa ρ <> 0 con un nivel de significancia de 0.05.
# 1  Hipótesis Nula ρ =0
# Hipótesis Alternativa ρ < >0 (bilateral)
#
# 2 -  Nivel de significancia: 0.05
α := 0.05
z025 := qnorm(1 - α/2, 0, 1) = 1.95996
# 3.  Criterio: se rechaza Ho si z < -1.96 o z > 1.96
t := -3, -2.99 .. 3
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# 4  Cálculos:
z := sqrt(n - 3)/2*ln((1 + r)/(1 - r)) = 2.46692  # Estadístico
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# 5  Decisión:  Dado que 2.457 > 1.96 se Rechaza la Hipótesis Nula, por lo tanto se acepta la Hipótesis Alternativa, esto es existe relación entre el tiempo que ocupa en la mañana y en la tarde, un mecánico para ensamblar un determinado tipo de maquinaria.
# Si se quiere construir un intervalo de confianza para ρ se debe empezar por construir uno para μ_Z:
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# Ejemplo: Si r=0.70 para las calificaciones en Física y Matemática de 30 estudiantes, construir un intervalo de confianza con un nivel de confianza del 95% para el coeficiente de correlación de la población.
α := 0.05
n := 30
r := 0.70
z025 := qnorm(1 - α/2, 0, 1) = 1.95996
Z := 1/2*ln((1 + r)/(1 - r)) = 0.867301
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# intervalo de confianza
Z - z025/sqrt(n - 3) = 0.490105
Z + z025/sqrt(n - 3) = 1.2445
0.49 < μ_Z < 1.244
# y como:
μ_Z == 1/2*ln((1 + ρ)/(1 - ρ))
# despejando ρ
ρ == (e^(2*μ_Z) - 1)/(e^(2*μ_Z) + 1)
# el intervalo para ρ queda:
(e^(2*0.49) - 1)/(e^(2*0.49) + 1) = 0.454216  # extremo inferior
(e^(2*1.244) - 1)/(e^(2*1.244) + 1) = 0.846593  # extremo superior
0.454 < ρ < 0.847
# Ejemplo: Si r=0.20 para una muestra aleatoria de n=40 parejas de datos, construir un intervalo de confianza del 95% para ρ.
α := 0.05
n := 40
r := 0.20
z025 := qnorm(1 - α/2, 0, 1) = 1.95996
Z := 1/2*ln((1 + r)/(1 - r)) = 0.202733
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# intervalo de confianza
Z - z025/sqrt(n - 3) = -0.119484
Z + z025/sqrt(n - 3) = 0.524949
-0.119 < μ_Z < 0.525
# y como:
μ_Z == 1/2*ln((1 + ρ)/(1 - ρ))
# despejando ρ
ρ == (e^(2*μ_Z) - 1)/(e^(2*μ_Z) + 1)
# el intervalo para ρ queda:
(e^(2*(-0.119)) - 1)/(e^(2*(-0.119)) + 1) = -0.118441
# extremo inferior
(e^(2*0.525) - 1)/(e^(2*0.525) + 1) = 0.48155  # extremo superior
-0.118 < ρ < 0.482
# En ambos ejemplo los intervalos de confianza son grandes para ρ.
# Esto ilustra el hecho de que los coeficientes de correlación basados en muestras relativamente chicas suelen ser poco confiables.
# Existen varias trampas peligrosas en la interpretación de ρ.
# r es una estimación de la fuerza de la relación entre los valores de dos variables aleatorias. En la siguiente figura r puede ser muy cercana a cero, aún cuando hay una fuerte relación funcional (parabólica, no lineal).
i := 0 .. 10
x[i] := (i - 5)/5
y[i] := x[i]^2
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corr(x, y) = 0
# En segundo lugar, una correlación significativa no necesariamente implica una relación causal entre las dos variables aleatorias.
