# Worksheet setting: ORIGIN = 1
# ANÁLISIS DE VARIANZA
# Se supone el caso de un fabricante y tres consumidores de latas cuyo fondo tengan al menos 0.25 libras de recubrimiento de estaño.
# Mediante un tratamiento químico, se puede medir el peso de este recubrimiento, pero desgraciadamente no se puede repetir la experiencia con la misma muestra en los cuatro laboratorios.
# Un ensayo experimental puede consistir en cortar discos a enviar a cada laboratorio, pero puede haber diferencias en el promedio debido: a) diferencias sistemáticas en la técnica de medición, b) variabilidad aleatoria.
# Por otro lado, está la incógnita de cuántos discos deberían cortarse para enviar a cada laboratorio.
# Se supondrá que este número está en el orden de 12 por laboratorio (en total 48 discos).
# La pregunta ahora es cómo seleccionar esos 48 discos de una chapa, lo primero que viene a la mente es enviar según este formato:
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# Si las medias de las mediciones realizadas por cada uno de los laboratorios están muy dispersas, indica falta de consistencia en las mediciones.
# Esto puede ser porque todos miden distinto o quizá porque la distribución del depósito en la chapa es irregular.
# Es decir, se confunde la inconsistencia de los laboratorios con la cantidad de estaño depositado en la tira.
# Una solución posible para esto sería numerar aleatoriamente los discos, por medio de una Tabla de Números Aleatorios o con una computadora, destinando a cada uno de los laboratorios los siguientes discos:
#
# Laboratorio A: 3, 10, 22 ….
# Laboratorio B: 33, 42, 8 ….
# Laboratorio A: 15, 12, 28 ….
# Laboratorio A: 45, 21, 35 ….
# Esta alternativa “disuelve” el patrón de la disposición de estaño sobre la chapa (por ejemplo, más espesor en el centro que en los bordes).
# Al aleatorizar el total de los 48 discos sólo queda atribuir “a variación aleatoria” las causas extrañas.
# Otra solución podría ser entregar los 48 de una misma tira (experimentación controlada), pero los resultados serían sólo aplicables a distancias fijas del extremo de la lámina.
# En la práctica, los experimentos deberán planearse de tal manera que las fuente conocidas de variabilidad  sean deliberadamente consideradas sobre un rango tan amplio como sea necesario.
# Más aún, deberán variarse en tal forma que su variabilidad pueda eliminarse en la estimación de la variable aleatoria.
# Un modo es repetir el experimento en varios bloques en los que la fuente conocida de variabilidad (esto es, variables extrañas) se mantienen fijas en cada bloque,  pero variando de bloque en bloque:
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# De este modo, las diferencias entre medias obtenidas por los 4 laboratorios, no pueden atribuirse a variaciones entre tiras.
# DISEÑOS COMPLETAMENTE ALEATORIOS
# Se supone que el experimentador cuenta con los resultados de k muestras aleatorias independientes, cada una de tamaño n, de k diferentes poblaciones (datos relativos a k tratamientos, k grupos, k métodos de producción, etc.).
# Interesa probar la hipótesis de que las medias de esas k poblaciones son todas iguales.
# Se denota a la j-ésima observación de la i-ésima muestra por y _(i j).
# El esquema general para un criterio de clasificación es:
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# Bajo este esquema experimental, en referencia al ejemplo tratado,
# y_ij (i=1,2,..,4; j=1,2,…, 12) es la j-ésima medición del peso del revestimiento del iésimo laboratorio, e
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# es la media global (o gran media) de las 48 observaciones.
# Para pruebas de hipótesis (medias iguales) se supondrá estar trabajando con poblaciones normales de la misma σ^2.
# Si μ_i es la media de la población i-ésima y σ^2 es la varianza común de las k poblaciones, se puede expresar cada observación y_ij como μ_i más el valor del componente aleatorio:
y[i, j] == μ[i] + e[i, j]  # para i=1, 0, ..., k; j=1, 2, ..., n
# ε _(i,j) es una variable aleatoria con distribución normal, μ = 0 y σ^2 común.
# Para dar uniformidad a las ecuaciones, se reemplaza μ_i por μ + α_i , donde μ es la media de las μ_i y α_i es el efecto del i-ésimo tratamiento, de aquí que
sum(α[i], i = 1 .. k) == 0
# esto surge de:
μ == 1/k*sum(μ[i], i = 1 .. k) == 1/k*sum(μ + α[i], i = 1 .. k) == k*μ/k + 1/k*sum(α[i], i = 1 .. k)
# luego, la expresión de y_ij queda:
y[i, j] == μ + α[i] + ε[i, j]  # para i=1, 0, ..., k; j=1, 2, ..., n
# Por lo tanto, la Hipótesis Nula (las medias de las k poblaciones iguales) se reemplaza por la Hipótesis Nula de que  α_1 =  α_2 = … =  α_k = 0.
# La Hipótesis Alterna de que al menos dos de las medias son distintas equivale a que α_i < > 0 para alguna i.
# Para probar la Hipótesis Nula, se comparan las estimaciones de σ^2 (una en base a la observación de las medias muestrales y la otra con la variación dentro de la muestra).
# Ya que cada muestra viene de una población con varianza σ^2 , la varianza se puede estimar de cualquiera de las muestras:
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# y entonces también por su media:
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# Cada una de las varianzas muestrales s_i^2 está basada en (n-1) grados de libertad y entonces
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# está basada en k.(n-1) grados de libertad.
# Por otro lado, la varianza de las k medias muestrales está dada por:
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# y si la hipótesis es verdadera, esta expresión da una estimación de σ^(2/)n y así una estimación de σ^2 , pero basada en la diferencia entre las medias, está dada por
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# basada en (k-1) grados de libertad.
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# es una variable aleatoria con distribución F con ν_(1) = k - 1 y ν_(2) = k.(n - 1) grados de libertad
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# Con el argumento anterior se ha indicado cómo la prueba de las k medias se puede fundamentar en la comparación de dos estimaciones de varianzas.
# Es notable el hecho de que las dos estimaciones en cuestión [excepto para los divisores (k-1) y k.(n-1)] pueden obtenerse “partiendo” o analizando la varianza total de las n.k observaciones en dos partes.
# La varianza muestral de las n.k observaciones está dada por:
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# Se puede probar el siguiente teorema respecto del numerador, llamado Suma de Cuadrados Total:
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# Demostración:
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# se verifica la relación anterior:
#
# Se acostumbra a denotar:
# a)  Suma de Cuadrados Total, SST:
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# b)  Suma de Cuadrados de Error, SSE:
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# c)  Suma de Cuadrados de Tratamiento SS(Tr):
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# Luego, F se puede escribir así:
F == SS(Tr)/(k - 1)/(SSE/(k*(n - 1)))
# Los resultados obtenidos son mostrados en la siguiente tabla:
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# Ejemplo: A fin de utilizar el Análisis de Varianza para un criterio de clasificación, suponer el siguiente esquema de mediciones de cuatro laboratorios de un parámetro determinado (revestimiento de estaño de 12 discos) cuyos resultados son:
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# del que se quiere probar que las medias obtenidas por cada uno de ellos es significativamente igual (Hipótesis Nula) con α=0.05. Construir una Tabla de análisis de varianza.
# 1.  Hipótesis nula: Las medias de las mediciones son iguales
# Hipótesis alternativa: No lo son
# 2.  Nivel de significancia: α =0.05
α := 0.05
# 3.  Criterio se acepta la Ho si F < 2.816
k := 4  # número de tratamientos
n := 12  # tamaño de la muestra
ν1 := k - 1 = 3  # grados de libertad del numerador
ν2 := k*(n - 1) = 44  # grados de libertad del denominador
F05 := qF(1 - α, ν1, ν2) = 2.81647  # F crítico
t := 0, 0.01 .. 5
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# 4.  Cálculos:
# Para facilitar cálculos, se utilizan las fórmulas:
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# Demostración:
#
# •  Para Suma de Cuadrados total
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# •  Para Suma de Cuadrados de Tratamientos:
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# donde C (llamado Término de Corrección) y T_i es:
T[i] == sum(y[ij], j = 1 .. n)
# Para obtener los datos del problema, se leen de un archivo externo.
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y := READPRN("c:\datos\x.txt")  # error: No se puede abrir el fichero de datos.
y := [
    .25, .27, .22, .30, .27, .28, .32, .24, .31, .26, .21, .28;
    .18, .28, .21, .23, .25, .2, .27, .19, .24, .22, .29, .16;
    .19, .25, .27, .24, .18, .26, .28, .24, .25, .2, .21, .19;
    .23, .3, .28, .28, .24, .34, .2, .18, .24, .28, .22, .21
]
n := cols(y) = 12  # Tamaño de las muestras
nk := rows(y) = 4  # Número de tratamientos
i := 1 .. k
j := 1 .. n  # Índices
C := 1/(k*n)*sum(sum(y[i, j], j = 1 .. n), i = 1 .. k)^2 = 2.847  # Término de corrección
sum(sum(y[i, j], j = 1 .. n), i = 1 .. k) = 11.69
T[i] := sum(y[i, j], j = 1 .. n)  # Vector de suma de filas
SST := sum(sum(y[i, j]^2, j = 1 .. n), i = 1 .. k) - C = 0.0808979  # Suma de cuadrados total
SS_Tr := 1/n*sum(T[i]^2, i = 1 .. k) - C = 0.0130063  # Suma de cuadrados de tratamientos
SSE := SST - SS_Tr = 0.0678917  # Suma de cuadrados de error
MS_Tr := SS_Tr/(k - 1) = 0.00433542
43/15 = 2.86667
MSE := SSE/(k*(n - 1)) = 0.00154299
F := 0.0043/0.0015 = 2.86667  # Estadístico
# La tabla queda
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# 5.  Decisión:  Ya que F (2.87) excede a F0.05= 2.82, se rechaza la Hipótesis Nula, luego los laboratorios no están logrando resultados consistentes.
# Para estimar los parámetros μ, α_1, α_2, α_3 y α_4 se puede emplear mínimos cuadrados minimizando:
sum(sum((y[i, j] - μ - α[i])^2, j = 1 .. n), i = 1 .. k)
# con respecto a μ y a las α_i , sujetas a la restricción
sum(α[i], i = 1 .. k) == 0
# Derivando la penúltima expresión respecto de μ e igualando a cero:
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# para un i dado:
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# Ejemplo: Estimar los parámetros del modelo con un criterio de clasificación para los revestimientos de estaño del ejemplo anterior.
μ := 1/(n*k)*sum(sum(y[i, j], j = 1 .. n), i = 1 .. k) = 0.243542  # estimación del parámero μ
α[i] := sum(transpose(y)[:, i])/n - μ  # Estimaciones del parámetro α
transpose(α) = [0.0239583, -0.016875, -0.0135417, 0.00645833]
sum(α) = 8.32667e-17
# TAMAÑOS MUESTRALES DISTINTOS
#
# El Análisis de Varianza descripto, se aplica a criterios de clasificación en que cada muestra tiene el mismo número de observaciones.
# Si no es así, y los tamaños muestrales son n_1, n_2, …, n_k se tiene que sustituir
# N = Σ ni por n.k en todo lo anterior, quedando el siguiente esquema de partida:
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# Se obtiene la varianza dentro de la muestra:
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# y
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# La varianza de las k medias muestrales es:
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# con lo cual se determina:
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# La varianza muestral de las N observaciones está dada por:
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# Se puede demostrar que:
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# SST = SSE + SS(Tr)
# Con:
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# siendo:
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# Problema: El contenido de aflatoxina, en partes por millón,  de algunas muestras de crema de maní se prueba y se consiguen los siguientes resultados:
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# a)  Emplear Análisis de Varianza para probar si las dos marcas difieren en contenido de aflatoxina, con un nivel de significancia α=0.05.
# b)  Probar la misma hipótesis usando la prueba t-bimuestral.
# 1.  Hipótesis nula:  las dos marcas no difieren en contenido de aflatoxina
# Hipótesis alternativa: Si difieren
# 2.  Nivel de significancia: α =0.05
α := 0.05
# 3.  Criterio se acepta la Ho si F < 2.816
y1 := transpose([0.5, 0, 3.2, 1.4, 0, 1.0, 8.6, 2.9])
y2 := transpose([4.7, 6.2, 0, 10.5, 2.1, 0.8])
n[1] := length(y1)
n[2] := length(y2)
N := n[1] + n[2] = 14
k := 2
ν1 := k - 1 = 1
ν := N - 1 = 13
ν2 := ν - ν1 = 12  # g. de libertad
F05 := qF(1 - α, ν1, ν2) = 4.74723
t := 0, 0.01 .. 10
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# 4.  Cálculos:
T[1] := sum(y1[j], j = 1 .. n[1])
T[2] := sum(y2[j], j = 1 .. n[2])
C := 1/N*(sum(y1[j], j = 1 .. n[1]) + sum(y2[j], j = 1 .. n[2]))^2 = 125.401
SST := sum(y1[j]^2, j = 1 .. n[1]) + sum(y2[j]^2, j = 1 .. n[2]) - C = 146.249
SS_Tr := sum(T[i]^2/n[i], i = 1 .. k) - C = 11.7343
MS_Tr := SS_Tr/ν1 = 11.7343
SSE := SST - SS_Tr = 134.515
MSE := SSE/ν2 = 11.2096
F := MS_Tr/MSE = 1.04681  # Estadístico
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# Dado que 1.05 < 4.75 (valor de F, de Tablas, con α=0.05, ν1=1 y ν2=12) se Acepta la Hipótesis Nula, luego dos marcas NO difieren en el contenido de aflatoxina.
# b)
# 1.  Hipótesis nula:  las dos marcas no difieren en contenido de aflatoxina
# Hipótesis alternativa: Si difieren
# 2.  Nivel de significancia: α =0.05
α := 0.05
ν := n[1] + n[2] - 2 = 12  # grados de libertad
t025 := qt(1 - α/2, ν) = 2.17881
# 3.  Criterio se acepta la Ho si 2.179 < t < 2.816
w := -3, -2.99 .. 3
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# El estadístico para esta prueba es:
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t := (mean(y1) - mean(y2) - 0)/sqrt((n[1] - 1)*n[1]/(n[1] - 1)*var(y1) + (n[2] - 1)*n[2]/(n[2] - 1)*var(y2))*sqrt(n[1]*n[2]*(n[1] + n[2] - 2)/(n[1] + n[2])) = -1.02314
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t = -1.02314
# 5.  Decisión: Se aprecia que  t (-1.023) > -t025 por lo tanto se Acepta la  Hipótesis Nula de que las dos marcas NO difieren en el contenido de aflatoxina.
# DISEÑO EN BLOQUES ALEATORIOS
#
# Se supondrá que el experimentador tiene a su disposición mediciones relativas a a tratamientos distribuidos en b bloques.
# Se considerará el caso en que hay exactamente una observación de cada tratamiento en cada bloque (para el caso anterior, cada laboratorio probaría un disco de cada tira).
# Si y_ij denota la observación relativa al i-esimo tratamiento y al j-ésimo bloque,
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# es la media de las b observaciones para el i-ésimo tratamiento
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# es la media de las a observaciones para el j-ésimo bloque
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# es la gran media de las a.b observaciones
# se emplea el siguiente esquema en esta clase de clasificación con dos criterios:
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# Al esquema se lo llama aleatorio, siempre que los tratamientos sean asignados al azar dentro de cada bloque.
# Cuando se usa un punto en lugar de un subíndice, esto significa que la media se obtiene sumando sobre él.
# El modelo que se supondrá para el análisis con una observación por “celda” está dado por:
y[ij] == μ + α[i] + β[j] + ε[ij]
# aquí μ es la gran media, α_i es el efecto de i-ésimo tratamiento, β_i el efecto del j-ésimo bloque y los ε _ij son valores de variables aleatorias independientes normalmente distribuidas que tienen media cero y varianza común σ^2 .
# Se restringen los parámetros imponiendo las condiciones que:
sum(α[i], i = 1 .. a) == 0
sum(β[j], j = 1 .. b) == 0
# En el análisis de clasificación con dos criterios, cada tratamiento es representado una vez dentro de cada bloque, el objetivo principal consiste en probar la significancia de las diferencias entre las medias o sea, probar la Hipótesis Nula:
# α_1 =  α_2 = … =  α_a= 0.
# Más aún, quizás convenga probar si la división en bloques ha sido eficaz, esto es probar que la Hipótesis Nula: β_1 =  β_2 = … =  β_b = 0 puede rechazarse o no.
# En cualquier caso, la Hipótesis alterna establece que al menos uno de los efectos no es cero.
# Como en el análisis con un criterio, se fundará la prueba de significancia mediante comparaciones de σ^2 (una basada en la variación entre tratamientos, la otra basada en la variación entre bloques y la última que mide el error experimental ).
# Nótese que sólo el último es una estimación de σ^2 cuando cualquiera (o ambas) las Hipótesis Nulas no son válidas.
# Las sumas de cuadrados requeridas están dadas por el siguiente teorema:
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# SST = SSE + SS(Tr) + SS_Bl
# En la práctica se usan las siguientes fórmulas:
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# Donde:
# C  es el término de corrección
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# es la suma de las b observaciones para el i-ésimo tratamiento
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# es la suma de las a observaciones para el j-ésimo bloque
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# es la suma de todas las observaciones
# Empleando esta sumas de cuadrados, se puede rechazar la Hipótesis Nula de que las α_i son todas nulas, con un nivel de significancia α si:
F_Tr == MS_Tr/MSE == SS_Tr/(a - 1)/(SSE/((a - 1)*(b - 1)))
# excede F_(α) con (a-1) y (a-1).(b-1) grados de libertad.
# Se puede rechazar la Hipótesis Nula de que todas las β_i son todas nulas, con un nivel de significancia α si:
F_Bl == MS_Bl/MSE == SS_Bl/(b - 1)/(SSE/((a - 1)*(b - 1)))
# excede F_(α) con (b-1) y (a-1).(b-1) grados de libertad.
# Nótese que las medias de los cuadrados MS_Tr, MS_Bl y MSE se definen otra vez como las correspondientes sumas de cuadrados divididas entre sus grados de libertad.
# La siguiente tabla resume todo el procedimiento:
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# Ejemplo: Se diseñó un experimento para estudiar el rendimiento de cuatro detergentes diferentes. Las siguientes lecturas de “blancura” se obtuvieron con un equipo especialmente diseñado para 12 cargas de lavado , distribuidas en tres modelos de lavadoras:
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# Considerando los detergentes como tratamientos y las lavadoras como bloques, obtener la Tabla de Análisis de Varianza y probar, con un nivel de significación 0.01, si existen diferencias entre los detergentes y/o entre las lavadoras.
# 1  Hipótesis Nula: α_1 = α_2 = α_3 = α_4 = 0 , β_1 = β_2 = β_3 = 0
# Hipótesis Alternativa: no todas las α  y tampoco las β iguales a 0.
#
# 2 -  Nivel de significancia: α =0.01.
α := 0.01
y := [45, 43, 51, 139; 47, 46, 52, 145; 48, 50, 55, 153; 42, 37, 49, 128; 182, 176, 207, 565]
a := rows(y) - 1 = 4
b := cols(y) - 1 = 3
# 3-  Criterio: Se rechaza Ho si F > 9.78  (este valor corresponde a F_0.01 con ν1 = 3 y  ν2 = 6)
# O si F > 10.9  (este valor corresponde a F_0.01 con ν1 = 2 y  ν2 = 6)
ν1 := a - 1 = 3
ν2 := b - 1 = 2
ν := a*b - 1
ν3 := ν - ν1 - ν2 = 6
FTr01 := qF(1 - α, ν1, ν3) = 9.77954  # F crítico para tratamiento
FBl01 := qF(1 - α, ν2, ν3) = 10.9248  # F crítico para bloques
# 4  Cálculos:
i := 0 .. a - 1
j := 0 .. b - 1  # índices
T_punto_i := y[:, b + 1]
transpose(T_punto_i) = [139, 145, 153, 128, 565]
T_j_punto := transpose(y)[:, a + 1]
transpose(T_j_punto) = [182, 176, 207, 565]
T_punto_punto := y[a + 1, b + 1] = 565
C := T_punto_punto^2/(a*b) = 26602.1
SST := sum(sum(y[i, j]^2, j = 1 .. b), i = 1 .. a) - C = 264.917
SS_Tr := 1/b*sum(T_punto_i[i]^2, i = 1 .. a) - C = 110.917
SS_Bl := 1/a*sum(T_j_punto[j]^2, j = 1 .. b) - C = 135.167
SSE := SST - SS_Tr - SS_Bl = 18.8333
# La Tabla queda:
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t := 0, 0.01 .. 12
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# 5-  Decisión: Dado que 11.6 > 9.78 (crítico) se Rechaza la primera Hipótesis Nula, por lo tanto hay diferencia significativa entre la eficacia de los detergentes, y dado que 21.1 > 10.9 (crítico) también hay diferencia significativa entre la eficacia de las lavadoras.
# COMPARACIONES MÚLTIPLES
#
# Con las pruebas F empleadas se demostraba si las diferencias entre varias medias eran significativas, pero no informaban si una media en particular (o medias) difieren en forma significativa de otra media considerada (o grupo de medias). En el caso de los pesos de los recubrimientos puede ser importante que los laboratorios difieran unos de los otros.
# Si un experimentador tiene ante sí k medias, parece razonable probar entre todos los pares posibles, esto es efectuar k.(k-1)/2 pruebas t bimuestrales.
# Esto no es eficiente. Para ello se utilizan Pruebas de Comparaciones Múltiples, y entre ellas la Prueba del Rango Múltiple de Duncan.
# Las suposiciones básicas son, en esencia, las del análisis de la varianza en una dimensión para tamaños muestrales iguales.
# La prueba compara el Rango de Mínima Significancia, R_p, dado por:
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# es una estimación de:
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# y puede calcularse como:
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# donde MSE es la media de los cuadrados de error en el Análisis de Varianza.
# El valor de r_p depende del valor deseado de significancia y del número de grados de libertad correspondiente a la MSE, que se obtienen de tablas existentes en la bibliografía (Miller y Freund, “Estadística para Ingenieros”, tablas 12a, para α=0.05 y 12b, para α=0.01, con p=2,3,…,10 y para varios grados de libertad entre 1 y 120).
# http://www.um.edu.ar/math/estadis/tablas/duncan.htm
# Ejemplo: Con respecto a los datos de los pesos de los recubrimientos de estaño, aplicar la prueba del Rango Múltiple de Duncan para probar cuáles medias de los laboratorios difieren de las otras empleando un nivel de significancia de 0.05.
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# Para ello se ordenan, en forma creciente, las cuatro medias muestrales:
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# Luego, se hace el siguiente cálculo considerando el valor MSE de la Tabla de Análisis de la Varianza.
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# siendo el número de grados de libertad ν = k.(n-1) = 44. Por interpolación, en la Tabla 12-a, se obtienen los valores de r_p:
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# Para p = 2
2.843 + (2.858 - 2.843)/2 = 2.8505
# Para p= 3
2.991 + (3.005 - 2.991)/2 = 2.998
# Para p= 4
3.087 + (3.102 - 3.087)/2 = 3.0945
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# multiplicando r_p por
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3.160*0.273 = 0.86268
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# El rango de las cuatro medias es 0.268 - 0.227 = 0.041, que excede a R4 = 0.034, que es el rango significativo mínimo.
#
# Esto era de esperar, porque la prueba F indicó que las diferencias entre las cuatro medias eran significativas con α = 0.05.
# Para probar que hay diferencias significativas entre tres medias adyacentes, se obtienen los rangos de 0.038 y 0.023 respectivamente para 0.230, 0.250, 0.268 y 0.227, 0.230, 0.250.
# Puesto que el primero de estos valores sobrepasa a R_3 = 0.033, las diferencias correspondientes no son significativas.
# Por último en el caso de parejas adyacentes de medias, ningún par adyacente tiene rango mayor que el rango significativo mínimo R_2 = 0.031.
# Esto se resume:
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# donde se ha dibujado una línea bajo cualquier conjunto de medias adyacentes para las cuales el rango es menor que un valor correspondiente de R_p , esto es, bajo cualquier conjunto de medias adyacentes, para las cuales las diferencias no son significativas.
#
# Se concluye así que el Laboratorio A obtiene los pesos medios de recubrimiento más alto que los Laboratorios B y C.
# OTROS DISEÑOS EXPERIMENTALES
#
# Para el diseño de Cuadro Latino, se supone que es necesario comparar tres tratamientos A, B y C en presencia de otras dos fuentes de variabilidad. Por ejemplo, los tres tratamientos pueden ser tres métodos de soldadura para conductores eléctricos y las dos fuentes de variabilidad pueden ser:
#
# 1)  Diferentes operarios
# 2)  La utilización de diferentes fundentes para soldar.
#
# Si se consideran tres operarios y tres fundentes, el experimento puede disponerse así:
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# Aquí cada método de soldadura se aplica sólo una vez por cada operario junto con cada fundente.
# Un arreglo experimental como el descripto de denomina Cuadro Latino.
# Un Cuadro Latino n x n es una arreglo cuadrado de n letras distintas, las cuales aparecen sólo una vez en cada renglón y en cada columna.
# Nótese que en un experimento en Cuadro Latino de n tratamientos es necesario incluir n^2 observaciones, n por cada tratamiento.
# Un experimento en Cuadro Latino sin repetición da solo (n-1).(n-2) grados de libertad para estimar el error experimental. De modo que tales experimentos son efectuados en contadas ocasiones sin repetición cuando n es pequeño.
# Si existe un total de r repeticiones, el análisis de los datos presupone el siguiente modelo, donde y_(ij(k)l) es la observación en el i-ésimo renglón, en la j-ésima columna, de la l-ésima repetición y el subíndice k indica el k-ésimo tratamiento:
y[ij(k)*l] == μ + α[i] + β[j] + γ[k] + ρ[l] + ε[ij(k)*l]  # para i, j, k = 1, 2, …, n  y l = 1, 2, …, r
# con las restricciones:
sum(α[i], i = 1 .. n) == 0
sum(β[i], j = 1 .. n) == 0
sum(γ[i], k = 1 .. n) == 0
sum(ρ[i], l = 1 .. r) == 0
# donde:
# μ  es la gran media
# α_i  es el efecto de la i-ésima fila o renglón
# β_j  es el efecto de la j-ésima columna
# γ_k  es el efecto del k-ésimo tratamiento
# ρ_l  es el efecto de la l-ésima repetición
# εij_((k)l)  variable aleatoria independiente normal con μ = 0 y varianza común σ^2.
# Nótese que por los “efectos de los renglones” y los “efectos de las columnas” se entienden los efectos de las dos variables extrañas y que se incluyen los “efectos de la repetición” como una tercera variable extraña.
# k está entre paréntesis ya que para un diseño de Cuadro Latino dado, k es automáticamente determinada cuando i y j se conocen.
# La hipótesis principal a probar es la Hipótesis Nula γ_k = 0, para toda k, es decir la Hipótesis Nula de que no existe diferencia en la eficacia de n tratamientos.
# También se puede probar si α_i = 0, para todo i y β_j = 0, para todo j con el fin de comprobar si las dos variables extrañas tienen algún efecto sobre el fenómeno que se está considerando.
# Mas aún, se puede probar es la Hipótesis Nula ρ_l = 0, para toda l, contra la alternativa que no todas las ρ_l son iguales a cero, y esta prueba del efecto de las repeticiones puede ser importante si las partes del experimento , que representan los Cuadros Latinos individuales, fueron realizados en distintos días, a diferentes temperaturas, etc..
# Las fórmula a aplicar son:
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# SSE = SST - SS(Tr) - SSR - SSC - SS(Rep)
# Donde:
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# Lo que lleva al siguiente cuadro de análisis:
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# Ejemplo: Suponer que se efectúan repeticiones del experimento de soldadura empleando el siguiente arreglo:
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# Los resultados, que señalan el número de kilogramos fuerza de tensión requeridos para separar los puntos soldados, fueron como se indica a continuación:
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# Analizar el experimento como un Cuadro Latino y probar con un nivel de significación de 0.01 si existen diferencias en los métodos, en los operadores, los fundentes o las repeticiones.
# 1 -  Hipótesis Nula: α_1 = α_2 = α_3 = 0 ; β_1 = β_2 = β_3 = 0 ; γ_1 = γ_2 = γ_3 = 0 ; ρ_1 = ρ_2 = 0
# Hipótesis Alternativa: no todas las α , β, γ, ρ iguales a 0.
# 2 -  Nivel de significancia: α =0.01.
α := 0.01
# 3 -  Criterio: Para tratamientos, renglones y columnas se rechaza Ho si
# F > 7.56  (este valor  corresponde a F_0.01 con ν_1 = 2 y  ν_2 = 10)
# Para repeticiones se rechaza Ho si F > 10.0  (este valor corresponde a F_0.01 con ν_1 = 1 y  ν_2_( )= 10)
n := 3  # número de tratamientos
r := 2  # número de repeticiones
νR := n - 1
νC := νR
νT := νR
νr := r - 1
ν := n^2*r - 1 = 17
νE := ν - νR - νC - νT - νr = 10
FR01 := qF(1 - α, νR, νE) = 7.55943
FR01 == FC01 == FT01
Fr01 := qF(1 - α, νr, νE) = 10.0443
t := 0, 0.01 .. 12
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# 4  Cálculos:
T_1_punto_punto := 14 + 16.5 + 11 + 10 + 16.5 + 13 = 81
T_2_punto_punto := 9.5 + 17 + 15 + 12 + 12 + 14 = 79.5
T_3_punto_punto := 11 + 12 + 13.5 + 13.5 + 18 + 11.5 = 79.5
T_punto_1_punto := 14 + 9.5 + 11 + 10 + 12 + 13.5 = 70
T_punto_2_punto := 16.5 + 17 + 12 + 16.5 + 12 + 18 = 92
T_punto_3_punto := 11 + 15 + 13.5 + 13 + 14 + 11.5 = 78
TA := 14 + 17 + 13.5 + 12 + 18 + 13 = 87.5
TB := 11 + 16.5 + 15 + 16.5 + 13.5 + 14 = 86.5
TC := 9.5 + 12 + 11 + 10 + 12 + 11.5 = 66
T_punto_punto_1 := 14 + 16.5 + 11 + 9.5 + 17 + 15 + 11 + 12 + 13.5 = 119.5
T_punto_punto_2 := 10 + 16.5 + 13 + 12 + 12 + 14 + 13.5 + 18 + 11.5 = 120.5
T_punto_punto_punto := T_punto_punto_1 + T_punto_punto_2 = 240
T_cuadrado := 14^2 + 16.5^2 + 11^2 + 9.5^2 + 17^2 + 15^2 + 11^2 + 12^2 + 13.5^2 + 10^2 + 16.5^2 + 13^2 + 12^2 + 12^2 + 14^2 + 13.5^2 + 18^2 + 11.5^2 = 3304.5
C := T_punto_punto_punto^2/(n^2*r) = 3200
SST := T_cuadrado - C = 104.5
SSTr := (TA^2 + TB^2 + TC^2)/(n*r) - C = 49.0833
SSR := (T_1_punto_punto^2 + T_2_punto_punto^2 + T_3_punto_punto^2)/(n*r) - C = 0.25
SSC := (T_punto_1_punto^2 + T_punto_2_punto^2 + T_punto_3_punto^2)/(n*r) - C = 41.3333
SSr := (T_punto_punto_1^2 + T_punto_punto_2^2)/n^2 - C = 0.0555556
SSE := SST - SSR - SSC - SSTr - SSr = 13.7778
# La Tabla queda:
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FT := 17.6
FR := 0.1
FC := 14.7
Fr := 0.1
t := 0, 0.01 .. 20
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# 5 -  Decisión:  En lo que respecta a tratamientos (métodos) y a columnas (fundentes) dado que  F = 17.6 (línea verde) y 14.7 (línea negra) sobrepasan a 7.56  se rechazan las Hipótesis Nulas correspondientes.
# Para renglones (operarios) dado que F = 0.1 (línea cyan) no excede a 7.56,  no se rechaza Ho.
# En cuanto a las repeticiones dado que F = 0.1 no excede 10.0  no se rechaza Ho.
# En otras palabras, se concluye que hay diferencias en los métodos y en los fundentes, pero no en los operadores ni en las repeticiones, en cuanto a afectación de la resistencia mecánica de la soldadura.
# Si se quiere hacer la prueba del Rango Múltiple de Duncan con α = 0.01, se calculan los promedios de los tratamientos y se ordenan
TA/6 = 14.5833
TB/6 = 14.4167
TC/6 = 11
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MSE := 1.4
s_x_media := sqrt(MSE/3) = 0.68313
ν := 10
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# Multiplicando r_p por s:x_media:
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# El rango de las tres medias es 14.6 - 11= 3.6, que excede a R3= 3.19, que es el rango significativo mínimo.
# Esto era de esperar, porque la prueba F indicó que las diferencias entre las  tres medias eran significativas con α= 0.01.
# Para probar que hay diferencias significativas entre dos medias adyacentes, se obtienen los rangos de 0.2 y 3.4 respectivamente . Puesto que el primero de estos valores NO sobrepasa a R2 = 3.061, las diferencias correspondientes no son significativas.
# Esto se resume:
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# En consecuencia, se concluye que el Método C produce uniones con soldaduras significativamente más débiles que los Métodos A y B.
# La eliminación de tres fuentes extrañas de variabilidad puede lograrse mediante el diseño de Cuadro Grecolatino.
# En un diseño consistente en un arreglo cuadrado de n letras latinas y n letras griegas; más exactamente, cada letra latina aparece sólo una vez al lado de cada letra griega:
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# También se los llama “Cuadros Grecolatinos Ortogonales”. Como ejemplo, suponer el caso de las soldaduras, la temperatura es otra fuente de variabilidad. Si tres temperaturas de soldado, denotadas α , β y γ se utilizan junto con los tres métodos, los tres operadores (renglones) y tres fundentes (columnas), la repetición de un experimento apropiado de Cuadro Grecolatino puede establecerse así:
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# Así pues, el Método A sería utilizado por el Operador 1, usando fundente 1, a la temperatura α, por el Operador 2, usando fundente 2, a la temperatura β y por el Operador 3, usando fundente 3, a la temperatura γ.
# En un Cuadro Grecolatino, cada variable (representada por renglones, columnas, letras latinas o letras griegas) está “distribuida equitativamente” respecto a las otras variables.
