# Worksheet setting: ORIGIN = 1
# 1  Hipotesis nula: β = 0
# Hipotesis alternativa: β <> 0
# 2 Nivel de significacion:
α := 0.05
# 3 Criterio:
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n := 6
x := transpose([71, 96, 85, 81, 128, 17])
y := transpose([10.12125117, 2.634019684, 57.45242977, 26.41638133, 25.34575722, 5.723861942])
a := 7.315332957
b := 0.175317371
ν := n - 2 = 4  # Grados de libertad
t_05 := qt(1 - α/2, ν) = 2.77645
w := -6, -5.99 .. 6
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# 4 Calculos:
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i := 1 .. n
Sxx := n*sum(x[i]^2, i = 1 .. n) - sum(x[i], i = 1 .. n)^2 = 39812  # Varianza muestral
q := sum((y[i] - (a + b*x[i]))^2, i) = 1861.6  # Suma de cuadrados de error
s_e := sqrt(1/(n - 2)*q) = 21.5731  # Error Estándar de Estimación
β := 0
t := (b - β)/s_e*sqrt(Sxx/n) = 0.661978
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# 5 Decision:
# Se acepta la hipotesis nula, β es significativamente igual a 0, no existe dependecia lineal entre las variables
# Si β=0 la línea de regresión es horizontal y la media de las y no “depende linealmente”de x.
