# Grupo:
# - Colman, Mariano
# - Graffigna, Santiago
# - Soria, Lucas
# Problema 5:
# En una muestra aleatoria de 85 cojinetes del cigüeñal del motor de automóvil, 10 tienen una rugosidad de acabado superficial que excede las especificaciones. ¿Estos datos presentan pruebas contundentes de que la proporción de cojinetes del cigüeñal que presentan una rugosidad superficial excesiva excede de 0,10? Establezca y pruebe las hipótesis apropiadas usando 0.05.
# Proporcion muestral
10/85 = 0.117647
x := 10
p0 := 0.10
n := 85
# 1.  Hipotesis Nula:  p = 0.10
# Hipotesis Alternativa: p > 0.10
# 2. Nivel de significancia: α=0.05
α := 0.05
# 3 Criterio:
t := -3, -2.99 .. 3
z05 := qnorm(1 - α, 0, 1) = 1.64485
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# 4 Calculos:
z := (x - n*p0)/sqrt(n*p0*(1 - p0)) = 0.542326
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# 5 Decision:
# Se acepta la hiporesis nula
# Problema 6:
# Se está estudiando la fracción de circuitos integrados defectuosos producidos en un proceso de fotolitografía. Se prueba una muestra aleatoria de 300 circuitos, revelando 13 defectuosos.
# a) Encuentre un IC de dos lados del 95% en la fracción de circuitos defectuosos producidos por esta herramienta en particular.(b) Utilice los datos para probar H0: p = 0.05 versus H1: p <> 0.05. Use α = 0.05.
# Proporcion muestral:
13/300 = 0.0433333
x := 13
p0 := 0.05
n := 300
# b )
# 1.  Hipotesis Nula:  p = 0.05
# Hipotesis Alternativa: p <> 0.05
# 2. Nivel de significancia: α=0.05
α := 0.05
# 3 Criterio:
t := -3, -2.99 .. 3
z05 := qnorm(1 - α/2, 0, 1) = 1.95996
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# 4 Calculos:
z := (x - n*p0)/sqrt(n*p0*(1 - p0)) = -0.529813
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# 5 Decision:
# Se acepta la hiporesis nula
# a)
E := z05*sqrt(x/n*(1 - x/n)/n) = 0.0230398
# Intervalo de confianza
exinf := x/n - E = 0.0202935
exsup := x/n + E = 0.0663731
# Problema 7:
#
# Considere los datos del circuito defectuoso en el ejercicio anterior. (a) ¿Los datos respaldan la afirmación de que la fracción de unidades defectuosas producidas es menor que 0.05, usando α = 0.05? (b) Encuentre el P-valor para la prueba.
# a )
# 1.  Hipotesis Nula:  p = 0.05
# Hipotesis Alternativa: p < 0.05
# 2. Nivel de significancia: α=0.05
α := 0.05
# 3 Criterio:
t := -3, -2.99 .. 3
z05 := qnorm(α, 0, 1) = -1.64485
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# 4 Calculos:
z := (x - n*p0)/sqrt(n*p0*(1 - p0)) = -0.529813
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# 5 Decision:
# Se acepta la hiporesis nula
# b )
Pvalor := integral(dnorm(t, 0, 1), t = -∞ .. z) = 0.298121
# Problema 8:
# Un fabricante de lentes intraoculares está calificando una nueva rectificadora y calificará la máquina si el porcentaje de lentes pulidas que contienen defectos en la superficie no supera el 2%. Una muestra aleatoria de 250 lentes contiene seis lentes defectuosas.
# (a) Formule y pruebe un conjunto apropiado de hipótesis para determinar si la máquina puede ser calificada. Use α = 0.05.
p0 := 0.02
x := 6
n := 250
# 1.  Hipotesis Nula:  p = 0.02
# Hipotesis Alternativa: p > 0.02
# 2. Nivel de significancia: α=0.05
α := 0.05
# 3 Criterio:
t := -3, -2.99 .. 3
z05 := qnorm(1 - α, 0, 1) = 1.64485
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# 4 Calculos:
z := (x - n*p0)/sqrt(n*p0*(1 - p0)) = 0.451754
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# 5 Decision:
# Se acepta la hiporesis nula
# Problema 9:
# Se pregunta a una muestra aleatoria de 500 votantes si están a favor del uso de combustibles oxigenados durante todo el año para reducir la contaminación del aire. Si más de 315 votantes responden positivamente, concluiremos que al menos el 60% de los votantes favorecen el uso de estos combustibles.
# Encuentre la probabilidad de error de tipo I si exactamente el 60% de los votantes está a favor del uso de estos combustibles.
n := 500
p0 := 0.6
x := 315
# Proporcion muestral:
x/n = 0.63
z := (x - n*p0)/sqrt(n*p0*(1 - p0)) = 1.36931
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1 - pnorm(z, 0, 1) = 0.0854518
# Probabilidad de cometer el error de tipo I es de 8.35%
integral(dnorm(t, 0, 1), t = z .. ∞) = 0.0854518
# Problema 10:
# Determine, sobre la base de los datos muestrales que se dan en la siguiente tabla, si la verdadera proporción de compradores que prefieren el detergente A sobre el detergente B es la misma en las tres ciudades:
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# Use el nivel de significancia de 0.05
pma := 232/400 = 0.58
pca := 260/500 = 0.52
psja := 197/400 = 0.4925
psjb := 203/400 = 0.5075
pmb := 168/400 = 0.42
pcb := 240/500 = 0.48
# 1  Hipótesis nula:  pm = pc = psj
# Hipótesis alternativa:  No son iguales
# 2  Nivel de significación: α=0.05
α := 0.05
# 3  Criterio:
k := 3  # Poblaciones
ν := k - 1 = 2  # Grados de libertad
t := 0, 0.01 .. 10
chi05 := qchisq(1 - α, ν) = 5.99146
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# 4  Cálculos:
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# Frecuencias esperadas
# 212 | 188
# 265 | 235
# 212 | 188
chi := (232 - 212)^2/212 + (260 - 265)^2/265 + (197 - 212)^2/212 + (168 - 188)^2/188 + (240 - 235)^2/235 + (203 - 188)^2/188 = 6.4733
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# 5  Decisión: Se rechaza la hipótesis nula, por lo tanto las proporciones no son
# iguales.
# Problema 11:
# Use los datos que se muestran en la siguiente tabla para evaluar con un nivel de significancia de 0.01 si la habilidad de una persona en matemáticas es independiente de su interés en las estadísticas
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# 1  Hipótesis nula:  la habilidad de una persona en matemáticas es independiente de su interés en las estadísticas
# Hipótesis alternativa:  No son independientes
# 2  Nivel de significación: α=0.01
α := 0.01
# 3  Criterio:
r := 3
c := 3
ν := (r - 1)*(c - 1) = 4  # Grados de libertad
chi01 := qchisq(1 - α, ν) = 13.2767
t := 0, 0.01 .. 15
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# 4  Cálculos:
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# Frecuencias esperadas
# 45 | 50 | 23.33
# 56.25 | 62.5 | 29.167
# 33.75 | 37.5 | 17.5
chi := (232 - 212)^2/212 + (260 - 265)^2/265 + (197 - 212)^2/212 + (168 - 188)^2/188 + (240 - 235)^2/235 + (203 - 188)^2/188 + (168 - 188)^2/188 + (240 - 235)^2/235 + (203 - 188)^2/188 = 9.90415
chi := 33.47
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# 5  Decisión: Se rechaza la hipótesis nula, por lo tanto no son independientes.
# Problema 12:
# Se supone que el número de defectos en las placas de circuito impreso sigue una distribución de Poisson. Se recolectó una muestra aleatoria de n =60 placas y se observó el siguiente número de defectos.
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# Hacer la correspondiente Prueba de Hipótesis sobre la Bondad de Ajuste con α = 0.05.
λ := (0*32 + 1*15 + 2*9 + 3*4)/60 = 0.75
# 1  Hipótesis nula:  Distribución de Poisson con λ=0.75
# Hipótesis alternativa:  No tiene dicha distribución.
# 2  Nivel de significación: α=0.05
α := 0.05
# 3  Criterio:
k := 3
m := 1
ν := k - m - 1 = 1  # Grados de libertad
chi05 := qchisq(1 - α, ν) = 3.84146
t := 0, 0.01 .. 10
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# 4 Calculos:
# Frecuencias Esperadas
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32
28.342
# 15 | 21.256
# 13 | 9.964
0
32
dpois(0, λ)*60 = 28.342
1
15
dpois(1, λ)*60 = 21.2565
2
9
dpois(2, λ)*60 = 7.97119
13
dpois(2, λ)*60 + dpois(3, λ)*60 = 9.96398
3
4
dpois(3, λ)*60 = 1.9928
chi := (32 - 28.342)^2/28.342 + (15 - 21.256)^2/21.256 + (13 - 9.964)^2/9.964 = 3.23843
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# 5 Decision:
# Se acepta la hipotesis nula, es una distribucion de Poisson con λ=0.75
# Problema 13:
# La siguiente es la distribución de las lecturas obtenidas con un contador Geiger del número de partículas emitidas por una sustancia radiactiva en 100 intervalos sucesivos de 40 segundos:
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# a ) Verifique que la media y la desviación estándar de esta distribución son x = 20 y s = 5
# b ) Encuentren las probabilidades de que una variable aleatoria que tenga una distribución normal
# con μ = 20 y σ = 5 tome un valor inferior a 9.5, entre 9.5 y 14.5 y 19.5, entre 19.5 y 24.5,
# entre 24.5 y 29.5, entre 29.5 y 34.5, y mayor que 34.5.
# c ) Encuentren las frecuencias de curva normal esperadas para las diversas clases multiplicando las las probabilidades obtenidas en la parte (b) por la frecuencia total, y luego pruebe al nivel de significación de 0.05 si los datos pueden considerarse como una muestra aleatoria de una muestra población normal
# a )
x := ((5 + 9)/2*1 + (10 + 14)/2*10 + (15 + 19)/2*37 + (20 + 24)/2*36 + (25 + 29)/2*13 + (30 + 34)/2*2 + (35 + 39)/2)/100 = 20
s := sqrt((((5 + 9)/2)^2*1 + ((10 + 14)/2)^2*10 + ((15 + 19)/2)^2*37 + ((20 + 24)/2)^2*36 + ((25 + 29)/2)^2*13 + ((30 + 34)/2)^2*2 + ((35 + 39)/2)^2 - 100*20^2)/100) = 5
# b )
# Probabilidades de que una variable aleatoria que tenga una distribución normal
# con μ= 20 y σ= 5 tome un valor:
# Menor a 9.5
p9 := pnorm(9.5, x, s) - pnorm(4.5, x, s) = 0.0168968
# Entre 9.5 y 14.5
p14 := pnorm(14.5, x, s) - pnorm(9.5, x, s) = 0.117802
# Entre 14.5 y 19.5
p19 := pnorm(19.5, x, s) - pnorm(14.5, x, s) = 0.324506
# Entre 19.5 y 24.5
p24 := pnorm(24.5, x, s) - pnorm(19.5, x, s) = 0.355768
# Entre 24.5 y 29.5
p29 := pnorm(29.5, x, s) - pnorm(24.5, x, s) = 0.155344
# Entre 29.5 y 34.5
p34 := pnorm(34.5, x, s) - pnorm(29.5, x, s) = 0.0268507
# Mayor a 34.5
p1 := pnorm(39.5, x, s) - pnorm(34.5, x, s) = 0.00181772
# Frecuencias esperadas:
p900 := p9*100 = 1.68968
p1400 := p14*100 = 11.7802
p1900 := p19*100 = 32.4506
p2400 := p24*100 = 35.5768
p2900 := p29*100 = 15.5344
p3400 := p34*100 = 2.68507
p100 := p1*100 = 0.181772
# Frontera de clase:
(4.5 - 20)/5 = -3.1
(9.5 - 20)/5 = -2.1
(14.5 - 20)/5 = -1.1
(19.5 - 20)/5 = -0.1
(24.5 - 20)/5 = 0.9
(29.5 - 20)/5 = 1.9
(34.5 - 20)/5 = 2.9
(39.5 - 20)/5 = 3.9
# N° de
# partículas
# Fronteras de clase
# Probabilidad de que una variable aleatoria tome uno de esos valores
# Frecuencia esperada
p900 = 1.68968
p9 = 0.0168968
# 4.5 - 9.5 | de -3.1 a -2.1
# 9.5 - 14.5
# de -2.1 a -1.1
p14 = 0.117802
p1400 = 11.7802
# 14.5 - 19.5
# de -1.1 a -0.1
p19 = 0.324506
p1900 = 32.4506
# 19.5 - 24.5
# de -0.1 a 0.9
p24 = 0.355768
p2400 = 35.5768
# 24.5 - 29.5
# de 0.9 a 1.9
p29 = 0.155344
p2900 = 15.5344
# 29.5 - 34.5
# de 1.9 a 2.9
p34 = 0.0268507
p3400 = 2.68507
# 34.5 - 39.5
# de 2.9 a 3.9
p1 = 0.00181772
p100 = 0.181772
# c )
p900 := p9*100 = 1.68968  # -
# - | 11
p1400 := p14*100 = 11.7802
p1900 := p19*100 = 32.4506  # -
37
p2400 := p24*100 = 35.5768  # -
36
p2900 := p29*100 = 15.5344
# -
p3400 := p34*100 = 2.68507
# -
16
# -
p100 := p1*100 = 0.181772
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11
p914 := p900 + p1400 = 13.4698
16
p29341 := p2900 + p3400 + p100 = 18.4012
# 1 Hipotesis nula: los datos pueden considerarse como una muestra aleatoria de una muestra poblacional normal
# Hipotesis alternativa: los datos no son una muestra aleatoria de una muestra pobalcional normal
# 2 Nivel de significancia:
α := 0.05
# 3 Criterio:
k := 4
m := 2
ν := k - m - 1 = 1  # grados de libertad
chi05 := qchisq(1 - α, ν) = 3.84146
t := 0, 0.01 .. 10
# Se rechaza la hipotesis nula si χ^2>3.841
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# 4 Calculos:
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chi := (11 - p914)^2/p914 + (37 - p1900)^2/p1900 + (36 - p2400)^2/p2400 + (16 - p29341)^2/p29341 = 1.40904
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# 5 Decision:
# Se acepta la hipotesis nula, la distribucion es normal con μ=20 y σ=5
