# Problema 1:
# La siguiente tabla muestra las horas de alivio proporcionadas por dos analgésicos en 12 pacientes que sufren de artritis. ¿Hay alguna evidencia de que un medicamento proporcione un alivio más prolongado que el otro con un nivel de confianza α = 0.05?
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a := transpose([2, 3.6, 2.6, 2.6, 7.3, 3.4, 14.9, 6.6, 2.3, 2, 6.8, 8.5])
b := transpose([3.5, 5.7, 2.9, 2.4, 9.9, 3.3, 16.7, 6, 3.8, 4, 9.1, 20.9])
μ_a := mean(a) = 5.21667
μ_b := mean(b) = 7.35
# 1.  Hipótesis Nula: μa - μb = 0 (p=1/2)
# Hipótesis Alternativa: μa - μb > 0 (p>1/2)
#
# 2.  Nivel de significancia: α =0.05.
α := 0.05
# 3.  Criterio: Se denota con x a los signos positivos. Se rechaza la hipótesis nula si la probabilidad de obtener x o más signos es mayor o igual que 0.05.
# 4.  Cálculos:
#
# - - - + - + - + - - - -  x=3  n=12
# La probabilidad que esto suceda en una distribución binomial está dada por:
sum(dbinom(k, 12, 0.5), k = 3 .. 12) = 0.980713
P(x ≥ 3)
# 5-  Decisión: dado que 0.981 > 0.05 Se Rechaza la Hipótesis Nula. Luego, una droga dura mas que la otra
a := 0
b := 0
# Problema 2:
# Un psicólogo afirma que el número de delincuentes reincidentes disminuirá si los delincuentes por primera vez completan un curso de rehabilitación en particular. Selecciona aleatoriamente 10 prisiones y registra el número de reincidentes durante un período de dos años.
# Luego, después de que los delincuentes por primera vez completan el curso, registra el número de delincuentes reincidentes en cada prisión por otro período de dos años.
# Los resultados se muestran en la siguiente tabla. Con un nivel de significancia de 0.05, ¿puede apoyar la afirmación del psicólogo?
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a := transpose([21, 34, 9, 45, 30, 54, 37, 36, 33, 40])
b := transpose([19, 22, 16, 31, 21, 30, 22, 18, 17, 21])
μ_a := mean(a) = 33.9
μ_b := mean(b) = 21.7
# 1.  Hipótesis Nula: μa - μb = 0 (p=1/2)
# Hipótesis Alternativa: μa - μb > 0 (p>1/2)
#
# 2.  Nivel de significancia: α =0.05.
α := 0.05
# 3.  Criterio: Se denota con x a los signos positivos. Se rechaza la hipótesis nula si la probabilidad de obtener x o más signos es mayor o igual que 0.05.
# 4.  Cálculos:
#
# + + - + + + + + + +  x=9  n=10
# La probabilidad que esto suceda en una distribución binomial está dada por:
sum(dbinom(k, 10, 0.5), k = 9 .. 10) = 0.0107422
# 5-  Decisión: dado que 0.01074 < 0.05 Se Rechaza la Hipótesis Nula. Luego, el curso de rehabilitacion es efectivo
# Problema 3:
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# 1.  Hipótesis Nula: las poblaciones son idénticas (μ1 = μ2)
# Hipótesis Alternativa:  μ1 <> μ2 (dos colas)
#
# 2  Nivel de significancia
α := 0.05
# 3  Criterio: Se rechaza Ho si
z005 := qnorm(1 - α/2, 0, 1) = 1.95996
z > z005
# o bien
z < -z005
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# 4  Cálculos:
v1 := transpose(READPRN("C:\Users\Lucas\Documents\01 A Facultad\3° Año\1° Semestre\Estadistica II\TPs\TP 3 Unidad 4\ej3m1.txt"))
v2 := transpose(READPRN("C:\Users\Lucas\Documents\01 A Facultad\3° Año\1° Semestre\Estadistica II\TPs\TP 3 Unidad 4\ej3m2.txt"))
v := transpose(READPRN("C:\Users\Lucas\Documents\01 A Facultad\3° Año\1° Semestre\Estadistica II\TPs\TP 3 Unidad 4\ej3vector.txt"))
m1 := mean(v1) = 6.48262
m2 := mean(v2) = 6.89518
# Como no hay valores repetidos no hace falta hacer el promedio entre rangos
n1 := length(v1) = 13  # Tamaño de la muestra de la población 1
n2 := length(v2) = 11  # Tamaño de la muestra de la población 2
# Sumas de rangos:
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v = [5.589; 5.675; 6.483; 7.062; 6.404; 6.669; 7.539; 7.219; 7.405; 5.844; 5.895; 5.897; 6.593; 7.428; 6.525; 6.304; 10.05; 6.714; 5.72; 7.759; 6.607; 5.796; 5.963; 6.981]
sort(v) = [5.589; 5.675; 5.72; 5.796; 5.844; 5.895; 5.897; 5.963; 6.304; 6.404; 6.483; 6.525; 6.593; 6.607; 6.669; 6.714; 6.981; 7.062; 7.219; 7.405; 7.428; 7.539; 7.759; 10.05]
transpose(sort(v)) = [5.589, 5.675, 5.72, 5.796, 5.844, 5.895, 5.897, 5.963, 6.304, 6.404, 6.483, 6.525, 6.593, 6.607, 6.669, 6.714, 6.981, 7.062, 7.219, 7.405, 7.428, 7.539, 7.759, 10.05]
# I | I | II | II | I | I | I | II | II | I | I | II | I | II | I | II | II | I | I | I
# 1 | 2 | 3 | 4 | 5 | 6 | 7 | 8 | 9 | 10 | 11 | 12 | 13 | 14 | 15 | 16 | 17 | 18 | 19 | 20
R1 := 1 + 2 + 5 + 6 + 7 + 10 + 11 + 13 + 15 + 18 + 19 + 20 + 22 = 149
R2 := 3 + 4 + 8 + 9 + 12 + 14 + 16 + 17 + 21 + 23 + 24 = 151
# Se definen los dos estadisticos:
U1 := n1*n2 + n1*(n1 + 1)/2 - R1 = 85
# Como U2 es mas pequeño trabajamos con el
U2 := n1*n2 + n2*(n2 + 1)/2 - R2 = 58
μ_U2 := n1*n2/2 = 71.5
σ_U2 := sqrt(n1*n2*(n1 + n2 + 1)/12) = 17.2603
Estadistico
z := (U1 - μ_U2)/σ_U2 = 0.782143
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# 5-  Decisión:
# dado que 0.782 (z) <  z005 y z > -z005 Se Acepta la Hipótesis Nula.
# Se puede decir que un ese nivel de significancia, las medias de las dos poblaciones son iguales.
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# 1.  Hipótesis Nula: las poblaciones son idénticas (μ1 = μ2 = μ3)
# Hipótesis Alternativa: las poblaciones son distintas.
#
# 2.  Nivel de significancia: 0.05
α := 0.05
# 3.  Criterio: se rechaza Ho si chi > chi05
k := 3
chi05 := qchisq(1 - α, k - 1) = 5.99146
t := 0, 0.01 .. 10
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# 4.  Cálculos:
n[1] := 8
n[2] := 8
n[3] := 8
v := transpose(READPRN("C:\Users\Lucas\Documents\01 A Facultad\3° Año\1° Semestre\Estadistica II\TPs\TP 3 Unidad 4\ej4vector.txt"))
# Se ordenan los datos
I
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II
III
transpose(sort(v)) = [22, 23, 26, 27, 29, 29, 37, 38, 39, 44, 46, 48, 49, 49, 49, 51, 56, 56, 58, 59, 60, 62, 65, 66]
# II | I | I | II | I | II | I | III | II | I | II | II | II | III | I | I | III | III | I | III | III | III | II | III
# 1 | 2 | 3 | 4 | 5.5 | 5.5 | 7 | 8 | 9 | 10 | 11 | 12 | 14 | 14 | 14 | 16 | 17.5 | 17.5 | 19 | 20 | 21 | 22 | 23 | 24
(5 + 6)/2 = 5.5
(13 + 14 + 15)/3 = 14
(17 + 18)/2 = 17.5
R[1] := 2 + 3 + 5.5 + 7 + 10 + 14 + 16 + 19 = 76.5
R[2] := 1 + 4 + 5.5 + 9 + 11 + 12 + 14 + 23 = 79.5
R[3] := 8 + 14 + 17.5 + 17.5 + 20 + 21 + 22 + 24 = 144
nn := n[1] + n[2] + n[3] = 24
H := 12/(nn*(nn + 1))*sum(R[i]^2/n[i], i = 1 .. k) - (3*(nn + 1)) = 7.27125
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# 5- Decisión: dado que H (7.271) > chi05 (5.991) Se Rechaza la Hipótesis Nula. Luego, los tres métodos no tienen igual eficacia.
# Problema 5:
# Se desea saber si en un proceso de fabricación de pÌldoras, la obtención de éstas en mal estado se produce de manera aleatoria. Para ello se anota el estado de 50 pÌldoras obtenidas en la cadena de producción a una determinada hora:
#
# B: Buen estado D: Defectuosa
#
# B D B D BBB DD B D B DD B D BBBB D B D B D BB DDD B D B D B D BB D BB D BBBB D B D B
# 1  2  3  4  5  6  7  8  9  10 11 12  13  14.15.16.17.18  19  20.21.22.23.24.25 26.27.28.29.30 31.32.33.34
# 1 Hipotesis nula: El arreglo es aleatorio
# Hipotesis alternativa: El arreglo no es aleatorio
# 2 Nivel de significancia: α=0.05
α := 0.05
# 3 Criterio:
z05 := qnorm(α/2, 0, 1) = -1.95996
t := -3, -2.99 .. 3
# Se rechaza Ho si z no esta entre z05 y -z05
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# 4 Calculos:
n1 := 29
n2 := 50 - 29
μ_u := 2*n1*n2/(n1 + n2) + 1 = 25.36
σ_u := sqrt(2*n1*n2*(2*n1*n2 - n1 - n2)/((n1 + n2)^2*(n1 + n2 - 1))) = 3.40782
u := 34
z := (u - μ_u)/σ_u = 2.53534
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# 5 Decision:
# Se Rechaza la hipotesis nula. El arreglo no es aleatorio
# Problema IV-6
# La siguiente es una muestra de 50 números entregados por un generador seudoaleatorio, ¿se puede considerar que los valores no tienen un patrón de aparición con un nivel de significancia de α = 0.05?
# 7.445  2.531  8.429  5.976  3.908  4.362  0.5412  9.555  2.44  4.388
# 7.555  2.645  0.09758  3.38  1.813  4.843  9.91  8.367  4.463  7.493
# 3.105  2.673  5.809  6.846  7.588  2.205  1.913  3.475  2.666  7.996
# 7.446  7.943  0.0266  4.988  4.793  2.71  0.9606  7.077  9.396  0.3024
# 9.843  8.398  1.369  7.724  3.857  0.8656  3.335  7.124  8.97  7.964
# 1.  Hipótesis Nula: El arreglo es aleatorio
# Hipótesis Alternativa: No hay aleatoriedad, existe un patrón
# de repetición.
#
# 2.  Nivel de significancia: α =0.05.
# 3.  Criterio: Se rechaza la hipótesis nula si z >z_0.05.
α := 0.05  # Nivel de significancia
z05 := qnorm(1 - α, 0, 1) = 1.64485
t := -3, -2.99 .. 3
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A := transpose(READPRN("C:\Users\Lucas\Documents\01 A Facultad\3° Año\1° Semestre\Estadistica II\TPs\TP 3 Unidad 4\Ej6n.txt"))
B := median(A) = 4.628
# 4.  Cálculos: La mediana de las 50 mediciones es 4.628. Con este valor como referencia se construye el siguiente cuadro
# a b a a b b b a b b a b b b b a a a b a b b a a a b b b b a a a b a a b b a a b a a b a b b b a a a
u := 25
n1 := 25
n2 := 25
μ_u := 2*n1*n2/(n1 + n2) + 1 = 26
σ_u := sqrt(2*n1*n2*(2*n1*n2 - n1 - n2)/((n1 + n2)^2*(n1 + n2 - 1))) = 3.49927
z := (u - μ_u)/σ_u = -0.285774  # Estadístico
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# 5-  Decisión: dado que -0.286 (z) < 1.645 (z05) Se acepta la Hipótesis Nula. Luego, el arreglo es aleatorio.
# Problema 7:
# Realizar un test de Kolmogorov  Smirnov, a nivel α = 0.1, para contrastar si puede suponerse que los 10 datos:
#
# 2.3140  2.1320  2.5880  5.0680  4.2070  3.6860  4.1160  2.3830  1.4670  2.7900
#
# proceden de una distribución normal.
# 1.  Hipótesis nula: Estan normalmente distribuidos
# Hipótesis alterna: no están normalmente distribuídos
# 2.  Nivel de significación: α = 0.1
α := 0.1
# 3.  Criterio: Se rechaza Ho si D > 0.368, donde D es la diferencia máxima entre la distribución acumulada observada  y la supuesta bajo la Hipótesis Nula.
Obs := transpose([2.314, 2.132, 2.588, 5.068, 4.207, 3.686, 4.116, 2.383, 1.467, 2.79])
Obs := sort(Obs)
i := 0 .. rows(Obs) - 1
t := 0, 0.01 .. rows(Obs) - 1
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# 4.  Cálculos: Se construye el siguiente gráfico que muestra la distribución acumulada observada  y la supuesta.
# Para ello se ordenan los valores:
F(i) := transpose([pnorm(0, mean(Obs), stdev(Obs)), pnorm(1, mean(Obs), stdev(Obs)), pnorm(2, mean(Obs), stdev(Obs)), pnorm(3, mean(Obs), stdev(Obs)), pnorm(4, mean(Obs), stdev(Obs)), pnorm(5, mean(Obs), stdev(Obs)), pnorm(6, mean(Obs), stdev(Obs)), pnorm(7, mean(Obs), stdev(Obs)), pnorm(8, mean(Obs), stdev(Obs)), pnorm(9, mean(Obs), stdev(Obs))])
D := max(|F(i) - Obs/max(Obs)|) = 0.848674
# 5 Decision:
# Se rechaza Ho porque 0.849 > 0.368, donde D es la diferencia máxima entre la distribución acumulada observada  y la supuesta bajo la Hipótesis Nula.
# No esta normalmente distribuida.
