# Problema 3:
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# 1.  Hipótesis Nula: las poblaciones son idénticas (μ1 = μ2)
# Hipótesis Alternativa:  μ1 <> μ2 (dos colas)
#
# 2  Nivel de significancia
α := 0.05
# 3  Criterio: Se rechaza Ho si
z005 := qnorm(1 - α/2, 0, 1) = 1.95996
z > z005
# o bien
z < -z005
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# 4  Cálculos:
v1 := transpose(READPRN("C:\Users\Lucas\Documents\01 A Facultad\3° Año\1° Semestre\Estadistica II\TPs\TP 3 Unidad 4\ej3m1.txt"))
v2 := transpose(READPRN("C:\Users\Lucas\Documents\01 A Facultad\3° Año\1° Semestre\Estadistica II\TPs\TP 3 Unidad 4\ej3m2.txt"))
v := transpose(READPRN("C:\Users\Lucas\Documents\01 A Facultad\3° Año\1° Semestre\Estadistica II\TPs\TP 3 Unidad 4\ej3vector.txt"))
m1 := mean(v1) = 6.48262
m2 := mean(v2) = 6.89518
# Como no hay valores repetidos no hace falta hacer el promedio entre rangos
n1 := length(v1) = 13  # Tamaño de la muestra de la población 1
n2 := length(v2) = 11  # Tamaño de la muestra de la población 2
# Sumas de rangos:
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v = [5.589; 5.675; 6.483; 7.062; 6.404; 6.669; 7.539; 7.219; 7.405; 5.844; 5.895; 5.897; 6.593; 7.428; 6.525; 6.304; 10.05; 6.714; 5.72; 7.759; 6.607; 5.796; 5.963; 6.981]
sort(v) = [5.589; 5.675; 5.72; 5.796; 5.844; 5.895; 5.897; 5.963; 6.304; 6.404; 6.483; 6.525; 6.593; 6.607; 6.669; 6.714; 6.981; 7.062; 7.219; 7.405; 7.428; 7.539; 7.759; 10.05]
transpose(sort(v)) = [5.589, 5.675, 5.72, 5.796, 5.844, 5.895, 5.897, 5.963, 6.304, 6.404, 6.483, 6.525, 6.593, 6.607, 6.669, 6.714, 6.981, 7.062, 7.219, 7.405, 7.428, 7.539, 7.759, 10.05]
# I | I | II | II | I | I | I | II | II | I | I | II | I | II | I | II | II | I | I | I | II | I | II | II
# 1 | 2 | 3 | 4 | 5 | 6 | 7 | 8 | 9 | 10 | 11 | 12 | 13 | 14 | 15 | 16 | 17 | 18 | 19 | 20 | 21 | 22 | 23 | 24
R1 := 1 + 2 + 5 + 6 + 7 + 10 + 11 + 13 + 15 + 18 + 19 + 20 + 22 = 149
R2 := 3 + 4 + 8 + 9 + 12 + 14 + 16 + 17 + 21 + 23 + 24 = 151
# Se definen los dos estadisticos:
U1 := n1*n2 + n1*(n1 + 1)/2 - R1 = 85
# Como U2 es mas pequeño trabajamos con el
U2 := n1*n2 + n2*(n2 + 1)/2 - R2 = 58
μ_U2 := n1*n2/2 = 71.5
σ_U2 := sqrt(n1*n2*(n1 + n2 + 1)/12) = 17.2603
Estadistico
z := (U1 - μ_U2)/σ_U2 = 0.782143
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# 5-  Decisión:
# dado que 0.782 (z) <  z005 y z > -z005 Se Acepta la Hipótesis Nula.
# Se puede decir que un ese nivel de significancia, las medias de las dos poblaciones son iguales.
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# 1.  Hipótesis Nula: las poblaciones son idénticas (μ1 = μ2 = μ3)
# Hipótesis Alternativa: las poblaciones son distintas.
#
# 2.  Nivel de significancia: 0.05
α := 0.05
# 3.  Criterio: se rechaza Ho si chi > chi05
k := 3
chi05 := qchisq(1 - α, k - 1) = 5.99146
t := 0, 0.01 .. 10
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# 4.  Cálculos:
n[1] := 8
n[2] := 8
n[3] := 8
v := transpose(READPRN("C:\Users\Lucas\Documents\01 A Facultad\3° Año\1° Semestre\Estadistica II\TPs\TP 3 Unidad 4\ej4vector.txt"))
# Se ordenan los datos
I
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II
III
transpose(sort(v)) = [22, 23, 26, 27, 29, 29, 37, 38, 39, 44, 46, 48, 49, 49, 49, 51, 56, 56, 58, 59, 60, 62, 65, 66]
# II | I | I | II | I | II | I | III | II | I | II | II | II | III | I | I | III | III | I | III | III | III | II | III
# 1 | 2 | 3 | 4 | 5.5 | 5.5 | 7 | 8 | 9 | 10 | 11 | 12 | 14 | 14 | 14 | 16 | 17.5 | 17.5 | 19 | 20 | 21 | 22 | 23 | 24
(5 + 6)/2 = 5.5
(13 + 14 + 15)/3 = 14
(17 + 18)/2 = 17.5
R[1] := 2 + 3 + 5.5 + 7 + 10 + 14 + 16 + 19 = 76.5
R[2] := 1 + 4 + 5.5 + 9 + 11 + 12 + 14 + 23 = 79.5
R[3] := 8 + 14 + 17.5 + 17.5 + 20 + 21 + 22 + 24 = 144
nn := n[1] + n[2] + n[3] = 24
H := 12/(nn*(nn + 1))*sum(R[i]^2/n[i], i = 1 .. k) - (3*(nn + 1)) = 7.27125
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# 5- Decisión: dado que H (7.271) > chi05 (5.991) Se Rechaza la Hipótesis Nula. Luego, los tres métodos no tienen igual eficacia.
# Problema IV-6
# La siguiente es una muestra de 50 números entregados por un generador seudoaleatorio, ¿se puede considerar que los valores no tienen un patrón de aparición con un nivel de significancia de α = 0.05?
# 7.445  2.531  8.429  5.976  3.908  4.362  0.5412  9.555  2.44  4.388
# 7.555  2.645  0.09758  3.38  1.813  4.843  9.91  8.367  4.463  7.493
# 3.105  2.673  5.809  6.846  7.588  2.205  1.913  3.475  2.666  7.996
# 7.446  7.943  0.0266  4.988  4.793  2.71  0.9606  7.077  9.396  0.3024
# 9.843  8.398  1.369  7.724  3.857  0.8656  3.335  7.124  8.97  7.964
# 1.  Hipótesis Nula: El arreglo es aleatorio
# Hipótesis Alternativa: No hay aleatoriedad, existe un patrón
# de repetición.
#
# 2.  Nivel de significancia: α =0.05.
# 3.  Criterio: Se rechaza la hipótesis nula si z >z_0.05.
α := 0.05  # Nivel de significancia
z05 := qnorm(1 - α, 0, 1) = 1.64485
t := -3, -2.99 .. 3
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A := transpose(READPRN("C:\Users\Lucas\Documents\01 A Facultad\3° Año\1° Semestre\Estadistica II\TPs\TP 3 Unidad 4\Ej6n.txt"))
B := median(A) = 4.628
# 4.  Cálculos: La mediana de las 50 mediciones es 4.628. Con este valor como referencia se construye el siguiente cuadro
# a b a a b b b a b b a b b b b a a a b a b b a a a b b b b a a a b a a b b a a b a a b a b b b a a a
u := 25
n1 := 25
n2 := 25
μ_u := 2*n1*n2/(n1 + n2) + 1 = 26
σ_u := sqrt(2*n1*n2*(2*n1*n2 - n1 - n2)/((n1 + n2)^2*(n1 + n2 - 1))) = 3.49927
z := (u - μ_u)/σ_u  # Estadístico
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# 5-  Decisión: dado que -0.286 (z) < 1.645 (z05) Se acepta la Hipótesis Nula. Luego, el arreglo es aleatorio.
