# Worksheet setting: ORIGIN = 1
# Problema 1:
# Se quiere evaluar la eficacia de distintas dosis de un fármaco contra la hipertensión arterial, comparándola con la de una dieta sin sal. Para ello se seleccionan al azar 25 hipertensos y se distribuyen aleatoriamente en 5 grupos. Al primero de ellos no se le suministra ningún tratamiento, al segundo una dieta con un contenido pobre en sal, al tercero una dieta sin sal, al cuarto el fármaco a una dosis determinada y al quinto el mismo fármaco a otra dosis. Las presiones arteriales sistólicas de los 25 sujetos al finalizar los tratamientos son:
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# Elaborar la Tabla de Análisis de la Varianza
Y := [
    180, 172, 163, 158, 147;
    173, 158, 170, 146, 152;
    175, 167, 158, 160, 143;
    182, 160, 162, 171, 155;
    181, 175, 170, 155, 160
]
α := 0.05  # Nivel de significancia
k := 5  # Numero de tratamientos
n := 5  # Tamaño de la muestra
i := 1 .. k
j := 1 .. n
y[i] := mean(Y[:, i])
y = [178.2; 166.4; 164.6; 158; 151.4]  # Vector de medias
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s2w := 1/(k*(n - 1))*sum(sum((Y[j, i] - y[i])^2, j = 1 .. n), i = 1 .. k) = 44.72  # Cambia respecto del apunte porque las muestras estan dadas en las columnas
s2w := 1/(k*(n - 1))*sum(sum((transpose(Y)[i, j] - y[i])^2, j = 1 .. n), i = 1 .. k) = 44.72  # Cualquier opcion es lo mismo
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s2h := n/(k - 1)*sum((y[i] - mean(y))^2, i = 1 .. k) = 502.66
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F == SS(Tr)/(k - 1)/(SSE/(k*(n - 1))) == MS(Tr)/MSE == s2h/s2w
F := s2h/s2w = 11.2402
ν1 := k - 1 = 4  # Grados de libertad del numerador
ν2 := k*(n - 1) = 20  # Grados de libertad del denominador
t := 0, 0.01 .. 5
F05 := qF(1 - α, ν1, ν2) = 2.86608
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# Decision:
# Se rechaza la hipotesis nula, la medicacion reduce la tension.
# Problema 2:
# Queremos comparar el consumo de combustible de diferentes tipos de automóvil, pero también de diferentes tipos de conductores. En concreto, es posible que nos interese saber c6mo influye la edad de los conductores en el consumo de combustible. Para eso, podemos subdividir los conductores en grupos de edad. Podríamos utilizar los seis grupos de edad siguientes (en años):
#
# 1. 25 años 0 menos
# 2. 26-35
# 3. 36-45
# 4. 46-55
# 5. 56-65
# 6. Más de 65
#
# A continuación, podemos organizar nuestro experimento de tal forma que un automóvil de cada grupo sea conducido por un conductor de cada grupo de edad.
# Contrastar la hipótesis de que las medias poblacionales del consumo de combustible de todos los tipos de automóvil son iguales, podemos además contrastar la hipótesis de que las medias poblacionales del consumo medio de combustible de todos los grupos de edad son iguales.
# Todo esto con un nivel de significación α = 0.05.
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Y := [
    25.1, 23.9, 26, 75;
    24.7, 23.7, 25.4, 73.8;
    26, 24.4, 25.8, 76.2;
    24.3, 23.3, 24.4, 72;
    23.9, 23.6, 24.2, 71.7;
    24.2, 24.5, 25.4, 74.1;
    148.2, 143.4, 151.2, 442.8
]
μf := Y[:, 4]/3 = [25; 24.6; 25.4; 24; 23.9; 24.7; 147.6]
μc := transpose(Y)[:, 7]/6 = [24.7; 23.9; 25.2; 73.8]  # Los ultimos de los valores se deben despreciar
# 1 Hipotesis nula 1: El consumo de combustible no depende de la edad
# Hipotesis alternativa 1: Si depende de la edad
# Hipotesis nula 2: El consumo de combustible no depende del tipo de auto
# Hiporesis alternativa 2: Si depende del tipo
# 2 Nivel de significacion: 0.05
α := 0.05
# 3 Criterio:
ν1 := 5  # Grados de libertad de los tratamientos
ν2 := 2  # Grados de libertad de los bloques
ν4 := 17  # Grados de libertad total
ν3 := ν4 - ν1 - ν2 = 10  # Grados de libertad de error
F105 := qF(1 - α, ν1, ν3) = 3.32583
F205 := qF(1 - α, ν2, ν3) = 4.10282
t := 0, 0.1 .. 6
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# 4 Calculos:
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a := 6
b := 3
Tpp := Y[a + 1, b + 1] = 442.8
C := 1/(a*b)*Tpp^2 = 10892.9
SST := sum(sum(Y[i, j]^2, j = 1 .. b), i = 1 .. a) - C = 11.88
SSTr := 1/b*sum(Y[i, 4]^2, i = 1 .. a) - C = 4.98
SSTBl := 1/a*sum(Y[7, j]^2, j = 1 .. b) - C = 5.16
SSE := SST - SSTr - SSTBl = 1.74
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T_punto_i := Y[:, b + 1]
transpose(T_punto_i) = [75, 73.8, 76.2, 72, 71.7, 74.1, 442.8]
T_j_punto := transpose(Y)[:, a + 1]
transpose(T_j_punto) = [148.2, 143.4, 151.2, 442.8]
T_punto_punto := Y[a + 1, b + 1] = 442.8
C := T_punto_punto^2/(a*b) = 10892.9
SST := sum(sum(Y[i, j]^2, j = 1 .. b), i = 1 .. a) - C = 11.88
SS_Tr := 1/b*sum(T_punto_i[i]^2, i = 1 .. a) - C = 4.98
SS_Bl := 1/a*sum(T_j_punto[j]^2, j = 1 .. b) - C = 5.16
SSE := SST - SS_Tr - SS_Bl = 1.74
MSTr := SSTr/ν1 = 0.996
MSBl := SSTBl/ν2 = 2.58
MSE := SSE/ν3 = 0.174
FTr := MSTr/MSE = 5.72414
FBl := MSBl/MSE = 14.8276
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# 5 Decision:
# Se rechaza las Hipotesis Nulas, el consumo de combustible depende de la edad y del tipo de auto
# Problema 3:
# Se quiere estudiar el efecto de distintas dosis de un medicamento para combatir a los parásitos de peces criados en acuicultura. Para ello, se tomaron 60 peces al azar, y se dividieron en 5 grupos de 12 individuos cada uno.
# El primer grupo no fue medicado, pero a los restantes se les suministró el medicamento en dosis crecientes. Tras una semana de tratamiento, se contabilizaron los parásitos existentes en cada individuo, obteniendo los resultados siguientes:
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Y := [
    50, 65, 72, 46, 38, 29, 70, 85, 72, 40, 57, 59;
    49, 47, 30, 62, 62, 60, 19, 28, 56, 62, 55, 40;
    20, 59, 64, 61, 28, 47, 29, 41, 60, 57, 61, 38;
    20, 23, 38, 31, 27, 16, 27, 18, 22, 12, 24, 11;
    18, 30, 22, 26, 31, 11, 15, 12, 31, 36, 16, 13
]
# 1.  Hipótesis nula: La cantidad de parasitos son iguales
# Hipótesis alternativa: No lo son
# 2.  Nivel de significancia: α =0.05
α := 0.05
# 3.  Criterio se acepta la Ho si F < 2.54
k := 5  # número de tratamientos
n := 12  # tamaño de la muestra
ν1 := k - 1 = 4  # grados de libertad del numerador
ν2 := k*(n - 1) = 55  # grados de libertad del denominador
F05 := qF(1 - α, ν1, ν2) = 2.53969  # F crítico
t := 0, 0.01 .. 5
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# 4.  Cálculos:
n := cols(Y) = 12  # Tamaño de las muestras
nk := rows(Y) = 5  # Número de tratamientos
i := 1 .. k
j := 1 .. n  # Índices
C := 1/(k*n)*sum(sum(Y[i, j], j = 1 .. n), i = 1 .. k)^2 = 91885.1  # Término de corrección
sum(sum(Y[i, j], j = 1 .. n), i = 1 .. k) = 2348
T[i] := sum(Y[i, j], j = 1 .. n)  # Vector de suma de filas
SST := sum(sum(Y[i, j]^2, j = 1 .. n), i = 1 .. k) - C = 22052.9  # Suma de cuadrados total
SS_Tr := 1/n*sum(T[i]^2, i = 1 .. k) - C = 12372.9  # Suma de cuadrados de tratamientos
SSE := SST - SS_Tr = 9680  # Suma de cuadrados de error
MS_Tr := SS_Tr/(k - 1) = 3093.23
MSE := SSE/(k*(n - 1)) = 176
F := MS_Tr/MSE = 17.5752  # Estadístico
# La tabla queda
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# 5.  Decisión:  Ya que F (17.58) excede a F0.05= 2.54, se rechaza la Hipótesis Nula, luego los medicamentos son efectivos.
y := transpose([mean(transpose(Y)[:, 1]), mean(transpose(Y)[:, 2]), mean(transpose(Y)[:, 3]), mean(transpose(Y)[:, 4]), mean(transpose(Y)[:, 5])]) = [56.9167; 47.5; 47.0833; 22.4167; 21.75]
y := sort(y) = [21.75; 22.4167; 47.0833; 47.5; 56.9167]
ν2 = 55
# Para p = 2
2.829 + (2.843 - 2.829)/2 = 2.836
# Para p= 3
2.976 + (2.991 - 2.976)/2 = 2.9835
# Para p= 4
3.073 + (3.087 - 3.073)/2 = 3.08
# Para p= 5
3.143 + (3.157 - 3.143)/2 = 3.15
r_p := [2.836, 2.984, 3.08, 3.15]
s_x := sqrt(MSE/n) = 3.82971
# multiplicando r_p por
R_p := r_p*s_x = [10.8611, 11.4278, 11.7955, 12.0636]
# El rango de las cinco medias es 56.917 - 21.75 = 35.167, que excede a R5 = 12.064, que es el rango significativo mínimo.
#
# Esto era de esperar, porque la prueba F indicó que las diferencias entre las  cinco medias eran significativas con α = 0.05.
# Para probar que hay diferencias significativas entre cuatro medias adyacentes, se obtienen los rangos de 34.5 y 25.75 respectivamente para 22.417, 47.083, 47.5, 56.917 y 21.75, 22.417, 47.073, 47.5.
# Puesto que ambos valores sobrepasan a R5 = 12.064, las diferencias correspondientes no son significativas.
# Por último en el caso de parejas adyacentes de medias, 3 pares adyacente no tienen rango mayor que el rango significativo mínimo R1 = 10.861.
# Esto se resume:
22.417 - 21.75 = 0.667
transpose(y) = [21.75, 22.4167, 47.0833, 47.5, 56.9167]
47.073 - 22.417 = 24.656
47.5 - 47.073 = 0.427
56.917 - 47.5 = 9.417
# El mejor remedio es de 125mg. Existen diferencias significativas entre las dosis de 50mg y 100mg
# Problema 4:
# Aplicar el Rango Múltiple de Duncan para discriminar el comportamiento de los automóviles en el Problema VI-2, con un nivel de confianza del 95%.
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aut := [24.7, 23.9, 25.2]
MSE := 0.174
n := 6
aut := sort(transpose(aut)) = [23.9; 24.7; 25.2]
# Para p = 2 -> 3.151
# Para p= 3 -> 3.293
r_p := [3.151, 3.293]
# multiplicando r_p por
s_x := sqrt(MSE/n) = 0.170294
R_p := r_p*s_x = [0.536596, 0.560778]
# El rango de las tres medias es 25.2 - 23.9 = 1.3, que excede a R2 = 0.561, que es el rango significativo mínimo.
#
# Para probar que hay diferencias significativas entre dos medias adyacentes, se obtienen los rangos de 0.5 y 0.8 respectivamente para 25.2, 24.7 y 23.9, 24.7.
# Puesto que el segundo valores sobrepasan a R2 = 0.561, la diferencia correspondiente es significativa.
# Por último en el caso de parejas adyacentes de medias, el primer par adyacente tiene rango mayor que el rango significativo mínimo R1 = 0.537
# Esto se resume:
transpose(aut) = [23.9, 24.7, 25.2]
# Existen diferencias significativas entre los tipos de auto α y β
# Problema 5:
# Supongamos un experimento en el que se quiere estudiar el efecto de distintos tipos de semilla en el rendimiento del trigo y se considera que en dicho rendimiento también pueden influir los tipos de abonos e insecticidas empleados. Para realizar dicho estudio, es posible utilizar un diseño completo en bloques aleatorizados, donde el factor principal es el tipo de semilla y las variables de bloque los tipos de abono e insecticida.
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# Realizar un Análisis de Varianza en Cuadros Latinos con un nivel se significancia de 0.05.
Y := [7, 8, 4, 3; 15, 16, 18, 23; 18, 12, 12, 10; 14, 13, 16, 14]
# 1 -  Hipótesis Nula: α_1 = α_2 = α_3 = α_4 =  0 ; β_1 = β_2 = β_3 = β_4 = 0 ; γ_1 = γ_2 = γ_3  = γ_4 = 0
# Hipótesis Alternativa: no todas las α , β, γ, ρ iguales a 0.
# 2 -  Nivel de significancia: α =0.05.
α := 0.05
# 3 -  Criterio:
n := 4  # número de tratamientos
r := 1  # número de repeticiones
νR := n - 1
νC := νR
νT := νR
ν := n^2*r - 1 = 15
νE := ν - νR - νC - νT = 6
FR05 := qF(1 - α, νR, νE) = 4.75706
FR05 == FC05 == FT05
t := 0, 0.01 .. 12
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# 4  Cálculos:
T_1_punto_punto := 7 + 8 + 4 + 3 = 22
T_2_punto_punto := 15 + 16 + 18 + 23 = 72
T_3_punto_punto := 18 + 12 + 12 + 10 = 52
T_4_punto_punto := 14 + 13 + 16 + 14 = 57
T_punto_1_punto := 7 + 15 + 18 + 14 = 54
T_punto_2_punto := 8 + 16 + 12 + 13 = 49
T_punto_3_punto := 4 + 18 + 12 + 16 = 50
T_punto_4_punto := 3 + 23 + 10 + 14 = 50
TA := 14 + 16 + 12 + 3 = 45
TB := 15 + 13 + 4 + 10 = 42
TC := 7 + 12 + 18 + 14 = 51
TD := 18 + 8 + 16 + 23 = 65
T_punto_punto_1 := 7 + 8 + 4 + 3 + 15 + 16 + 18 + 23 + 18 + 12 + 12 + 10 + 14 + 13 + 16 + 14 = 203
T_punto_punto_punto := T_punto_punto_1 = 203
T_cuadrado := (7^2 + 8^2 + 4^2 + 3^2 + 15^2 + 16^2 + 18^2 + 23^2 + 18^2 + 12^2 + 12^2 + 10^2 + 14^2 + 13^2 + 16^2 + 14^2) = 3001
C := T_punto_punto_punto^2/(n^2*r) = 2575.56
SST := T_cuadrado - C = 425.438
SSTr := (TA^2 + TB^2 + TC^2 + TD^2)/(n*r) - C = 78.1875
SSR := (T_1_punto_punto^2 + T_2_punto_punto^2 + T_3_punto_punto^2 + T_4_punto_punto^2)/(n*r) - C = 329.688
SSC := (T_punto_1_punto^2 + T_punto_2_punto^2 + T_punto_3_punto^2 + T_punto_4_punto^2)/(n*r) - C = 3.6875
SSE := SST - SSR - SSC - SSTr = 13.875
# La Tabla queda:
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FT := 11.268
FR := 47.512
FC := 0.531
t := 0, 0.01 .. 20
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# 5 -  Decisión:  El unico valor que no pasa el limite de FR05 = 4.757 es el de FC = 0.531. Por lo que es para el unico valor que no se rechaza la hipotesis nula.
# Esto quiere decir que, no hay diferencia entre los insecticidas, pero si la hay entre los abonos
